# OpenSim document version 40600
Model spine_shoulder_smoke:
  Ground
  BodySet:
    Body pelvis: mass=10 [kg] mass_center=(0 0 0) inertia=(0.01 0.01 0.01 0 0 0)
    Body lumbar1: mass=2 mass_center=(0 0 0) inertia=(0.01 0.01 0.01 0 0 0)
    Body lumbar2: mass=2 mass_center=(0 0 0) inertia=(0.01 0.01 0.01 0 0 0)
    Body lumbar3: mass=2 mass_center=(0 0 0) inertia=(0.01 0.01 0.01 0 0 0)
    Body thorax: mass=15 mass_center=(0 0 0) inertia=(0.1 0.1 0.1 0 0 0)
    Body scapula_r: mass=0.7 mass_center=(0 0 0) inertia=(0.001 0.001 0.001 0 0 0)
  JointSet:
    WeldJoint ground_pelvis: socket_parent_frame=ground_offset socket_child_frame=pelvis_offset
      PhysicalOffsetFrame ground_offset: socket_parent=/ground translation=(0 1 0) [meters]
      PhysicalOffsetFrame pelvis_offset: socket_parent=/bodyset/pelvis translation=(0 0 0)
    BallJoint lumbar1_joint: socket_parent_frame=pelvis_offset socket_child_frame=lumbar1_offset
      Coordinate lumbar1_q0: range=(-0.6 0.6)
      Coordinate lumbar1_q1: range=(-0.6 0.6)
      Coordinate lumbar1_q2: range=(-0.6 0.6)
      PhysicalOffsetFrame pelvis_offset: socket_parent=/bodyset/pelvis translation=(0 0.05 0)
      PhysicalOffsetFrame lumbar1_offset: socket_parent=/bodyset/lumbar1 translation=(0 0 0)
    BallJoint lumbar2_joint: socket_parent_frame=lumbar1_offset socket_child_frame=lumbar2_offset
      Coordinate lumbar2_q0: range=(-0.6 0.6)
      Coordinate lumbar2_q1: range=(-0.6 0.6)
      Coordinate lumbar2_q2: range=(-0.6 0.6)
      PhysicalOffsetFrame lumbar1_offset: socket_parent=/bodyset/lumbar1 translation=(0 0.05 0)
      PhysicalOffsetFrame lumbar2_offset: socket_parent=/bodyset/lumbar2 translation=(0 0 0)
    BallJoint lumbar3_joint: socket_parent_frame=lumbar2_offset socket_child_frame=lumbar3_offset
      Coordinate lumbar3_q0: range=(-0.6 0.6)
      Coordinate lumbar3_q1: range=(-0.6 0.6)
      Coordinate lumbar3_q2: range=(-0.6 0.6)
      PhysicalOffsetFrame lumbar2_offset: socket_parent=/bodyset/lumbar2 translation=(0 0.05 0)
      PhysicalOffsetFrame lumbar3_offset: socket_parent=/bodyset/lumbar3 translation=(0 0 0)
    WeldJoint lumbar_thorax: socket_parent_frame=lumbar3_offset socket_child_frame=thorax_offset
      PhysicalOffsetFrame lumbar3_offset: socket_parent=/bodyset/lumbar3 translation=(0 0.05 0)
      PhysicalOffsetFrame thorax_offset: socket_parent=/bodyset/thorax translation=(0 0 0)
    EllipsoidJoint scapulothoracic_r: socket_parent_frame=thorax_offset socket_child_frame=scapula_r_offset
        radii_x_y_z=(0.083 0.2 0.083)
      Coordinate scap_q0: range=(-0.7 0.7)
      Coordinate scap_q1: range=(-0.7 0.7)
      Coordinate scap_q2: range=(-0.7 0.7)
      PhysicalOffsetFrame thorax_offset: socket_parent=/bodyset/thorax translation=(0 0.1 0)
      PhysicalOffsetFrame scapula_r_offset: socket_parent=/bodyset/scapula_r translation=(0 0 0)
