# OpenSim document version 40500
Model subject01:
  gravity: 0 -9.80665 0
  length_units: meters
  force_units: N
  credits:
    Delp S.L., Loan J.P., Hoy M.G., Zajac F.E., Topp E.L., Rosen J.M., Thelen D.G., Anderson F.C., Seth A.,
    Hamner S.R.
  publications:
    Notes: 3D, 23 DOF gait model created by D.G. Thelen, Univ. of Wisconsin-Madison, and Samuel
    Hamner, Ajay Seth, Frank C. Anderson, and Scott L. Delp, Stanford University. Lower extremity joint
    defintions based on Delp et al. (1990). Low back joint and anthropometry based on Anderson and Pandy (1999,
    2001). Planar knee model of Yamaguchi and Zajac (1989). Seth removed the patella to avoid kinematic
    constraints; insertions of the quadrucepts are handled with moving points in the tibia frame. Hamner added
    arms adapted from Holzbaur et al., 2005. Hamner, S.R., Seth, A, Delp, S.L.: Muscle contributions to
    propulsion and support during running. Journal of Biomechanics, 2010. Delp, S.L., Loan, J.P., Hoy, M.G.,
    Zajac, F.E., Topp E.L., Rosen, J.M.: An interactive graphics-based model of the lower extremity to study
    orthopaedic surgical procedures, IEEE Transactions on Biomedical Engineering, vol. 37, pp. 757-767, 1990.
    Yamaguchi G.T., Zajac F.E.: A planar model of the knee joint to characterize the knee extensor mechanism." J
    . Biomech. vol. 21. pp. 1-10. 1989. Anderson F.C., Pandy M.G.: A dynamic optimization solution for vertical
    jumping in three dimensions. Computer Methods in Biomechanics and Biomedical Engineering 2:201-231, 1999.
    Anderson F.C., Pandy M.G.: Dynamic optimization of human walking. Journal of Biomechanical Engineering
    123:381-390, 2001. Holzbaur, KR, WM Murray and SL Delp, 2005. A model of the upper extremity for simulating
    musculoskeletal surgery and analyzing neuromuscular control. Ann Biomed Eng 33(6): 829-840.
  Ground
  BodySet:
    Body pelvis: mass=11.3078 mass_center=(-0.0623853 0 0) inertia=(0.0756014 0.0756014 0.043286 0 0 0)
        meshes=(sacrum.vtp pelvis.vtp l_pelvis.vtp)
    Body femur_r: mass=8.930827 mass_center=(0 -0.181569 0) inertia=(0.139837 0.0248011 0.139837 0 0 0)
        meshes=femur_r.vtp
    Body tibia_r: mass=3.559791 mass_center=(0 -0.208895 0) inertia=(0.059175 0.00331717 0.059175 0 0 0)
        meshes=(tibia_r.vtp fibula_r.vtp)
    Body talus_r: mass=0.09601594 mass_center=(0 0 0) inertia=(0.000739195 0.000703926 0.000703926 0 0 0)
        meshes=talus_rv.vtp
    Body calcn_r: mass=1.200199 mass_center=(0.0834506 0.0263226 0) inertia=(0.00103487 0.00265714 0.00265714 0 0 0)
        meshes=foot.vtp
    Body toes_r: mass=0.2079705 mass_center=(0.0288739 0.00526452 -0.0153549)
        inertia=(7.39195e-5 0.000137258 0.000137258 0 0 0) meshes=bofoot.vtp
    Body femur_l: mass=8.930827 mass_center=(0 -0.181569 0) inertia=(0.139837 0.0248011 0.139837 0 0 0)
        meshes=femur_l.vtp
    Body tibia_l: mass=3.559791 mass_center=(0 -0.208895 0) inertia=(0.059175 0.00331717 0.059175 0 0 0)
        meshes=(tibia_l.vtp fibula_l.vtp)
    Body talus_l: mass=0.09601594 mass_center=(0 0 0) inertia=(0.000739195 0.000703926 0.000703926 0 0 0)
        meshes=talus_lv.vtp
    Body calcn_l: mass=1.200199 mass_center=(0.0834506 0.0263226 0) inertia=(0.00103487 0.00265714 0.00265714 0 0 0)
        meshes=l_foot.vtp
    Body toes_l: mass=0.2079705 mass_center=(0.0288739 0.00526452 0.0153549)
        inertia=(7.39195e-5 0.000137258 0.000137258 0 0 0) meshes=l_bofoot.vtp
    Body lumbar1: mass=2.4 mass_center=(0 0 0) inertia=(0.02 0.02 0.02 0 0 0)
    Body lumbar2: mass=2.4 mass_center=(0 0 0) inertia=(0.02 0.02 0.02 0 0 0)
    Body lumbar3: mass=2.4 mass_center=(0 0 0) inertia=(0.02 0.02 0.02 0 0 0)
    Body torso: mass=19.63 mass_center=(-0.03 0.318752 0) inertia=(1.494104 0.8117847 1.494104 0 0 0) meshes=torso.obj
      Station euryon_r: .. (-0.0225 0.2166518 0.0741405)
      Station euryon_l: .. (-0.0225 0.2166518 -0.0741405)
      Station glabella: .. (0.059 0.2017103 0)
      Station opisthocranion: .. (-0.101 0.1817882 0)
      Station vertex: .. (-0.021 0.2714373 0)
      Station suprasternale: .. (0.009 -0.01245125 0)
      Station cervicale: .. (-0.086 0.03735375 0)
      ContactEllipsoid thorax_r_obstacle: location=(-0.025 -0.13 0.057) orientation=(-0.12 -0.03 0.057)
          radii=(0.077 0.145 0.077)
      ContactEllipsoid pectoralis_r_obstacle: location=(-0.0195 -0.12 0.0585) orientation=(-0.122 -0.03 0.25)
          radii=(0.075 0.15 0.077)
      ContactEllipsoid thorax_l_obstacle: location=(-0.025 -0.13 -0.057) orientation=(0.12 0.03 0.057)
          radii=(0.077 0.145 0.077)
      ContactEllipsoid pectoralis_l_obstacle: location=(-0.0195 -0.12 -0.0585) orientation=(0.122 0.03 0.25)
          radii=(0.075 0.15 0.077)
    Body clavicle_r: mass=0.1898 mass_center=(-0.0111 0.0064 0.0582379)
        inertia=(0.0003079421 0.0003079421 4.9e-5 0 0 0) meshes=clavicle_r.obj
    Body clavicle_l: mass=0.1898 mass_center=(-0.0111 0.0064 -0.0582379)
        inertia=(0.0003079421 0.0003079421 4.9e-5 0 0 0) meshes=clavicle_l.obj
    Body scapula_r: mass=0.7054 mass_center=(-0.04612 -0.03177559 -0.04905093)
        inertia=(0.001070309 0.001035155 0.001035155 0 0 0) meshes=scapula_r.obj
      Station acromion_r: .. (0 0 0)
    Body scapula_l: mass=0.7054 mass_center=(-0.04612 -0.03177559 0.04905093)
        inertia=(0.001070309 0.001035155 0.001035155 0 0 0) meshes=scapula_l.obj
      Station acromion_l: .. (0 0 0)
    Body humerus_r: mass=2.0325 mass_center=(0 -0.1966269 0) inertia=(0.01618433 0.004121 0.01618433 0 0 0)
        meshes=humerus_r.obj
      ContactEllipsoid triceps_r_obstacle: location=(-0.0165 -0.23 -0.0165) orientation=(-2.99 1.4 -1.75)
          radii=(0.045 0.1 0.03)
      ContactEllipsoid biceps_r_obstacle: location=(0.018 -0.2 0.01) orientation=(0.135 1.23 1.45)
          radii=(0.045 0.085 0.03)
    Body humerus_l: mass=2.0325 mass_center=(0 -0.1966269 0) inertia=(0.01618433 0.004121 0.01618433 0 0 0)
        meshes=humerus_l.obj
      ContactEllipsoid triceps_l_obstacle: location=(-0.0165 -0.23 0.0165) orientation=(2.99 -1.4 -1.75)
          radii=(0.045 0.1 0.03)
      ContactEllipsoid biceps_l_obstacle: location=(0.018 -0.2 -0.01) orientation=(-0.135 -1.23 1.45)
          radii=(0.045 0.085 0.03)
    Body ulna_r: mass=0.6075 mass_center=(0 -0.1286604 0) inertia=(0.003332243 0.000618 0.003332243 0 0 0)
        meshes=ulna_r.obj
      Station olecranon_r: .. (-0.03 -0.0010675 0)
    Body ulna_l: mass=0.6075 mass_center=(0 -0.1286604 0) inertia=(0.003332243 0.000618 0.003332243 0 0 0)
        meshes=ulna_l.obj
      Station olecranon_l: .. (-0.03 -0.0010675 0)
    Body radius_r: mass=0.6075 mass_center=(0 -0.1286604 0) inertia=(0.003332243 0.000618 0.003332243 0 0 0)
        meshes=radius_r.obj
      Station radiale_r: .. (0 -0.00427 0.006)
      Station stylion_r: .. (0 -0.245525 0.03)
    Body radius_l: mass=0.6075 mass_center=(0 -0.1286604 0) inertia=(0.003332243 0.000618 0.003332243 0 0 0)
        meshes=radius_l.obj
      Station radiale_l: .. (0 -0.00427 -0.006)
      Station stylion_l: .. (0 -0.245525 -0.03)
    Body hand_r: mass=0.4575 mass_center=(0 -0.068095 0) inertia=(0.000892 0.000547 0.00134 0 0 0)
        meshes=(pisiform_r.obj lunate_r.obj scaphoid_r.obj triquetrum_r.obj hamate_r.obj capitate_r.obj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)
    Body hand_l: mass=0.4575 mass_center=(0 -0.068095 0) inertia=(0.000892 0.000547 0.00134 0 0 0)
        meshes=(pisiform_l.obj lunate_l.obj scaphoid_l.obj triquetrum_l.obj hamate_l.obj capitate_l.obj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)
  JointSet:
    CustomJoint ground_pelvis: socket_parent_frame=ground_offset socket_child_frame=pelvis_offset
      Coordinate pelvis_tilt: default_value=0 range=(-1.570796 1.570796) clamped=true
      Coordinate pelvis_list: default_value=0 range=(-1.570796 1.570796) clamped=true
      Coordinate pelvis_rotation: default_value=0 range=(-1.570796 1.570796) clamped=true
      Coordinate pelvis_tx: default_value=0 range=(-5 25) clamped=true
      Coordinate pelvis_ty: default_value=0 range=(-1 2) clamped=true
      Coordinate pelvis_tz: default_value=0 range=(-3 3) clamped=true
      PhysicalOffsetFrame ground_offset: socket_parent=/ground translation=(0 0 0)
      PhysicalOffsetFrame pelvis_offset: socket_parent=/bodyset/pelvis translation=(0 0 0)
      SpatialTransform:
        TransformAxis rotation1: coordinates=pelvis_tilt axis=(0 0 1) LinearFunction(coefficients=1 0)
        TransformAxis rotation2: coordinates=pelvis_list axis=(1 0 0) LinearFunction(coefficients=1 0)
        TransformAxis rotation3: coordinates=pelvis_rotation axis=(0 1 0) LinearFunction(coefficients=1 0)
        TransformAxis translation1: coordinates=pelvis_tx axis=(1 0 0) LinearFunction(coefficients=1 0)
        TransformAxis translation2: coordinates=pelvis_ty axis=(0 1 0) LinearFunction(coefficients=1 0)
        TransformAxis translation3: coordinates=pelvis_tz axis=(0 0 1) LinearFunction(coefficients=1 0)
    CustomJoint hip_r: socket_parent_frame=pelvis_offset socket_child_frame=femur_r_offset
      Coordinate hip_flexion_r: default_value=0 range=(-2.094395 2.094395) clamped=true
      Coordinate hip_adduction_r: default_value=0 range=(-2.094395 2.094395) clamped=true
      Coordinate hip_rotation_r: default_value=0 range=(-2.094395 2.094395) clamped=true
      PhysicalOffsetFrame pelvis_offset: socket_parent=/bodyset/pelvis translation=(-0.0623853 -0.0583263 0.0728399)
      PhysicalOffsetFrame femur_r_offset: socket_parent=/bodyset/femur_r translation=(0 0 0)
      SpatialTransform: axes_held_at_zero=(translation1 translation2 translation3)
        TransformAxis rotation1: coordinates=hip_flexion_r axis=(0 0 1) LinearFunction(coefficients=1 0)
        TransformAxis rotation2: coordinates=hip_adduction_r axis=(1 0 0) LinearFunction(coefficients=1 0)
        TransformAxis rotation3: coordinates=hip_rotation_r axis=(0 1 0) LinearFunction(coefficients=1 0)
    CustomJoint knee_r: socket_parent_frame=femur_r_offset socket_child_frame=tibia_r_offset
      Coordinate knee_angle_r: default_value=0 range=(-2.5307 0.1745329) clamped=true
      PhysicalOffsetFrame femur_r_offset: socket_parent=/bodyset/femur_r translation=(0.0041 -0.41 0)
      PhysicalOffsetFrame tibia_r_offset: socket_parent=/bodyset/tibia_r translation=(0 0 0)
      SpatialTransform: axes_held_at_zero=(rotation2 rotation3 translation3)
        TransformAxis rotation1: coordinates=knee_angle_r axis=(0 0 1) LinearFunction(coefficients=1 0)
        TransformAxis translation1: coordinates=knee_angle_r axis=(1 0 0) Constant(value=0)
        TransformAxis translation2: coordinates=knee_angle_r axis=(0 1 0) Constant(value=0)
    CustomJoint ankle_r: socket_parent_frame=tibia_r_offset socket_child_frame=talus_r_offset
      Coordinate ankle_angle_r: default_value=0 range=(-1.570796 1.570796) clamped=true
      PhysicalOffsetFrame tibia_r_offset: socket_parent=/bodyset/tibia_r translation=(0 -0.481118 0)
      PhysicalOffsetFrame talus_r_offset: socket_parent=/bodyset/talus_r translation=(0 0 0)
      SpatialTransform: axes_held_at_zero=(rotation2 rotation3 translation1 translation2 translation3)
        TransformAxis rotation1: coordinates=ankle_angle_r axis=(-0.1050135 -0.1740224 0.9791263)
            LinearFunction(coefficients=1 0)
    CustomJoint subtalar_r: socket_parent_frame=talus_r_offset socket_child_frame=calcn_r_offset
      Coordinate subtalar_angle_r: default_value=0 range=(-1.570796 1.570796) clamped=true
      PhysicalOffsetFrame talus_r_offset: socket_parent=/bodyset/talus_r translation=(-0.0406989 -0.0368078 0.00694917)
      PhysicalOffsetFrame calcn_r_offset: socket_parent=/bodyset/calcn_r translation=(0 0 0)
      SpatialTransform: axes_held_at_zero=(rotation2 rotation3 translation1 translation2 translation3)
        TransformAxis rotation1: coordinates=subtalar_angle_r axis=(0.7871796 0.6047475 -0.1209495)
            LinearFunction(coefficients=1 0)
    CustomJoint mtp_r: socket_parent_frame=calcn_r_offset socket_child_frame=toes_r_offset
      Coordinate mtp_angle_r: default_value=0 range=(-1.570796 1.570796) clamped=true
      PhysicalOffsetFrame calcn_r_offset: socket_parent=/bodyset/calcn_r translation=(0.14921 -0.00175484 0.000947614)
      PhysicalOffsetFrame toes_r_offset: socket_parent=/bodyset/toes_r translation=(0 0 0)
      SpatialTransform: axes_held_at_zero=(rotation2 rotation3 translation1 translation2 translation3)
        TransformAxis rotation1: coordinates=mtp_angle_r axis=(-0.5809544 0 0.8139361) LinearFunction(coefficients=1 0)
    CustomJoint hip_l: socket_parent_frame=pelvis_offset socket_child_frame=femur_l_offset
      Coordinate hip_flexion_l: default_value=0 range=(-2.094395 2.094395) clamped=true
      Coordinate hip_adduction_l: default_value=0 range=(-2.094395 2.094395) clamped=true
      Coordinate hip_rotation_l: default_value=0 range=(-2.094395 2.094395) clamped=true
      PhysicalOffsetFrame pelvis_offset: socket_parent=/bodyset/pelvis translation=(-0.0623853 -0.0583263 -0.0728399)
      PhysicalOffsetFrame femur_l_offset: socket_parent=/bodyset/femur_l translation=(0 0 0)
      SpatialTransform: axes_held_at_zero=(translation1 translation2 translation3)
        TransformAxis rotation1: coordinates=hip_flexion_l axis=(0 0 1) LinearFunction(coefficients=1 0)
        TransformAxis rotation2: coordinates=hip_adduction_l axis=(-1 0 0) LinearFunction(coefficients=1 0)
        TransformAxis rotation3: coordinates=hip_rotation_l axis=(0 -1 0) LinearFunction(coefficients=1 0)
    CustomJoint knee_l: socket_parent_frame=femur_l_offset socket_child_frame=tibia_l_offset
      Coordinate knee_angle_l: default_value=0 range=(-2.5307 0.1745329) clamped=true
      PhysicalOffsetFrame femur_l_offset: socket_parent=/bodyset/femur_l translation=(0.0041 -0.41 0)
      PhysicalOffsetFrame tibia_l_offset: socket_parent=/bodyset/tibia_l translation=(0 0 0)
      SpatialTransform: axes_held_at_zero=(rotation2 rotation3 translation3)
        TransformAxis rotation1: coordinates=knee_angle_l axis=(0 0 1) LinearFunction(coefficients=1 0)
        TransformAxis translation1: coordinates=knee_angle_l axis=(1 0 0) Constant(value=0)
        TransformAxis translation2: coordinates=knee_angle_l axis=(0 1 0) Constant(value=0)
    CustomJoint ankle_l: socket_parent_frame=tibia_l_offset socket_child_frame=talus_l_offset
      Coordinate ankle_angle_l: default_value=0 range=(-1.570796 1.570796) clamped=true
      PhysicalOffsetFrame tibia_l_offset: socket_parent=/bodyset/tibia_l translation=(0 -0.481118 0)
      PhysicalOffsetFrame talus_l_offset: socket_parent=/bodyset/talus_l translation=(0 0 0)
      SpatialTransform: axes_held_at_zero=(rotation2 rotation3 translation1 translation2 translation3)
        TransformAxis rotation1: coordinates=ankle_angle_l axis=(0.1050135 0.1740224 0.9791263)
            LinearFunction(coefficients=1 0)
    CustomJoint subtalar_l: socket_parent_frame=talus_l_offset socket_child_frame=calcn_l_offset
      Coordinate subtalar_angle_l: default_value=0 range=(-1.570796 1.570796) clamped=true
      PhysicalOffsetFrame talus_l_offset: socket_parent=/bodyset/talus_l
          translation=(-0.0406989 -0.0368078 -0.00694917)
      PhysicalOffsetFrame calcn_l_offset: socket_parent=/bodyset/calcn_l translation=(0 0 0)
      SpatialTransform: axes_held_at_zero=(rotation2 rotation3 translation1 translation2 translation3)
        TransformAxis rotation1: coordinates=subtalar_angle_l axis=(-0.7871796 -0.6047475 -0.1209495)
            LinearFunction(coefficients=1 0)
    CustomJoint mtp_l: socket_parent_frame=calcn_l_offset socket_child_frame=toes_l_offset
      Coordinate mtp_angle_l: default_value=0 range=(-1.570796 1.570796) clamped=true
      PhysicalOffsetFrame calcn_l_offset: socket_parent=/bodyset/calcn_l translation=(0.14921 -0.00175484 -0.000947614)
      PhysicalOffsetFrame toes_l_offset: socket_parent=/bodyset/toes_l translation=(0 0 0)
      SpatialTransform: axes_held_at_zero=(rotation2 rotation3 translation1 translation2 translation3)
        TransformAxis rotation1: coordinates=mtp_angle_l axis=(0.5809544 0 0.8139361) LinearFunction(coefficients=1 0)
    CustomJoint back: socket_parent_frame=back_parent_frame socket_child_frame=back_child_frame
      Coordinate lumbar1_extension: range=(-0.4363323 0.4363323) clamped=true
      Coordinate lumbar1_bending: range=(-0.4363323 0.4363323) clamped=true
      Coordinate lumbar1_rotation: range=(-0.4363323 0.4363323) clamped=true
      PhysicalOffsetFrame back_parent_frame: socket_parent=/bodyset/pelvis translation=(-0.1007 0.0786312 0)
      PhysicalOffsetFrame back_child_frame: socket_parent=/bodyset/lumbar1 translation=(0 0 0)
      SpatialTransform: axes_held_at_zero=(translation1 translation2 translation3)
        TransformAxis rotation1: coordinates=lumbar1_extension axis=(0 0 1) LinearFunction(coefficients=1 0)
        TransformAxis rotation2: coordinates=lumbar1_bending axis=(1 0 0) LinearFunction(coefficients=1 0)
        TransformAxis rotation3: coordinates=lumbar1_rotation axis=(0 1 0) LinearFunction(coefficients=1 0)
    CustomJoint lumbar2_joint: socket_parent_frame=lumbar2_joint_parent_frame
        socket_child_frame=lumbar2_joint_child_frame
      Coordinate lumbar2_extension: range=(-0.4363323 0.4363323) clamped=true
      Coordinate lumbar2_bending: range=(-0.4363323 0.4363323) clamped=true
      Coordinate lumbar2_rotation: range=(-0.4363323 0.4363323) clamped=true
      PhysicalOffsetFrame lumbar2_joint_parent_frame: socket_parent=/bodyset/lumbar1 translation=(0.007 0.1253426 0)
      PhysicalOffsetFrame lumbar2_joint_child_frame: socket_parent=/bodyset/lumbar2 translation=(0 0 0)
      SpatialTransform: axes_held_at_zero=(translation1 translation2 translation3)
        TransformAxis rotation1: coordinates=lumbar2_extension axis=(0 0 1) LinearFunction(coefficients=1 0)
        TransformAxis rotation2: coordinates=lumbar2_bending axis=(1 0 0) LinearFunction(coefficients=1 0)
        TransformAxis rotation3: coordinates=lumbar2_rotation axis=(0 1 0) LinearFunction(coefficients=1 0)
    CustomJoint lumbar3_joint: socket_parent_frame=lumbar3_joint_parent_frame
        socket_child_frame=lumbar3_joint_child_frame
      Coordinate lumbar3_extension: range=(-0.4363323 0.4363323) clamped=true
      Coordinate lumbar3_bending: range=(-0.4363323 0.4363323) clamped=true
      Coordinate lumbar3_rotation: range=(-0.4363323 0.4363323) clamped=true
      PhysicalOffsetFrame lumbar3_joint_parent_frame: socket_parent=/bodyset/lumbar2 translation=(0.007 0.1253426 0)
      PhysicalOffsetFrame lumbar3_joint_child_frame: socket_parent=/bodyset/lumbar3 translation=(0 0 0)
      SpatialTransform: axes_held_at_zero=(translation1 translation2 translation3)
        TransformAxis rotation1: coordinates=lumbar3_extension axis=(0 0 1) LinearFunction(coefficients=1 0)
        TransformAxis rotation2: coordinates=lumbar3_bending axis=(1 0 0) LinearFunction(coefficients=1 0)
        TransformAxis rotation3: coordinates=lumbar3_rotation axis=(0 1 0) LinearFunction(coefficients=1 0)
    CustomJoint lumbar_torso: socket_parent_frame=lumbar_torso_parent_frame socket_child_frame=lumbar_torso_child_frame
      Coordinate torso_extension: range=(-0.4363323 0.4363323) clamped=true
      Coordinate torso_bending: range=(-0.4363323 0.4363323) clamped=true
      Coordinate torso_rotation: range=(-0.4363323 0.4363323) clamped=true
      PhysicalOffsetFrame lumbar_torso_parent_frame: socket_parent=/bodyset/lumbar3 translation=(0.007 0.1253426 0)
      PhysicalOffsetFrame lumbar_torso_child_frame: socket_parent=/bodyset/torso translation=(0 0 0)
      SpatialTransform: axes_held_at_zero=(translation1 translation2 translation3)
        TransformAxis rotation1: coordinates=torso_extension axis=(0 0 1) LinearFunction(coefficients=1 0)
        TransformAxis rotation2: coordinates=torso_bending axis=(1 0 0) LinearFunction(coefficients=1 0)
        TransformAxis rotation3: coordinates=torso_rotation axis=(0 1 0) LinearFunction(coefficients=1 0)
    WeldJoint sternoclavicular_r: socket_parent_frame=sternoclavicular_r_parent_frame
        socket_child_frame=sternoclavicular_r_child_frame
      PhysicalOffsetFrame sternoclavicular_r_parent_frame: socket_parent=/bodyset/torso
          translation=(0.00632 0.006902973 0.02739975)
      PhysicalOffsetFrame sternoclavicular_r_child_frame: socket_parent=/bodyset/clavicle_r translation=(0 0 0)
    WeldJoint sternoclavicular_l: socket_parent_frame=sternoclavicular_l_parent_frame
        socket_child_frame=sternoclavicular_l_child_frame
      PhysicalOffsetFrame sternoclavicular_l_parent_frame: socket_parent=/bodyset/torso
          translation=(0.00632 0.006902973 -0.02739975)
      PhysicalOffsetFrame sternoclavicular_l_child_frame: socket_parent=/bodyset/clavicle_l translation=(0 0 0)
    EllipsoidJoint scapulothoracic_r: socket_parent_frame=scapulothoracic_r_parent_frame
        socket_child_frame=scapulothoracic_r_child_frame radii_x_y_z=(0.083 0.2 0.083)
      Coordinate scap_abduction_r: range=(-0.2617994 0.2617994) clamped=true
      Coordinate scap_elevation_r: range=(-0.2617994 0.2617994) clamped=true
      Coordinate scap_uprot_r: range=(-0.2617994 0.2617994) clamped=true
      PhysicalOffsetFrame scapulothoracic_r_parent_frame: socket_parent=/bodyset/torso
          translation=(-0.04215485 0.03105196 0.1029104) orientation=(0.2684168 0.3071652 0.03841806)
      PhysicalOffsetFrame scapulothoracic_r_child_frame: socket_parent=/bodyset/scapula_r translation=(0 0 0)
    EllipsoidJoint scapulothoracic_l: socket_parent_frame=scapulothoracic_l_parent_frame
        socket_child_frame=scapulothoracic_l_child_frame radii_x_y_z=(0.083 0.2 -0.083)
      Coordinate scap_abduction_l: range=(-0.2617994 0.2617994) clamped=true
      Coordinate scap_elevation_l: range=(-0.2617994 0.2617994) clamped=true
      Coordinate scap_uprot_l: range=(-0.2617994 0.2617994) clamped=true
      PhysicalOffsetFrame scapulothoracic_l_parent_frame: socket_parent=/bodyset/torso
          translation=(-0.04215485 0.03105196 -0.1029104) orientation=(-0.2684168 -0.3071652 0.03841806)
      PhysicalOffsetFrame scapulothoracic_l_child_frame: socket_parent=/bodyset/scapula_l translation=(0 0 0)
    CustomJoint glenohumeral_r: socket_parent_frame=glenohumeral_r_parent_frame socket_child_frame=/bodyset/humerus_r
      Coordinate shoulder_flexion_r: default_value=0 range=(-2 2) clamped=true
      Coordinate shoulder_abduction_r: default_value=0 range=(-0.5235988 2.513274) clamped=true
      Coordinate shoulder_rotation_r: default_value=0 range=(-0.5235988 0.5235988) clamped=true
      PhysicalOffsetFrame glenohumeral_r_parent_frame: socket_parent=/bodyset/scapula_r
          translation=(-0.00955 -0.0338674 0.0096705) orientation=(-0.25 0 -0.125)
      SpatialTransform: axes_held_at_zero=(translation1 translation2 translation3)
        TransformAxis rotation1: coordinates=shoulder_flexion_r axis=(0 0 1) LinearFunction(coefficients=1 0)
        TransformAxis rotation2: coordinates=shoulder_abduction_r axis=(1 0 0) LinearFunction(coefficients=-1 0)
        TransformAxis rotation3: coordinates=shoulder_rotation_r axis=(0 1 0) LinearFunction(coefficients=1 0)
    CustomJoint glenohumeral_l: socket_parent_frame=glenohumeral_l_parent_frame socket_child_frame=/bodyset/humerus_l
      Coordinate shoulder_flexion_l: default_value=0 range=(-2 2) clamped=true
      Coordinate shoulder_abduction_l: default_value=0 range=(-0.5235988 2.513274) clamped=true
      Coordinate shoulder_rotation_l: default_value=0 range=(-0.5235988 0.5235988) clamped=true
      PhysicalOffsetFrame glenohumeral_l_parent_frame: socket_parent=/bodyset/scapula_l
          translation=(-0.00955 -0.0338674 -0.0096705) orientation=(0.25 0 -0.125)
      SpatialTransform: axes_held_at_zero=(translation1 translation2 translation3)
        TransformAxis rotation1: coordinates=shoulder_flexion_l axis=(0 0 1) LinearFunction(coefficients=1 0)
        TransformAxis rotation2: coordinates=shoulder_abduction_l axis=(1 0 0) LinearFunction(coefficients=1 0)
        TransformAxis rotation3: coordinates=shoulder_rotation_l axis=(0 1 0) LinearFunction(coefficients=-1 0)
    PinJoint elbow_r: socket_parent_frame=elbow_r_parent_frame socket_child_frame=elbow_r_child_frame
      Coordinate elbow_flex_r: default_value=0 range=(0 2.617994) clamped=true
      PhysicalOffsetFrame elbow_r_parent_frame: socket_parent=/bodyset/humerus_r
          translation=(0.013144 -0.3421821 -0.009595) orientation=(-0.0228627 0.228018 0.0051689)
      PhysicalOffsetFrame elbow_r_child_frame: socket_parent=/bodyset/ulna_r translation=(0 0 0)
          orientation=(-0.0228627 0.228018 0.0051689)
    PinJoint elbow_l: socket_parent_frame=elbow_l_parent_frame socket_child_frame=elbow_l_child_frame
      Coordinate elbow_flex_l: default_value=0 range=(0 2.617994) clamped=true
      PhysicalOffsetFrame elbow_l_parent_frame: socket_parent=/bodyset/humerus_l
          translation=(0.013144 -0.3421821 0.009595) orientation=(0.0228627 -0.228018 0.0051689)
      PhysicalOffsetFrame elbow_l_child_frame: socket_parent=/bodyset/ulna_l translation=(0 0 0)
          orientation=(0.0228627 -0.228018 0.0051689)
    WeldJoint radioulnar_r: socket_parent_frame=radioulnar_r_parent_frame socket_child_frame=radioulnar_r_child_frame
      PhysicalOffsetFrame radioulnar_r_parent_frame: socket_parent=/bodyset/ulna_r
          translation=(-0.006727 -0.01388497 0.026083) orientation=(-1.56884 0.056428 2.63614)
      PhysicalOffsetFrame radioulnar_r_child_frame: socket_parent=/bodyset/radius_r translation=(0 0 0)
          orientation=(-1.56884 0.056428 1.53614)
    WeldJoint radioulnar_l: socket_parent_frame=radioulnar_l_parent_frame socket_child_frame=radioulnar_l_child_frame
      PhysicalOffsetFrame radioulnar_l_parent_frame: socket_parent=/bodyset/ulna_l
          translation=(-0.006727 -0.01388497 -0.026083) orientation=(1.56884 -0.056428 2.63614)
      PhysicalOffsetFrame radioulnar_l_child_frame: socket_parent=/bodyset/radius_l translation=(0 0 0)
          orientation=(1.56884 -0.056428 1.53614)
    WeldJoint radius_hand_r: socket_parent_frame=radius_hand_r_parent_frame
        socket_child_frame=radius_hand_r_child_frame
      PhysicalOffsetFrame radius_hand_r_parent_frame: socket_parent=/bodyset/radius_r
          translation=(-0.008797 -0.2517603 0.01361) orientation=(-1.5708 0 -1.5708)
      PhysicalOffsetFrame radius_hand_r_child_frame: socket_parent=/bodyset/hand_r translation=(0 0 0)
          orientation=(-1.5708 0 -1.5708)
    WeldJoint radius_hand_l: socket_parent_frame=radius_hand_l_parent_frame
        socket_child_frame=radius_hand_l_child_frame
      PhysicalOffsetFrame radius_hand_l_parent_frame: socket_parent=/bodyset/radius_l
          translation=(-0.008797 -0.2517603 -0.01361) orientation=(1.5708 0 -1.5708)
      PhysicalOffsetFrame radius_hand_l_child_frame: socket_parent=/bodyset/hand_l translation=(0 0 0)
          orientation=(1.5708 0 -1.5708)
  ForceSet:
    Thelen2003Muscle [values shared by the 86 below unless stated]: FmaxTendonStrain=0.033 FmaxMuscleStrain=0.6
        KshapeActive=0.5 KshapePassive=4 Af=0.3 Flen=1.8 activation_time_constant=0.01 deactivation_time_constant=0.04
    Thelen2003Muscle glut_med1_r: max_isometric_force=819 optimal_fiber_length=0.04790465
        tendon_slack_length=0.06984229 pennation_angle_at_optimal=0.1396263
      PathPoint P1: pelvis (-0.0360017 0.0268248 0.105465)
      PathPoint P2: femur_r (-0.0187011 -0.0124962 0.0476106)
    Thelen2003Muscle glut_med2_r: max_isometric_force=573 optimal_fiber_length=0.0747538 tendon_slack_length=0.046887
        pennation_angle_at_optimal=0
      PathPoint P1: pelvis (-0.0754447 0.0392665 0.0668208)
      PathPoint P2: femur_r (-0.0221325 -0.00619469 0.0452086)
    Thelen2003Muscle glut_med3_r: max_isometric_force=653 optimal_fiber_length=0.05692571
        tendon_slack_length=0.04670376 pennation_angle_at_optimal=0.3316126
      PathPoint P1: pelvis (-0.107917 0.00926514 0.0565272)
      PathPoint P2: femur_r (-0.0265075 -0.00501984 0.0444366)
    Thelen2003Muscle glut_min1_r: max_isometric_force=270 optimal_fiber_length=0.06089982
        tendon_slack_length=0.01432937 pennation_angle_at_optimal=0.1745329
      PathPoint P1: pelvis (-0.0412078 -0.00705915 0.0921185)
      PathPoint P2: femur_r (-0.00617651 -0.0111077 0.0480395)
    Thelen2003Muscle glut_min2_r: max_isometric_force=285 optimal_fiber_length=0.05010659
        tendon_slack_length=0.02326378 pennation_angle_at_optimal=0
      PathPoint P1: pelvis (-0.0558556 -0.00573556 0.0864483)
      PathPoint P2: femur_r (-0.00823535 -0.0111077 0.0480395)
    Thelen2003Muscle glut_min3_r: max_isometric_force=323 optimal_fiber_length=0.03371841
        tendon_slack_length=0.04525366 pennation_angle_at_optimal=0.01745329
      PathPoint P1: pelvis (-0.0735917 -0.00555908 0.0746718)
      PathPoint P2: femur_r (-0.011581 -0.00886482 0.0471817)
    Thelen2003Muscle semimem_r: max_isometric_force=1288 optimal_fiber_length=0.08684036 tendon_slack_length=0.3896961
        pennation_angle_at_optimal=0.2617994
      PathPoint P1: pelvis (-0.105181 -0.086007 0.0623806)
      PathPoint P2: tibia_r (-0.0286422 -0.0393734 -0.0155639) range=(-0.558505 0.174533)
      PathPoint P3: tibia_r (-0.0222224 -0.0533817 -0.0161071)
    Thelen2003Muscle semiten_r: max_isometric_force=410 optimal_fiber_length=0.2174664 tendon_slack_length=0.2764312
        pennation_angle_at_optimal=0.08726646
      PathPoint P1: pelvis (-0.111491 -0.0969575 0.0526803)
      PathPoint P2: tibia_r (-0.0345929 -0.0319888 -0.0187409) range=(-0.331613 0.174533)
      PathPoint P3: tibia_r (-0.0273418 -0.0590992 -0.0188314)
      PathPoint P4: tibia_r (-0.00930049 -0.0834684 -0.0201648)
      PathPoint P5: tibia_r (0.00222224 -0.106965 -0.0158849)
    Thelen2003Muscle bifemlh_r: max_isometric_force=896 optimal_fiber_length=0.1184379 tendon_slack_length=0.3542272
        pennation_angle_at_optimal=0
      PathPoint P1: pelvis (-0.111146 -0.0905072 0.0605749)
      PathPoint P2: tibia_r (-0.0247739 -0.0402797 0.0242224)
      PathPoint P3: tibia_r (-0.0192594 -0.0629929 0.0282307)
    Thelen2003Muscle bifemsh_r: max_isometric_force=804 optimal_fiber_length=0.1851823 tendon_slack_length=0.09526722
        pennation_angle_at_optimal=0.4014257
      PathPoint P1: femur_r (0.00428924 -0.225465 0.0200737)
      PathPoint P2: tibia_r (-0.0247739 -0.0402797 0.0242224)
      PathPoint P3: tibia_r (-0.0192594 -0.0629929 0.0282307)
    Thelen2003Muscle sar_r: max_isometric_force=156 optimal_fiber_length=0.5397349 tendon_slack_length=0.1037952
        pennation_angle_at_optimal=0
      PathPoint P1: pelvis (-0.0135006 -0.00114711 0.108344)
      PathPoint P2: femur_r (-0.00257355 -0.38108 -0.0361154)
      PathPoint P3: tibia_r (-0.00460909 -0.046881 -0.0328398)
      PathPoint P4: tibia_r (0.00493831 -0.065902 -0.0315229)
      PathPoint P5: tibia_r (0.0200002 -0.0939859 -0.0207409)
    Thelen2003Muscle add_long_r: max_isometric_force=627 optimal_fiber_length=0.1443343 tendon_slack_length=0.1150491
        pennation_angle_at_optimal=0.1047198
      PathPoint P1: pelvis (-0.0278837 -0.0737682 0.0147424)
      PathPoint P2: femur_r (0.00428924 -0.225465 0.0200737)
    Thelen2003Muscle add_brev_r: max_isometric_force=429 optimal_fiber_length=0.1326204 tendon_slack_length=0.01994291
        pennation_angle_at_optimal=0
      PathPoint P1: pelvis (-0.0517965 -0.0807391 0.0143063)
      PathPoint P2: femur_r (0.000772064 -0.127739 0.0252207)
    Thelen2003Muscle add_mag1_r: max_isometric_force=381 optimal_fiber_length=0.08731901 tendon_slack_length=0.06022001
        pennation_angle_at_optimal=0.08726646
      PathPoint P1: pelvis (-0.0645913 -0.103593 0.0222445)
      PathPoint P2: femur_r (-0.00386032 -0.129341 0.0290811)
    Thelen2003Muscle add_mag2_r: max_isometric_force=343 optimal_fiber_length=0.131479 tendon_slack_length=0.1303924
        pennation_angle_at_optimal=0.05235988
      PathPoint P1: pelvis (-0.073327 -0.105181 0.0268679)
      PathPoint P2: femur_r (0.00463238 -0.24405 0.0194732)
    Thelen2003Muscle add_mag3_r: max_isometric_force=488 optimal_fiber_length=0.1428841 tendon_slack_length=0.271589
        pennation_angle_at_optimal=0.08726646
      PathPoint P1: pelvis (-0.0980163 -0.100708 0.0425873)
      PathPoint P2: femur_r (0.00600494 -0.409811 -0.0228188)
    Thelen2003Muscle tfl_r: max_isometric_force=233 optimal_fiber_length=0.09880501 tendon_slack_length=0.4420224
        pennation_angle_at_optimal=0.05235988
      PathPoint P1: pelvis (-0.0274425 0.0188832 0.108257)
      PathPoint P2: femur_r (0.0252207 -0.106271 0.0512136)
      PathPoint P3: femur_r (0.00463238 -0.432454 0.0306252)
      PathPoint P4: tibia_r (0.00493831 -0.0544894 0.0244446)
    Thelen2003Muscle pect_r: max_isometric_force=266 optimal_fiber_length=0.09833403 tendon_slack_length=0.03245023
        pennation_angle_at_optimal=0
      PathPoint P1: pelvis (-0.0380312 -0.0677679 0.0393423)
      PathPoint P2: femur_r (-0.0104658 -0.0877937 0.0217036)
    Thelen2003Muscle grac_r: max_isometric_force=162 optimal_fiber_length=0.3825507 tendon_slack_length=0.1369358
        pennation_angle_at_optimal=0.05235988
      PathPoint P1: pelvis (-0.065306 -0.10474 0.024373)
      PathPoint P2: tibia_r (-0.0218685 -0.0356922 -0.031062) range=(-0.436332 0.174533)
      PathPoint P3: tibia_r (-0.0159919 -0.0576558 -0.0294653)
      PathPoint P4: tibia_r (0.00493831 -0.0935383 -0.0187656)
    Thelen2003Muscle glut_max1_r: max_isometric_force=573 optimal_fiber_length=0.1317114 tendon_slack_length=0.1159431
        pennation_angle_at_optimal=0.08726646
      PathPoint P1: pelvis (-0.105446 0.0540025 0.0610634)
      PathPoint P2: pelvis (-0.113917 0.00105887 0.0772888)
      PathPoint P3: femur_r (-0.0392037 -0.0264877 0.0336277)
      PathPoint P4: femur_r (-0.0237624 -0.0604517 0.0403189)
    Thelen2003Muscle glut_max2_r: max_isometric_force=819 optimal_fiber_length=0.1413112 tendon_slack_length=0.1220852
        pennation_angle_at_optimal=0
      PathPoint P1: pelvis (-0.119035 0.0155301 0.0491124)
      PathPoint P2: pelvis (-0.121417 -0.0458845 0.0797313)
      PathPoint P3: femur_r (-0.0365444 -0.0566067 0.025135)
      PathPoint P4: femur_r (-0.0133824 -0.108514 0.0359439)
    Thelen2003Muscle glut_max3_r: max_isometric_force=552 optimal_fiber_length=0.1381372 tendon_slack_length=0.1390964
        pennation_angle_at_optimal=0.08726646
      PathPoint P1: pelvis (-0.137301 -0.0277072 0.00505954)
      PathPoint P2: pelvis (-0.134918 -0.0928279 0.0351551)
      PathPoint P3: femur_r (-0.0256497 -0.111184 0.011581)
      PathPoint P4: femur_r (-0.00514709 -0.151556 0.0352576)
    Thelen2003Muscle iliacus_r: max_isometric_force=1073 optimal_fiber_length=0.09187246 tendon_slack_length=0.09187246
        pennation_angle_at_optimal=0.1221731
      PathPoint P1: pelvis (-0.0594734 0.0322074 0.0744973)
      PathPoint P2: pelvis (-0.0227658 -0.0485317 0.0707463)
      PathPoint P3: pelvis (-0.025413 -0.0710327 0.0711825) range=(-1.5708 0.785398)
      PathPoint P4: femur_r (0.00145834 -0.0579951 0.00488974)
      PathPoint P5: femur_r (-0.0165565 -0.0663259 0.0110662)
    Thelen2003Muscle psoas_r: max_isometric_force=1113 optimal_fiber_length=0.09085087 tendon_slack_length=0.1453614
        pennation_angle_at_optimal=0.1396263
      PathPoint P1: pelvis (-0.0570909 0.0782684 0.0252105)
      PathPoint P2: pelvis (-0.021001 -0.0502965 0.0662102)
      PathPoint P3: pelvis (-0.025413 -0.0710327 0.0711825) range=(-1.5708 0.785398)
      PathPoint P4: femur_r (0.00137256 -0.0541502 0.00325982)
      PathPoint P5: femur_r (-0.0161276 -0.0637626 0.00892163)
    Thelen2003Muscle quad_fem_r: max_isometric_force=381 optimal_fiber_length=0.04607884 tendon_slack_length=0.02252743
        pennation_angle_at_optimal=0 FmaxMuscleStrain=0.9
      PathPoint P1: pelvis (-0.100858 -0.101564 0.0453614)
      PathPoint P2: femur_r (-0.032684 -0.038343 0.0313973)
    Thelen2003Muscle gem_r: max_isometric_force=164 optimal_fiber_length=0.02079838 tendon_slack_length=0.03717711
        pennation_angle_at_optimal=0 FmaxMuscleStrain=0.9
      PathPoint P1: pelvis (-0.0999753 -0.0723563 0.0622847)
      PathPoint P2: femur_r (-0.0121815 -0.00352457 0.0380027)
    Thelen2003Muscle peri_r: max_isometric_force=444 optimal_fiber_length=0.0227971 tendon_slack_length=0.1008333
        pennation_angle_at_optimal=0.1745329
      PathPoint P1: pelvis (-0.123182 0.000264718 0.0204999)
      PathPoint P2: pelvis (-0.10527 -0.0243541 0.0573123)
      PathPoint P3: femur_r (-0.0126962 -0.00384498 0.037488)
    Thelen2003Muscle rect_fem_r: max_isometric_force=1169 optimal_fiber_length=0.1195832 tendon_slack_length=0.3251824
        pennation_angle_at_optimal=0.08726646
      PathPoint P1: pelvis (-0.0260306 -0.0274425 0.0844419)
      PathPoint P2: femur_r (0.0286521 -0.430424 0.00162991) range=(-2.61799 -1.45997)
      PathPoint P3: tibia_r socket_x_coordinate=/jointset/knee_r/knee_angle_r
          socket_y_coordinate=/jointset/knee_r/knee_angle_r socket_z_coordinate=/jointset/knee_r/knee_angle_r
        x_location: MultiplierFunction: scale=0.8230521
          SimmSpline: x=(-2.0944 -1.99997 -1.5708 -1.45752 -1.39626 -1.0472 -0.698132 -0.526391 -0.349066 -0.174533 0 0.00017453 0.00034907 0.0279253 0.0872665 0.174533 2.0944)
              y=(0.0155805 0.0179938 0.0275081 0.0296564 0.0307615 0.0365695 0.0422074 0.0450902 0.048391 0.0534299 0.0617576 0.0617669 0.0617762 0.0633083 0.066994 0.0733035 0.0573481)
        y_location: MultiplierFunction: scale=1.118879
          SimmSpline: x=(-2.0944 -1.99997 -1.5708 -1.45752 -1.39626 -1.0472 -0.698132 -0.526391 -0.349066 -0.174533 0 0.00017453 0.00034907 0.0279253 0.0872665 0.174533 2.0944)
              y=(0.0234116 0.0237613 0.0251141 0.0252795 0.0253146 0.0249184 0.0242373 0.0238447 0.0234197 0.0227644 0.020984 0.0209814 0.0209788 0.0205225 0.0191754 0.0159554 -0.0673774)
        z_location: MultiplierFunction: scale=0.8230521
          SimmSpline: x=(-2.0944 0.1745) y=(0.0014 0.0014)
    Thelen2003Muscle vas_med_r: max_isometric_force=1294 optimal_fiber_length=0.09277826 tendon_slack_length=0.131349
        pennation_angle_at_optimal=0.08726646
      PathPoint P1: femur_r (0.0120099 -0.224184 0.0161276)
      PathPoint P2: femur_r (0.0305394 -0.295743 0.000772064)
      PathPoint P3: femur_r (0.0317404 -0.432347 -0.0107231) range=(-2.61799 -1.21004)
      PathPoint P4: femur_r (0.0235051 -0.454455 -0.0112378) range=(-2.61799 -1.78006)
      PathPoint P5: tibia_r socket_x_coordinate=/jointset/knee_r/knee_angle_r
          socket_y_coordinate=/jointset/knee_r/knee_angle_r socket_z_coordinate=/jointset/knee_r/knee_angle_r
        x_location: MultiplierFunction: scale=0.8230521
          SimmSpline: x=(-2.0944 -1.99997 -1.5708 -1.45752 -1.39626 -1.0472 -0.698132 -0.526391 -0.349066 -0.174533 0 0.00017453 0.00034907 0.0279253 0.0872665 0.174533 2.0944)
              y=(0.00981097 0.0122243 0.0217371 0.0238851 0.0249902 0.0307959 0.0364187 0.0392871 0.0425654 0.0475764 0.0559586 0.0559681 0.0559776 0.0575419 0.0613368 0.0679503 0.0629332)
        y_location: MultiplierFunction: scale=1.118879
          SimmSpline: x=(-2.0944 -1.99997 -1.5708 -1.45752 -1.39626 -1.0472 -0.698132 -0.526391 -0.349066 -0.174533 0 0.00017453 0.00034907 0.0279253 0.0872665 0.174533 2.0944)
              y=(0.0224154 0.0227651 0.0241265 0.0242933 0.0243287 0.0239462 0.0233593 0.0230677 0.0228342 0.0226362 0.0217917 0.0217903 0.0217889 0.0215365 0.0206842 0.0183269 -0.0656205)
        z_location: MultiplierFunction: scale=0.8230521
          SimmSpline: x=(-2.0944 2.0944) y=(-0.0146 -0.0146)
    Thelen2003Muscle vas_int_r: max_isometric_force=1365 optimal_fiber_length=0.09152583 tendon_slack_length=0.1430749
        pennation_angle_at_optimal=0.05235988
      PathPoint P1: femur_r (0.0248776 -0.205493 0.0265933)
      PathPoint P2: femur_r (0.0287379 -0.222582 0.0244487)
      PathPoint P3: femur_r (0.0294242 -0.430424 0.00471817) range=(-2.61799 -1.42)
      PathPoint P4: tibia_r socket_x_coordinate=/jointset/knee_r/knee_angle_r
          socket_y_coordinate=/jointset/knee_r/knee_angle_r socket_z_coordinate=/jointset/knee_r/knee_angle_r
        x_location: MultiplierFunction: scale=0.8230521
          SimmSpline: x=(-2.0944 -1.99997 -1.5708 -1.45752 -1.39626 -1.0472 -0.698132 -0.526391 -0.349066 -0.174533 0 0.00017453 0.00034907 0.0279253 0.0872665 0.174533 2.0944)
              y=(0.0082733 0.0106866 0.0202042 0.022353 0.0234583 0.0292715 0.0349465 0.037871 0.0412569 0.0465287 0.0554632 0.0554735 0.0554837 0.0571717 0.061272 0.0684368 0.0648818)
        y_location: MultiplierFunction: scale=1.118879
          SimmSpline: x=(-2.0944 -1.99997 -1.5708 -1.45752 -1.39626 -1.0472 -0.698132 -0.526391 -0.349066 -0.174533 0 0.00017453 0.00034907 0.0279253 0.0872665 0.174533 2.0944)
              y=(0.025599 0.0259487 0.0273124 0.0274796 0.0275151 0.0271363 0.0265737 0.0263073 0.0261187 0.0260129 0.0252923 0.0252911 0.0252898 0.0250526 0.0242191 0.0218288 -0.0685706)
        z_location: MultiplierFunction: scale=0.8230521
          SimmSpline: x=(-2.0944 2.0944) y=(0.0018 0.0018)
    Thelen2003Muscle vas_lat_r: max_isometric_force=1871 optimal_fiber_length=0.08772702 tendon_slack_length=0.163966
        pennation_angle_at_optimal=0.08726646
      PathPoint P1: femur_r (0.00411767 -0.198017 0.0299389)
      PathPoint P2: femur_r (0.0230761 -0.276732 0.035086)
      PathPoint P3: femur_r (0.0309683 -0.430424 0.0175859) range=(-2.61799 -1.21004)
      PathPoint P4: femur_r (0.0217036 -0.453174 0.0157844) range=(-2.61799 -1.92004)
      PathPoint P5: tibia_r socket_x_coordinate=/jointset/knee_r/knee_angle_r
          socket_y_coordinate=/jointset/knee_r/knee_angle_r socket_z_coordinate=/jointset/knee_r/knee_angle_r
        x_location: MultiplierFunction: scale=0.8230521
          SimmSpline: x=(-2.0944 -1.99997 -1.5708 -1.45752 -1.39626 -1.0472 -0.698132 -0.526391 -0.349066 -0.174533 0 0.00017453 0.00034907 0.0279253 0.0872665 0.174533 2.0944)
              y=(0.0142897 0.016703 0.0262145 0.0283623 0.0294674 0.0352709 0.0408785 0.0437291 0.0469704 0.0518742 0.0599557 0.0599647 0.0599738 0.0614577 0.0650351 0.0711867 0.0583766)
        y_location: MultiplierFunction: scale=1.118879
          SimmSpline: x=(-2.0944 -1.99997 -1.5708 -1.45752 -1.39626 -1.0472 -0.698132 -0.526391 -0.349066 -0.174533 0 0.00017453 0.00034907 0.0279253 0.0872665 0.174533 2.0944)
              y=(0.0215318 0.0218815 0.0232362 0.0234019 0.0234371 0.0230439 0.0223842 0.0220151 0.0216359 0.0210971 0.0195864 0.0195842 0.019582 0.01919 0.018008 0.0151073 -0.0653421)
        z_location: MultiplierFunction: scale=0.8230521
          SimmSpline: x=(-2.0944 2.0944) y=(0.0165 0.0165)
    Thelen2003Muscle med_gas_r: max_isometric_force=1558 optimal_fiber_length=0.06639381 tendon_slack_length=0.4315598
        pennation_angle_at_optimal=0.296706
      PathPoint P1: femur_r (-0.0162991 -0.419637 -0.0201594)
      PathPoint P2: femur_r (-0.0257355 -0.42957 -0.0221325) range=(-0.785398 0.174533)
      PathPoint P3: calcn_r (0 0.0272 -0.00465033)
    Thelen2003Muscle lat_gas_r: max_isometric_force=683 optimal_fiber_length=0.07093103 tendon_slack_length=0.421153
        pennation_angle_at_optimal=0.1396263
      PathPoint P1: femur_r (-0.0188727 -0.421453 0.0233335)
      PathPoint P2: femur_r (-0.0257355 -0.429143 0.0235051) range=(-0.785398 0.174533)
      PathPoint P3: calcn_r (0 0.0272 -0.00465033)
    Thelen2003Muscle soleus_r: max_isometric_force=3549 optimal_fiber_length=0.05517565 tendon_slack_length=0.2758783
        pennation_angle_at_optimal=0.4363323
      PathPoint P1: tibia_r (-0.00197533 -0.171524 0.00584367)
      PathPoint P2: calcn_r (0 0.0272 -0.00465033)
    Thelen2003Muscle tib_post_r: max_isometric_force=1588 optimal_fiber_length=0.03342404 tendon_slack_length=0.3342404
        pennation_angle_at_optimal=0.2094395
      PathPoint P1: tibia_r (-0.00773669 -0.150825 0.0015638)
      PathPoint P2: tibia_r (-0.011852 -0.453258 -0.0188479)
      PathPoint P3: calcn_r (0.0347989 0.0293059 -0.0250942)
      PathPoint P4: calcn_r (0.0644239 0.013951 -0.0246555)
    Thelen2003Muscle flex_dig_r: max_isometric_force=310 optimal_fiber_length=0.03350529 tendon_slack_length=0.3941799
        pennation_angle_at_optimal=0.1221731
      PathPoint P1: tibia_r (-0.00683133 -0.228923 -0.00148149)
      PathPoint P2: tibia_r (-0.012675 -0.453258 -0.0161318)
      PathPoint P3: calcn_r (0.0363845 0.0276388 -0.0245678)
      PathPoint P4: calcn_r (0.0590831 0.0154426 -0.0230762)
      PathPoint P5: calcn_r (0.138361 -0.00710711 0.0101781)
      PathPoint P6: toes_r (-0.00158556 -0.00684388 0.0128981)
      PathPoint P7: toes_r (0.0237834 -0.00622969 0.0188645)
      PathPoint P8: toes_r (0.0368017 -0.00526452 0.0212336)
    Thelen2003Muscle flex_hal_r: max_isometric_force=322 optimal_fiber_length=0.04158134 tendon_slack_length=0.367463
        pennation_angle_at_optimal=0.1745329
      PathPoint P1: tibia_r (-0.00650211 -0.261146 0.0200825)
      PathPoint P2: tibia_r (-0.0153088 -0.456391 -0.0143211)
      PathPoint P3: calcn_r (0.0312105 0.0242168 -0.0211458)
      PathPoint P4: calcn_r (0.0866218 0.00596646 -0.022462)
      PathPoint P5: calcn_r (0.144036 -0.00465033 -0.0236026)
      PathPoint P6: toes_r (0.0129348 -0.00561549 -0.0232516)
      PathPoint P7: toes_r (0.0468993 -0.00894969 -0.0158813)
    Thelen2003Muscle tib_ant_r: max_isometric_force=905 optimal_fiber_length=0.1061509 tendon_slack_length=0.2415475
        pennation_angle_at_optimal=0.08726646
      PathPoint P1: tibia_r (0.0147326 -0.181706 0.0094651)
      PathPoint P2: tibia_r (0.0270784 -0.442069 -0.014568)
      PathPoint P3: calcn_r (0.0973034 0.0156181 -0.0267613)
    Thelen2003Muscle per_brev_r: max_isometric_force=435 optimal_fiber_length=0.05299912 tendon_slack_length=0.1706572
        pennation_angle_at_optimal=0.08726646
      PathPoint P1: tibia_r (-0.00576137 -0.296055 0.0267492)
      PathPoint P2: tibia_r (-0.0162964 -0.468139 0.0232924)
      PathPoint P3: tibia_r (-0.011852 -0.480559 0.0237862)
      PathPoint P4: calcn_r (0.0393053 0.0236904 0.0204439)
      PathPoint P5: calcn_r (0.0564961 0.0192155 0.0300955)
    Thelen2003Muscle per_long_r: max_isometric_force=943 optimal_fiber_length=0.05076942 tendon_slack_length=0.3574582
        pennation_angle_at_optimal=0.1745329
      PathPoint P1: tibia_r (0.000411526 -0.17544 0.0297945)
      PathPoint P2: tibia_r (-0.0170372 -0.470489 0.0235393)
      PathPoint P3: tibia_r (-0.0133334 -0.483244 0.0237862)
      PathPoint P4: calcn_r (0.0365514 0.0201807 0.019391)
      PathPoint P5: calcn_r (0.0568299 0.00930066 0.0249187)
      PathPoint P6: calcn_r (0.0710999 0.0060542 0.0103536)
      PathPoint P7: calcn_r (0.100391 0.00745808 -0.0161445)
    Thelen2003Muscle per_tert_r: max_isometric_force=180 optimal_fiber_length=0.0848699 tendon_slack_length=0.1074303
        pennation_angle_at_optimal=0.2268928
      PathPoint P1: tibia_r (0.000823052 -0.313734 0.0190125)
      PathPoint P2: tibia_r (0.0188479 -0.455272 0.0130865)
      PathPoint P3: calcn_r (0.0715172 0.0200052 0.0262349)
    Thelen2003Muscle ext_dig_r: max_isometric_force=512 optimal_fiber_length=0.1043097 tendon_slack_length=0.3528123
        pennation_angle_at_optimal=0.1396263
      PathPoint P1: tibia_r (0.00263377 -0.154517 0.0227162)
      PathPoint P2: tibia_r (0.0237862 -0.448335 0.00592598)
      PathPoint P3: calcn_r (0.0769415 0.0340439 -8.77421e-5)
      PathPoint P4: calcn_r (0.134856 0.00482581 0.0114065)
      PathPoint P5: toes_r (0.000250352 0.00412388 0.0134245)
      PathPoint P6: toes_r (0.0369686 -0.000350968 0.0219355)
    Thelen2003Muscle ext_hal_r: max_isometric_force=162 optimal_fiber_length=0.1119414 tendon_slack_length=0.3075869
        pennation_angle_at_optimal=0.1047198
      PathPoint P1: tibia_r (0.000987663 -0.197706 0.0187656)
      PathPoint P2: tibia_r (0.0268315 -0.445873 -0.00699594)
      PathPoint P3: calcn_r (0.0809471 0.0341317 -0.0185136)
      PathPoint P4: calcn_r (0.107902 0.0271123 -0.0225497)
      PathPoint P5: calcn_r (0.144703 0.0121961 -0.0245678)
      PathPoint P6: toes_r (0.0248683 0.00359742 -0.0214968)
      PathPoint P7: toes_r (0.0469827 0.00298323 -0.01632)
    Thelen2003Muscle glut_med1_l: max_isometric_force=819 optimal_fiber_length=0.04790465
        tendon_slack_length=0.06984229 pennation_angle_at_optimal=0.1396263
      PathPoint P1: pelvis (-0.0360017 0.0268248 -0.105465)
      PathPoint P2: femur_l (-0.0187011 -0.0124962 -0.0476106)
    Thelen2003Muscle glut_med2_l: max_isometric_force=573 optimal_fiber_length=0.0747538 tendon_slack_length=0.046887
        pennation_angle_at_optimal=0
      PathPoint P1: pelvis (-0.0754447 0.0392665 -0.0668208)
      PathPoint P2: femur_l (-0.0221325 -0.00619469 -0.0452086)
    Thelen2003Muscle glut_med3_l: max_isometric_force=653 optimal_fiber_length=0.05692571
        tendon_slack_length=0.04670376 pennation_angle_at_optimal=0.3316126
      PathPoint P1: pelvis (-0.107917 0.00926514 -0.0565272)
      PathPoint P2: femur_l (-0.0265075 -0.00501984 -0.0444366)
    Thelen2003Muscle glut_min1_l: max_isometric_force=270 optimal_fiber_length=0.06089982
        tendon_slack_length=0.01432937 pennation_angle_at_optimal=0.1745329
      PathPoint P1: pelvis (-0.0412078 -0.00705915 -0.0921185)
      PathPoint P2: femur_l (-0.00617651 -0.0111077 -0.0480395)
    Thelen2003Muscle glut_min2_l: max_isometric_force=285 optimal_fiber_length=0.05010659
        tendon_slack_length=0.02326378 pennation_angle_at_optimal=0
      PathPoint P1: pelvis (-0.0558556 -0.00573556 -0.0864483)
      PathPoint P2: femur_l (-0.00823535 -0.0111077 -0.0480395)
    Thelen2003Muscle glut_min3_l: max_isometric_force=323 optimal_fiber_length=0.03371841
        tendon_slack_length=0.04525366 pennation_angle_at_optimal=0.01745329
      PathPoint P1: pelvis (-0.0735917 -0.00555908 -0.0746718)
      PathPoint P2: femur_l (-0.011581 -0.00886482 -0.0471817)
    Thelen2003Muscle semimem_l: max_isometric_force=1288 optimal_fiber_length=0.08684036 tendon_slack_length=0.3896961
        pennation_angle_at_optimal=0.2617994
      PathPoint P1: pelvis (-0.105181 -0.086007 -0.0623806)
      PathPoint P2: tibia_l (-0.0286422 -0.0393734 0.0155639) range=(-0.558505 0.174533)
      PathPoint P3: tibia_l (-0.0222224 -0.0533817 0.0161071)
    Thelen2003Muscle semiten_l: max_isometric_force=410 optimal_fiber_length=0.2174664 tendon_slack_length=0.2764312
        pennation_angle_at_optimal=0.08726646
      PathPoint P1: pelvis (-0.111491 -0.0969575 -0.0526803)
      PathPoint P2: tibia_l (-0.0345929 -0.0319888 0.0187409) range=(-0.331613 0.174533)
      PathPoint P3: tibia_l (-0.0273418 -0.0590992 0.0188314)
      PathPoint P4: tibia_l (-0.00930049 -0.0834684 0.0201648)
      PathPoint P5: tibia_l (0.00222224 -0.106965 0.0158849)
    Thelen2003Muscle bifemlh_l: max_isometric_force=896 optimal_fiber_length=0.1184379 tendon_slack_length=0.3542272
        pennation_angle_at_optimal=0
      PathPoint P1: pelvis (-0.111146 -0.0905072 -0.0605749)
      PathPoint P2: tibia_l (-0.0247739 -0.0402797 -0.0242224)
      PathPoint P3: tibia_l (-0.0192594 -0.0629929 -0.0282307)
    Thelen2003Muscle bifemsh_l: max_isometric_force=804 optimal_fiber_length=0.1851823 tendon_slack_length=0.09526722
        pennation_angle_at_optimal=0.4014257
      PathPoint P1: femur_l (0.00428924 -0.225465 -0.0200737)
      PathPoint P2: tibia_l (-0.0247739 -0.0402797 -0.0242224)
      PathPoint P3: tibia_l (-0.0192594 -0.0629929 -0.0282307)
    Thelen2003Muscle sar_l: max_isometric_force=156 optimal_fiber_length=0.5397349 tendon_slack_length=0.1037952
        pennation_angle_at_optimal=0
      PathPoint P1: pelvis (-0.0135006 -0.00114711 -0.108344)
      PathPoint P2: femur_l (-0.00257355 -0.38108 0.0361154)
      PathPoint P3: tibia_l (-0.00460909 -0.046881 0.0328398)
      PathPoint P4: tibia_l (0.00493831 -0.065902 0.0315229)
      PathPoint P5: tibia_l (0.0200002 -0.0939859 0.0207409)
    Thelen2003Muscle add_long_l: max_isometric_force=627 optimal_fiber_length=0.1443343 tendon_slack_length=0.1150491
        pennation_angle_at_optimal=0.1047198
      PathPoint P1: pelvis (-0.0278837 -0.0737682 -0.0147424)
      PathPoint P2: femur_l (0.00428924 -0.225465 -0.0200737)
    Thelen2003Muscle add_brev_l: max_isometric_force=429 optimal_fiber_length=0.1326204 tendon_slack_length=0.01994291
        pennation_angle_at_optimal=0
      PathPoint P1: pelvis (-0.0517965 -0.0807391 -0.0143063)
      PathPoint P2: femur_l (0.000772064 -0.127739 -0.0252207)
    Thelen2003Muscle add_mag1_l: max_isometric_force=381 optimal_fiber_length=0.08731901 tendon_slack_length=0.06022001
        pennation_angle_at_optimal=0.08726646
      PathPoint P1: pelvis (-0.0645913 -0.103593 -0.0222445)
      PathPoint P2: femur_l (-0.00386032 -0.129341 -0.0290811)
    Thelen2003Muscle add_mag2_l: max_isometric_force=343 optimal_fiber_length=0.131479 tendon_slack_length=0.1303924
        pennation_angle_at_optimal=0.05235988
      PathPoint P1: pelvis (-0.073327 -0.105181 -0.0268679)
      PathPoint P2: femur_l (0.00463238 -0.24405 -0.0194732)
    Thelen2003Muscle add_mag3_l: max_isometric_force=488 optimal_fiber_length=0.1428841 tendon_slack_length=0.271589
        pennation_angle_at_optimal=0.08726646
      PathPoint P1: pelvis (-0.0980163 -0.100708 -0.0425873)
      PathPoint P2: femur_l (0.00600494 -0.409811 0.0228188)
    Thelen2003Muscle tfl_l: max_isometric_force=233 optimal_fiber_length=0.09880501 tendon_slack_length=0.4420224
        pennation_angle_at_optimal=0.05235988
      PathPoint P1: pelvis (-0.0274425 0.0188832 -0.108257)
      PathPoint P2: femur_l (0.0252207 -0.106271 -0.0512136)
      PathPoint P3: femur_l (0.00463238 -0.432454 -0.0306252)
      PathPoint P4: tibia_l (0.00493831 -0.0544894 -0.0244446)
    Thelen2003Muscle pect_l: max_isometric_force=266 optimal_fiber_length=0.09833403 tendon_slack_length=0.03245023
        pennation_angle_at_optimal=0
      PathPoint P1: pelvis (-0.0380312 -0.0677679 -0.0393423)
      PathPoint P2: femur_l (-0.0104658 -0.0877937 -0.0217036)
    Thelen2003Muscle grac_l: max_isometric_force=162 optimal_fiber_length=0.3825507 tendon_slack_length=0.1369358
        pennation_angle_at_optimal=0.05235988
      PathPoint P1: pelvis (-0.065306 -0.10474 -0.024373)
      PathPoint P2: tibia_l (-0.0218685 -0.0356922 0.031062) range=(-0.436332 0.174533)
      PathPoint P3: tibia_l (-0.0159919 -0.0576558 0.0294653)
      PathPoint P4: tibia_l (0.00493831 -0.0935383 0.0187656)
    Thelen2003Muscle glut_max1_l: max_isometric_force=573 optimal_fiber_length=0.1317114 tendon_slack_length=0.1159431
        pennation_angle_at_optimal=0.08726646
      PathPoint P1: pelvis (-0.105446 0.0540025 -0.0610634)
      PathPoint P2: pelvis (-0.113917 0.00105887 -0.0772888)
      PathPoint P3: femur_l (-0.0392037 -0.0264877 -0.0336277)
      PathPoint P4: femur_l (-0.0237624 -0.0604517 -0.0403189)
    Thelen2003Muscle glut_max2_l: max_isometric_force=819 optimal_fiber_length=0.1413112 tendon_slack_length=0.1220852
        pennation_angle_at_optimal=0
      PathPoint P1: pelvis (-0.119035 0.0155301 -0.0491124)
      PathPoint P2: pelvis (-0.121417 -0.0458845 -0.0797313)
      PathPoint P3: femur_l (-0.0365444 -0.0566067 -0.025135)
      PathPoint P4: femur_l (-0.0133824 -0.108514 -0.0359439)
    Thelen2003Muscle glut_max3_l: max_isometric_force=552 optimal_fiber_length=0.1381372 tendon_slack_length=0.1390964
        pennation_angle_at_optimal=0.08726646
      PathPoint P1: pelvis (-0.137301 -0.0277072 -0.00505954)
      PathPoint P2: pelvis (-0.134918 -0.0928279 -0.0351551)
      PathPoint P3: femur_l (-0.0256497 -0.111184 -0.011581)
      PathPoint P4: femur_l (-0.00514709 -0.151556 -0.0352576)
    Thelen2003Muscle iliacus_l: max_isometric_force=1073 optimal_fiber_length=0.09187246 tendon_slack_length=0.09187246
        pennation_angle_at_optimal=0.1221731
      PathPoint P1: pelvis (-0.0594734 0.0322074 -0.0744973)
      PathPoint P2: pelvis (-0.0227658 -0.0485317 -0.0707463)
      PathPoint P3: pelvis (-0.025413 -0.0710327 -0.0711825) range=(-1.5708 0.785398)
      PathPoint P4: femur_l (0.00145834 -0.0579951 -0.00488974)
      PathPoint P5: femur_l (-0.0165565 -0.0663259 -0.0110662)
    Thelen2003Muscle psoas_l: max_isometric_force=1113 optimal_fiber_length=0.09085087 tendon_slack_length=0.1453614
        pennation_angle_at_optimal=0.1396263
      PathPoint P1: pelvis (-0.0570909 0.0782684 -0.0252105)
      PathPoint P2: pelvis (-0.021001 -0.0502965 -0.0662102)
      PathPoint P3: pelvis (-0.025413 -0.0710327 -0.0711825) range=(-1.5708 0.785398)
      PathPoint P4: femur_l (0.00137256 -0.0541502 -0.00325982)
      PathPoint P5: femur_l (-0.0161276 -0.0637626 -0.00892163)
    Thelen2003Muscle quad_fem_l: max_isometric_force=381 optimal_fiber_length=0.04607884 tendon_slack_length=0.02252743
        pennation_angle_at_optimal=0 FmaxMuscleStrain=0.9
      PathPoint P1: pelvis (-0.100858 -0.101564 -0.0453614)
      PathPoint P2: femur_l (-0.032684 -0.038343 -0.0313973)
    Thelen2003Muscle gem_l: max_isometric_force=164 optimal_fiber_length=0.02079838 tendon_slack_length=0.03717711
        pennation_angle_at_optimal=0 FmaxMuscleStrain=0.9
      PathPoint P1: pelvis (-0.0999753 -0.0723563 -0.0622847)
      PathPoint P2: femur_l (-0.0121815 -0.00352457 -0.0380027)
    Thelen2003Muscle peri_l: max_isometric_force=444 optimal_fiber_length=0.0227971 tendon_slack_length=0.1008333
        pennation_angle_at_optimal=0.1745329
      PathPoint P1: pelvis (-0.123182 0.000264718 -0.0204999)
      PathPoint P2: pelvis (-0.10527 -0.0243541 -0.0573123)
      PathPoint P3: femur_l (-0.0126962 -0.00384498 -0.037488)
    Thelen2003Muscle rect_fem_l: max_isometric_force=1169 optimal_fiber_length=0.1195832 tendon_slack_length=0.3251824
        pennation_angle_at_optimal=0.08726646
      PathPoint P1: pelvis (-0.0260306 -0.0274425 -0.0844419)
      PathPoint P2: femur_l (0.0286521 -0.430424 -0.00162991) range=(-2.61799 -1.45997)
      PathPoint P3: tibia_l socket_x_coordinate=/jointset/knee_l/knee_angle_l
          socket_y_coordinate=/jointset/knee_l/knee_angle_l socket_z_coordinate=/jointset/knee_l/knee_angle_l
        x_location: MultiplierFunction: scale=0.8230521
          SimmSpline: x=(-2.0944 -1.99997 -1.5708 -1.45752 -1.39626 -1.0472 -0.698132 -0.526391 -0.349066 -0.174533 0 0.00017453 0.00034907 0.0279253 0.0872665 0.174533 2.0944)
              y=(0.0155805 0.0179938 0.0275081 0.0296564 0.0307615 0.0365695 0.0422074 0.0450902 0.048391 0.0534299 0.0617576 0.0617669 0.0617762 0.0633083 0.066994 0.0733035 0.0573481)
        y_location: MultiplierFunction: scale=1.118879
          SimmSpline: x=(-2.0944 -1.99997 -1.5708 -1.45752 -1.39626 -1.0472 -0.698132 -0.526391 -0.349066 -0.174533 0 0.00017453 0.00034907 0.0279253 0.0872665 0.174533 2.0944)
              y=(0.0234116 0.0237613 0.0251141 0.0252795 0.0253146 0.0249184 0.0242373 0.0238447 0.0234197 0.0227644 0.020984 0.0209814 0.0209788 0.0205225 0.0191754 0.0159554 -0.0673774)
        z_location: MultiplierFunction: scale=0.8230521
          SimmSpline: x=(-2.0944 0.1745) y=(-0.0014 -0.0014)
    Thelen2003Muscle vas_med_l: max_isometric_force=1294 optimal_fiber_length=0.09277826 tendon_slack_length=0.131349
        pennation_angle_at_optimal=0.08726646
      PathPoint P1: femur_l (0.0120099 -0.224184 -0.0161276)
      PathPoint P2: femur_l (0.0305394 -0.295743 -0.000772064)
      PathPoint P3: femur_l (0.0317404 -0.432347 0.0107231) range=(-2.61799 -1.21004)
      PathPoint P4: femur_l (0.0235051 -0.454455 0.0112378) range=(-2.61799 -1.78006)
      PathPoint P5: tibia_l socket_x_coordinate=/jointset/knee_l/knee_angle_l
          socket_y_coordinate=/jointset/knee_l/knee_angle_l socket_z_coordinate=/jointset/knee_l/knee_angle_l
        x_location: MultiplierFunction: scale=0.8230521
          SimmSpline: x=(-2.0944 -1.99997 -1.5708 -1.45752 -1.39626 -1.0472 -0.698132 -0.526391 -0.349066 -0.174533 0 0.00017453 0.00034907 0.0279253 0.0872665 0.174533 2.0944)
              y=(0.00981097 0.0122243 0.0217371 0.0238851 0.0249902 0.0307959 0.0364187 0.0392871 0.0425654 0.0475764 0.0559586 0.0559681 0.0559776 0.0575419 0.0613368 0.0679503 0.0629332)
        y_location: MultiplierFunction: scale=1.118879
          SimmSpline: x=(-2.0944 -1.99997 -1.5708 -1.45752 -1.39626 -1.0472 -0.698132 -0.526391 -0.349066 -0.174533 0 0.00017453 0.00034907 0.0279253 0.0872665 0.174533 2.0944)
              y=(0.0224154 0.0227651 0.0241265 0.0242933 0.0243287 0.0239462 0.0233593 0.0230677 0.0228342 0.0226362 0.0217917 0.0217903 0.0217889 0.0215365 0.0206842 0.0183269 -0.0656205)
        z_location: MultiplierFunction: scale=0.8230521
          SimmSpline: x=(-2.0944 2.0944) y=(0.0146 0.0146)
    Thelen2003Muscle vas_int_l: max_isometric_force=1365 optimal_fiber_length=0.09152583 tendon_slack_length=0.1430749
        pennation_angle_at_optimal=0.05235988
      PathPoint P1: femur_l (0.0248776 -0.205493 -0.0265933)
      PathPoint P2: femur_l (0.0287379 -0.222582 -0.0244487)
      PathPoint P3: femur_l (0.0294242 -0.430424 -0.00471817) range=(-2.61799 -1.42)
      PathPoint P4: tibia_l socket_x_coordinate=/jointset/knee_l/knee_angle_l
          socket_y_coordinate=/jointset/knee_l/knee_angle_l socket_z_coordinate=/jointset/knee_l/knee_angle_l
        x_location: MultiplierFunction: scale=0.8230521
          SimmSpline: x=(-2.0944 -1.99997 -1.5708 -1.45752 -1.39626 -1.0472 -0.698132 -0.526391 -0.349066 -0.174533 0 0.00017453 0.00034907 0.0279253 0.0872665 0.174533 2.0944)
              y=(0.0155805 0.0179938 0.0275081 0.0296564 0.0307615 0.0365695 0.0422074 0.0450902 0.048391 0.0534299 0.0617576 0.0617669 0.0617762 0.0633083 0.066994 0.0733035 0.0573481)
        y_location: MultiplierFunction: scale=1.118879
          SimmSpline: x=(-2.0944 -1.99997 -1.5708 -1.45752 -1.39626 -1.0472 -0.698132 -0.526391 -0.349066 -0.174533 0 0.00017453 0.00034907 0.0279253 0.0872665 0.174533 2.0944)
              y=(0.0234116 0.0237613 0.0251141 0.0252795 0.0253146 0.0249184 0.0242373 0.0238447 0.0234197 0.0227644 0.020984 0.0209814 0.0209788 0.0205225 0.0191754 0.0159554 -0.0673774)
        z_location: MultiplierFunction: scale=0.8230521
          SimmSpline: x=(-2.0944 0.1745) y=(-0.0014 -0.0014)
    Thelen2003Muscle vas_lat_l: max_isometric_force=1871 optimal_fiber_length=0.08772702 tendon_slack_length=0.163966
        pennation_angle_at_optimal=0.08726646
      PathPoint P1: femur_l (0.00411767 -0.198017 -0.0299389)
      PathPoint P2: femur_l (0.0230761 -0.276732 -0.035086)
      PathPoint P3: femur_l (0.0309683 -0.430424 -0.0175859) range=(-2.61799 -1.21004)
      PathPoint P4: femur_l (0.0217036 -0.453174 -0.0157844) range=(-2.61799 -1.92004)
      PathPoint P5: tibia_l socket_x_coordinate=/jointset/knee_l/knee_angle_l
          socket_y_coordinate=/jointset/knee_l/knee_angle_l socket_z_coordinate=/jointset/knee_l/knee_angle_l
        x_location: MultiplierFunction: scale=0.8230521
          SimmSpline: x=(-2.0944 -1.99997 -1.5708 -1.45752 -1.39626 -1.0472 -0.698132 -0.526391 -0.349066 -0.174533 0 0.00017453 0.00034907 0.0279253 0.0872665 0.174533 2.0944)
              y=(0.0142897 0.016703 0.0262145 0.0283623 0.0294674 0.0352709 0.0408785 0.0437291 0.0469704 0.0518742 0.0599557 0.0599647 0.0599738 0.0614577 0.0650351 0.0711867 0.0583766)
        y_location: MultiplierFunction: scale=1.118879
          SimmSpline: x=(-2.0944 -1.99997 -1.5708 -1.45752 -1.39626 -1.0472 -0.698132 -0.526391 -0.349066 -0.174533 0 0.00017453 0.00034907 0.0279253 0.0872665 0.174533 2.0944)
              y=(0.0215318 0.0218815 0.0232362 0.0234019 0.0234371 0.0230439 0.0223842 0.0220151 0.0216359 0.0210971 0.0195864 0.0195842 0.019582 0.01919 0.018008 0.0151073 -0.0653421)
        z_location: MultiplierFunction: scale=0.8230521
          SimmSpline: x=(-2.0944 2.0944) y=(-0.0165 -0.0165)
    Thelen2003Muscle med_gas_l: max_isometric_force=1558 optimal_fiber_length=0.06639381 tendon_slack_length=0.4315598
        pennation_angle_at_optimal=0.296706
      PathPoint P1: femur_l (-0.0162991 -0.419637 0.0201594)
      PathPoint P2: femur_l (-0.0257355 -0.42957 0.0221325) range=(-0.785398 0.174533)
      PathPoint P3: calcn_l (0 0.0272 0.00465033)
    Thelen2003Muscle lat_gas_l: max_isometric_force=683 optimal_fiber_length=0.07093103 tendon_slack_length=0.421153
        pennation_angle_at_optimal=0.1396263
      PathPoint P1: femur_l (-0.0188727 -0.421453 -0.0233335)
      PathPoint P2: femur_l (-0.0257355 -0.429143 -0.0235051) range=(-0.785398 0.174533)
      PathPoint P3: calcn_l (0 0.0272 0.00465033)
    Thelen2003Muscle soleus_l: max_isometric_force=3549 optimal_fiber_length=0.05517565 tendon_slack_length=0.2758783
        pennation_angle_at_optimal=0.4363323
      PathPoint P1: tibia_l (-0.00197533 -0.171524 -0.00584367)
      PathPoint P2: calcn_l (0 0.0272 0.00465033)
    Thelen2003Muscle tib_post_l: max_isometric_force=1588 optimal_fiber_length=0.03342404 tendon_slack_length=0.3342404
        pennation_angle_at_optimal=0.2094395
      PathPoint P1: tibia_l (-0.00773669 -0.150825 -0.0015638)
      PathPoint P2: tibia_l (-0.011852 -0.453258 0.0188479)
      PathPoint P3: calcn_l (0.0347989 0.0293059 0.0250942)
      PathPoint P4: calcn_l (0.0644239 0.013951 0.0246555)
    Thelen2003Muscle flex_dig_l: max_isometric_force=310 optimal_fiber_length=0.03350529 tendon_slack_length=0.3941799
        pennation_angle_at_optimal=0.1221731
      PathPoint P1: tibia_l (-0.00683133 -0.228923 0.00148149)
      PathPoint P2: tibia_l (-0.012675 -0.453258 0.0161318)
      PathPoint P3: calcn_l (0.0363845 0.0276388 0.0245678)
      PathPoint P4: calcn_l (0.0590831 0.0154426 0.0230762)
      PathPoint P5: calcn_l (0.138361 -0.00710711 -0.0101781)
      PathPoint P6: toes_l (-0.00158556 -0.00684388 -0.0128981)
      PathPoint P7: toes_l (0.0237834 -0.00622969 -0.0188645)
      PathPoint P8: toes_l (0.0368017 -0.00526452 -0.0212336)
    Thelen2003Muscle flex_hal_l: max_isometric_force=322 optimal_fiber_length=0.04158134 tendon_slack_length=0.367463
        pennation_angle_at_optimal=0.1745329
      PathPoint P1: tibia_l (-0.00650211 -0.261146 -0.0200825)
      PathPoint P2: tibia_l (-0.0153088 -0.456391 0.0143211)
      PathPoint P3: calcn_l (0.0312105 0.0242168 0.0211458)
      PathPoint P4: calcn_l (0.0866218 0.00596646 0.022462)
      PathPoint P5: calcn_l (0.144036 -0.00465033 0.0236026)
      PathPoint P6: toes_l (0.0129348 -0.00561549 0.0232516)
      PathPoint P7: toes_l (0.0468993 -0.00894969 0.0158813)
    Thelen2003Muscle tib_ant_l: max_isometric_force=905 optimal_fiber_length=0.1061509 tendon_slack_length=0.2415475
        pennation_angle_at_optimal=0.08726646
      PathPoint P1: tibia_l (0.0147326 -0.181706 -0.0094651)
      PathPoint P2: tibia_l (0.0270784 -0.442069 0.014568)
      PathPoint P3: calcn_l (0.0973034 0.0156181 0.0267613)
    Thelen2003Muscle per_brev_l: max_isometric_force=435 optimal_fiber_length=0.05299912 tendon_slack_length=0.1706572
        pennation_angle_at_optimal=0.08726646
      PathPoint P1: tibia_l (-0.00576137 -0.296055 -0.0267492)
      PathPoint P2: tibia_l (-0.0162964 -0.468139 -0.0232924)
      PathPoint P3: tibia_l (-0.011852 -0.480559 -0.0237862)
      PathPoint P4: calcn_l (0.0393053 0.0236904 -0.0204439)
      PathPoint P5: calcn_l (0.0564961 0.0192155 -0.0300955)
    Thelen2003Muscle per_long_l: max_isometric_force=943 optimal_fiber_length=0.05076942 tendon_slack_length=0.3574582
        pennation_angle_at_optimal=0.1745329
      PathPoint P1: tibia_l (0.000411526 -0.17544 -0.0297945)
      PathPoint P2: tibia_l (-0.0170372 -0.470489 -0.0235393)
      PathPoint P3: tibia_l (-0.0133334 -0.483244 -0.0237862)
      PathPoint P4: calcn_l (0.0365514 0.0201807 -0.019391)
      PathPoint P5: calcn_l (0.0568299 0.00930066 -0.0249187)
      PathPoint P6: calcn_l (0.0710999 0.0060542 -0.0103536)
      PathPoint P7: calcn_l (0.100391 0.00745808 0.0161445)
    Thelen2003Muscle per_tert_l: max_isometric_force=180 optimal_fiber_length=0.0848699 tendon_slack_length=0.1074303
        pennation_angle_at_optimal=0.2268928
      PathPoint P1: tibia_l (0.000823052 -0.313734 -0.0190125)
      PathPoint P2: tibia_l (0.0188479 -0.455272 -0.0130865)
      PathPoint P3: calcn_l (0.0715172 0.0200052 -0.0262349)
    Thelen2003Muscle ext_dig_l: max_isometric_force=512 optimal_fiber_length=0.1043097 tendon_slack_length=0.3528123
        pennation_angle_at_optimal=0.1396263
      PathPoint P1: tibia_l (0.00263377 -0.154517 -0.0227162)
      PathPoint P2: tibia_l (0.0237862 -0.448335 -0.00592598)
      PathPoint P3: calcn_l (0.0769415 0.0340439 8.77421e-5)
      PathPoint P4: calcn_l (0.134856 0.00482581 -0.0114065)
      PathPoint P5: toes_l (0.000250352 0.00412388 -0.0134245)
      PathPoint P6: toes_l (0.0369686 -0.000350968 -0.0219355)
    Thelen2003Muscle ext_hal_l: max_isometric_force=162 optimal_fiber_length=0.1119414 tendon_slack_length=0.3075869
        pennation_angle_at_optimal=0.1047198
      PathPoint P1: tibia_l (0.000987663 -0.197706 -0.0187656)
      PathPoint P2: tibia_l (0.0268315 -0.445873 0.00699594)
      PathPoint P3: calcn_l (0.0809471 0.0341317 0.0185136)
      PathPoint P4: calcn_l (0.107902 0.0271123 0.0225497)
      PathPoint P5: calcn_l (0.144703 0.0121961 0.0245678)
      PathPoint P6: toes_l (0.0248683 0.00359742 0.0214968)
      PathPoint P7: toes_l (0.0469827 0.00298323 0.01632)
    Millard2012EquilibriumMuscle [values shared by the 50 below unless stated]: min_control=0.01 max_control=1
        pennation_angle_at_optimal=0 fiber_damping=0.1
      ActiveForceLengthCurve: minimum_value=0
      ForceVelocityCurve: concentric_slope_at_vmax=0 concentric_slope_near_vmax=0.25 isometric_slope=5
          eccentric_slope_at_vmax=0 eccentric_slope_near_vmax=0.15 max_eccentric_velocity_force_multiplier=1.4
      TendonForceLengthCurve
      FiberForceLengthCurve: strain_at_zero_force=0 strain_at_one_norm_force=0.7 stiffness_at_low_force=0.2
          stiffness_at_one_norm_force=2.857143 curviness=0.75
    Millard2012EquilibriumMuscle ercspn_r: max_isometric_force=2500 optimal_fiber_length=0.1355243
        tendon_slack_length=0.03388059 ignore_tendon_compliance=true
      Scholz2015GeometryPath path: algorithm=minimum_length
        path_elements:
          Scholz2015GeometryPathPoint path_point_0:
            PathPoint: pelvis (-0.14 0.0463104 0.0500775)
          Scholz2015GeometryPathPoint path_point_1:
            PathPoint: torso (-0.075 -0.2440445 0.030086)
      FiberForceLengthCurve: strain_at_zero_force=0 strain_at_one_norm_force=0.9 stiffness_at_low_force=0.2
          stiffness_at_one_norm_force=2.857143 curviness=0.75
    Millard2012EquilibriumMuscle ercspn_l: max_isometric_force=2500 optimal_fiber_length=0.1355243
        tendon_slack_length=0.03388059 ignore_tendon_compliance=true
      Scholz2015GeometryPath path: algorithm=minimum_length
        path_elements:
          Scholz2015GeometryPathPoint path_point_0:
            PathPoint: pelvis (-0.14 0.0463104 -0.0500775)
          Scholz2015GeometryPathPoint path_point_1:
            PathPoint: torso (-0.075 -0.2440445 -0.030086)
      FiberForceLengthCurve: strain_at_zero_force=0 strain_at_one_norm_force=0.9 stiffness_at_low_force=0.2
          stiffness_at_one_norm_force=2.857143 curviness=0.75
    Millard2012EquilibriumMuscle coracobrachialis_r: max_isometric_force=648.2 optimal_fiber_length=0.08121961
        tendon_slack_length=0.1236726
      Scholz2015GeometryPath path: algorithm=minimum_length
        path_elements:
          Scholz2015GeometryPathPoint path_point_0:
            PathPoint: scapula_r (0.0083 -0.04223464 -0.03019345)
          Scholz2015GeometryPathPoint path_point_1:
            PathPoint: humerus_r (-0.00231 -0.1733185 -0.00933)
    Millard2012EquilibriumMuscle deltoideus_ant_r: max_isometric_force=1986.6 optimal_fiber_length=0.1233256
        tendon_slack_length=0.1092709 pennation_angle_at_optimal=0.08726646 ignore_tendon_compliance=true
      Scholz2015GeometryPath path: algorithm=minimum_length
        path_elements:
          Scholz2015GeometryPathPoint path_point_0:
            PathPoint: clavicle_r (-0.0228 0.0195 0.09036545)
          Scholz2015GeometryPathPoint path_point_1:
            PathPoint: scapula_r (0.0196 -0.00657426 0.0111748)
          Scholz2015GeometryPathPoint path_point_2:
            PathPoint: humerus_r (0.00664 -0.1312439 0.00115)
    Millard2012EquilibriumMuscle deltoideus_med_r: max_isometric_force=1324.4 optimal_fiber_length=0.0849428
        tendon_slack_length=0.07267833 pennation_angle_at_optimal=0.08726646 ignore_tendon_compliance=true
      Scholz2015GeometryPath path: algorithm=minimum_length
        path_elements:
          Scholz2015GeometryPathPoint path_point_0:
            PathPoint: scapula_r (-0.016 0.002022083 0.0083811)
          Scholz2015GeometryPathPoint path_point_1:
            PathPoint: scapula_r (-0.0051 -0.00667387 0.0333095)
          Scholz2015GeometryPathPoint path_point_2:
            PathPoint: humerus_r (-0.0043 -0.1201277 0.00385)
    Millard2012EquilibriumMuscle deltoideus_post_r: max_isometric_force=882.9333 optimal_fiber_length=0.08345889
        tendon_slack_length=0.06683747 pennation_angle_at_optimal=0.08726646 ignore_tendon_compliance=true
      Scholz2015GeometryPath path: algorithm=minimum_length
        path_elements:
          Scholz2015GeometryPathPoint path_point_0:
            PathPoint: scapula_r (-0.0577 -0.00687309 -0.0292264)
          Scholz2015GeometryPathPoint path_point_1:
            PathPoint: scapula_r (-0.055 -0.03227364 0.007897575)
          Scholz2015GeometryPathPoint path_point_2:
            PathPoint: humerus_r (-0.0048 -0.1030349 0.00624)
    Millard2012EquilibriumMuscle latissimus_sup_r: max_isometric_force=201.6 optimal_fiber_length=0.2184284
        tendon_slack_length=0.08389143 ignore_tendon_compliance=true
      Scholz2015GeometryPath path: algorithm=minimum_length
        path_elements:
          Scholz2015GeometryPathPoint path_point_0:
            PathPoint: torso (-0.10088 -0.1161453 0.001837395)
          Scholz2015GeometryPathObstacle obstacle_0: socket_contact_geometry=/bodyset/torso/thorax_r_obstacle
              contact_hint=(-0.05 0.055 0.0785)
          Scholz2015GeometryPathPoint path_point_1:
            PathPoint: humerus_r (0.01 -0.0298825 -0.003)
    Millard2012EquilibriumMuscle latissimus_med_r: max_isometric_force=315 optimal_fiber_length=0.2671025
        tendon_slack_length=0.0950346 ignore_tendon_compliance=true
      Scholz2015GeometryPath path: algorithm=minimum_length
        path_elements:
          Scholz2015GeometryPathPoint path_point_0:
            PathPoint: torso (-0.0908 -0.2166518 -0.00167622)
          Scholz2015GeometryPathObstacle obstacle_0: socket_contact_geometry=/bodyset/torso/thorax_r_obstacle
              contact_hint=(-0.042 0.009 0.085)
          Scholz2015GeometryPathPoint path_point_1:
            PathPoint: humerus_r (0.001 -0.0394449 -0.002)
    Millard2012EquilibriumMuscle latissimus_inf_r: max_isometric_force=270.2 optimal_fiber_length=0.3021437
        tendon_slack_length=0.06127734 ignore_tendon_compliance=true
      Scholz2015GeometryPath path: algorithm=minimum_length
        path_elements:
          Scholz2015GeometryPathPoint path_point_0:
            PathPoint: pelvis (-0.115 0.074772 0.0591825)
          Scholz2015GeometryPathPoint path_point_1:
            PathPoint: torso (-0.0627 -0.2538063 0.0973497)
          Scholz2015GeometryPathObstacle obstacle_0: socket_contact_geometry=/bodyset/torso/thorax_r_obstacle
              contact_hint=(-0.025 -0.03 0.095)
          Scholz2015GeometryPathPoint path_point_2:
            PathPoint: humerus_r (0.003 -0.0286872 -0.003)
    Millard2012EquilibriumMuscle pectoralis_major_sup_r: max_isometric_force=408.8 optimal_fiber_length=0.1164047
        tendon_slack_length=0.01493735 ignore_tendon_compliance=true
      Scholz2015GeometryPath path: algorithm=minimum_length
        path_elements:
          Scholz2015GeometryPathPoint path_point_0:
            PathPoint: clavicle_r (0.0025 0.005 0.053725)
          Scholz2015GeometryPathObstacle obstacle_0: socket_contact_geometry=/bodyset/torso/pectoralis_r_obstacle
              contact_hint=(0.065 0.107 0.074)
          Scholz2015GeometryPathPoint path_point_1:
            PathPoint: humerus_r (0.023 -0.0179295 0.0025)
    Millard2012EquilibriumMuscle pectoralis_major_med_r: max_isometric_force=683.2 optimal_fiber_length=0.1588777
        tendon_slack_length=0.02753881 ignore_tendon_compliance=true
      Scholz2015GeometryPath path: algorithm=minimum_length
        path_elements:
          Scholz2015GeometryPathPoint path_point_0:
            PathPoint: torso (0.0195 -0.0378518 0.0139685)
          Scholz2015GeometryPathObstacle obstacle_0: socket_contact_geometry=/bodyset/torso/pectoralis_r_obstacle
              contact_hint=(0.08 0.1 0.037)
          Scholz2015GeometryPathPoint path_point_1:
            PathPoint: humerus_r (0.02 -0.03131686 0.0018)
    Millard2012EquilibriumMuscle pectoralis_major_inf_r: max_isometric_force=571.2 optimal_fiber_length=0.1860371
        tendon_slack_length=0.04371364 ignore_tendon_compliance=true
      Scholz2015GeometryPath path: algorithm=minimum_length
        path_elements:
          Scholz2015GeometryPathPoint path_point_0:
            PathPoint: torso (0.0532 -0.1152488 0.02654015)
          Scholz2015GeometryPathObstacle obstacle_0: socket_contact_geometry=/bodyset/torso/pectoralis_r_obstacle
              contact_hint=(0.082 0.05 0.039)
          Scholz2015GeometryPathPoint path_point_1:
            PathPoint: humerus_r (0.02 -0.035859 0.005)
    Millard2012EquilibriumMuscle teres_major_r: max_isometric_force=851.2 optimal_fiber_length=0.1434685
        tendon_slack_length=0.006105043 ignore_tendon_compliance=true
      Scholz2015GeometryPath path: algorithm=minimum_length
        path_elements:
          Scholz2015GeometryPathPoint path_point_0:
            PathPoint: scapula_r (-0.1044 -0.1169421 -0.07747145)
          Scholz2015GeometryPathPoint path_point_1:
            PathPoint: humerus_r (0.0043 -0.0466167 -0.0017)
    Millard2012EquilibriumMuscle teres_minor_r: max_isometric_force=695.8 optimal_fiber_length=0.05644411
        tendon_slack_length=0.05233909 ignore_tendon_compliance=true
      Scholz2015GeometryPath path: algorithm=minimum_length
        path_elements:
          Scholz2015GeometryPathPoint path_point_0:
            PathPoint: scapula_r (-0.0844 -0.06584221 -0.04545135)
          Scholz2015GeometryPathPoint path_point_1:
            PathPoint: humerus_r (-0.0159 -0.01123582 0.0109)
    Millard2012EquilibriumMuscle infraspinatus_inf_r: max_isometric_force=1037.4 optimal_fiber_length=0.07053755
        tendon_slack_length=0.08752075
      Scholz2015GeometryPath path: algorithm=minimum_length
        path_elements:
          Scholz2015GeometryPathPoint path_point_0:
            PathPoint: scapula_r (-0.0991 -0.08058449 -0.08735685)
          Scholz2015GeometryPathPoint path_point_1:
            PathPoint: scapula_r (-0.064 -0.049805 -0.034384)
          Scholz2015GeometryPathPoint path_point_2:
            PathPoint: humerus_r (-0.025 0.011953 0.005)
          Scholz2015GeometryPathPoint path_point_3:
            PathPoint: humerus_r (-0.0135 0.0047812 0.0125)
    Millard2012EquilibriumMuscle infraspinatus_sup_r: max_isometric_force=967.4 optimal_fiber_length=0.07355552
        tendon_slack_length=0.0526902 ignore_tendon_compliance=true
      Scholz2015GeometryPath path: algorithm=minimum_length
        path_elements:
          Scholz2015GeometryPathPoint path_point_0:
            PathPoint: scapula_r (-0.0834 -0.03217403 -0.09337405)
          Scholz2015GeometryPathPoint path_point_1:
            PathPoint: scapula_r (-0.054 -0.0348635 -0.0483525)
          Scholz2015GeometryPathPoint path_point_2:
            PathPoint: humerus_r (-0.025 0.011953 0.005)
          Scholz2015GeometryPathPoint path_point_3:
            PathPoint: humerus_r (-0.0135 0.0047812 0.0125)
    Millard2012EquilibriumMuscle subscapularis_sup_r: max_isometric_force=540.4 optimal_fiber_length=0.07464067
        tendon_slack_length=0.06514496 pennation_angle_at_optimal=0.08726646 ignore_tendon_compliance=true
      Scholz2015GeometryPath path: algorithm=minimum_length
        path_elements:
          Scholz2015GeometryPathPoint path_point_0:
            PathPoint: scapula_r (-0.0788 -0.03117793 -0.09702735)
          Scholz2015GeometryPathPoint path_point_1:
            PathPoint: scapula_r (-0.035 -0.0368557 -0.045129)
          Scholz2015GeometryPathPoint path_point_2:
            PathPoint: humerus_r (0.0074 0.0059765 -0.022)
          Scholz2015GeometryPathPoint path_point_3:
            PathPoint: humerus_r (0.0225 -0.0095624 -0.01)
      FiberForceLengthCurve: strain_at_zero_force=0 strain_at_one_norm_force=0.9 stiffness_at_low_force=0.2
          stiffness_at_one_norm_force=2.857143 curviness=0.75
    Millard2012EquilibriumMuscle subscapularis_med_r: max_isometric_force=609 optimal_fiber_length=0.0770044
        tendon_slack_length=0.0569253 pennation_angle_at_optimal=0.08726646 ignore_tendon_compliance=true
      Scholz2015GeometryPath path: algorithm=minimum_length
        path_elements:
          Scholz2015GeometryPathPoint path_point_0:
            PathPoint: scapula_r (-0.0836 -0.05468589 -0.08026515)
          Scholz2015GeometryPathPoint path_point_1:
            PathPoint: scapula_r (-0.035 -0.0438284 -0.0397565)
          Scholz2015GeometryPathPoint path_point_2:
            PathPoint: humerus_r (0.0074 0.0059765 -0.032)
          Scholz2015GeometryPathPoint path_point_3:
            PathPoint: humerus_r (0.0225 -0.0095624 -0.01)
      FiberForceLengthCurve: strain_at_zero_force=0 strain_at_one_norm_force=0.9 stiffness_at_low_force=0.2
          stiffness_at_one_norm_force=2.857143 curviness=0.75
    Millard2012EquilibriumMuscle subscapularis_inf_r: max_isometric_force=854 optimal_fiber_length=0.09082225
        tendon_slack_length=0.07432057 ignore_tendon_compliance=true
      Scholz2015GeometryPath path: algorithm=minimum_length
        path_elements:
          Scholz2015GeometryPathPoint path_point_0:
            PathPoint: scapula_r (-0.0951 -0.09731897 -0.0917623)
          Scholz2015GeometryPathPoint path_point_1:
            PathPoint: scapula_r (-0.035 -0.0448245 -0.0483525)
          Scholz2015GeometryPathPoint path_point_2:
            PathPoint: humerus_r (0.0074 0.0059765 -0.035)
          Scholz2015GeometryPathPoint path_point_3:
            PathPoint: humerus_r (0.0225 -0.0095624 -0.01)
    Millard2012EquilibriumMuscle supraspinatus_post_r: max_isometric_force=326.2 optimal_fiber_length=0.0831396
        tendon_slack_length=0.03516903 ignore_tendon_compliance=true
      Scholz2015GeometryPath path: algorithm=minimum_length
        path_elements:
          Scholz2015GeometryPathPoint path_point_0:
            PathPoint: scapula_r (-0.0605 -0.00139454 -0.05318775)
          Scholz2015GeometryPathPoint path_point_1:
            PathPoint: humerus_r (0 0.0370543 0.006)
          Scholz2015GeometryPathPoint path_point_2:
            PathPoint: humerus_r (0.014 0.0203201 0.021)
    Millard2012EquilibriumMuscle supraspinatus_ant_r: max_isometric_force=543.2 optimal_fiber_length=0.07885236
        tendon_slack_length=0.04412316 ignore_tendon_compliance=true
      Scholz2015GeometryPath path: algorithm=minimum_length
        path_elements:
          Scholz2015GeometryPathPoint path_point_0:
            PathPoint: scapula_r (-0.049 0.00139454 -0.0743554)
          Scholz2015GeometryPathPoint path_point_1:
            PathPoint: humerus_r (0.007 0.0394449 -0.004)
          Scholz2015GeometryPathPoint path_point_2:
            PathPoint: humerus_r (0.0178 0.02103728 0.0096)
    Millard2012EquilibriumMuscle triceps_long_r: max_isometric_force=1580.6 optimal_fiber_length=0.1170103
        tendon_slack_length=0.2912579 pennation_angle_at_optimal=0.174533
      Scholz2015GeometryPath path: algorithm=minimum_length
        path_elements:
          Scholz2015GeometryPathPoint path_point_0:
            PathPoint: scapula_r (-0.0421 -0.05169759 -0.01386105)
          Scholz2015GeometryPathObstacle obstacle_0: socket_contact_geometry=/bodyset/humerus_r/triceps_r_obstacle
              contact_hint=(-0.01 0.003 -0.055)
          Scholz2015GeometryPathPoint path_point_1:
            PathPoint: ulna_r (-0.031 0.0053375 0.001)
    Millard2012EquilibriumMuscle biceps_long_r: max_isometric_force=485.8 optimal_fiber_length=0.1630336
        tendon_slack_length=0.2946308
      Scholz2015GeometryPath path: algorithm=minimum_length
        path_elements:
          Scholz2015GeometryPathPoint path_point_0:
            PathPoint: scapula_r (-0.0226 -0.01623643 -0.01944845)
          Scholz2015GeometryPathPoint path_point_1:
            PathPoint: humerus_r (0.012 0.0107577 0.0135)
          Scholz2015GeometryPathObstacle obstacle_0: socket_contact_geometry=/bodyset/humerus_r/biceps_r_obstacle
              contact_hint=(0.014 0.007 0.043)
          Scholz2015GeometryPathPoint path_point_2:
            PathPoint: radius_r (0.012 -0.04697 0.002)
    Millard2012EquilibriumMuscle biceps_brevis_r: max_isometric_force=693 optimal_fiber_length=0.1464119
        tendon_slack_length=0.2455642
      Scholz2015GeometryPath path: algorithm=minimum_length
        path_elements:
          Scholz2015GeometryPathPoint path_point_0:
            PathPoint: scapula_r (0.0095 -0.03805102 -0.0260029)
          Scholz2015GeometryPathObstacle obstacle_0: socket_contact_geometry=/bodyset/humerus_r/biceps_r_obstacle
              contact_hint=(0.014 -0.018 0.043)
          Scholz2015GeometryPathPoint path_point_1:
            PathPoint: radius_r (0.012 -0.04697 0.002)
    Millard2012EquilibriumMuscle coracobrachialis_l: max_isometric_force=648.2 optimal_fiber_length=0.08121961
        tendon_slack_length=0.1236726
      Scholz2015GeometryPath path: algorithm=minimum_length
        path_elements:
          Scholz2015GeometryPathPoint path_point_0:
            PathPoint: scapula_l (0.0083 -0.04223464 0.03019345)
          Scholz2015GeometryPathPoint path_point_1:
            PathPoint: humerus_l (-0.00231 -0.1733185 0.00933)
    Millard2012EquilibriumMuscle deltoideus_ant_l: max_isometric_force=1986.6 optimal_fiber_length=0.1233256
        tendon_slack_length=0.1092709 pennation_angle_at_optimal=0.08726646 ignore_tendon_compliance=true
      Scholz2015GeometryPath path: algorithm=minimum_length
        path_elements:
          Scholz2015GeometryPathPoint path_point_0:
            PathPoint: clavicle_l (-0.0228 0.0195 -0.09036545)
          Scholz2015GeometryPathPoint path_point_1:
            PathPoint: scapula_l (0.0196 -0.00657426 -0.0111748)
          Scholz2015GeometryPathPoint path_point_2:
            PathPoint: humerus_l (0.00664 -0.1312439 -0.00115)
    Millard2012EquilibriumMuscle deltoideus_med_l: max_isometric_force=1324.4 optimal_fiber_length=0.0849428
        tendon_slack_length=0.07267833 pennation_angle_at_optimal=0.08726646 ignore_tendon_compliance=true
      Scholz2015GeometryPath path: algorithm=minimum_length
        path_elements:
          Scholz2015GeometryPathPoint path_point_0:
            PathPoint: scapula_l (-0.016 0.002022083 -0.0083811)
          Scholz2015GeometryPathPoint path_point_1:
            PathPoint: scapula_l (-0.0051 -0.00667387 -0.0333095)
          Scholz2015GeometryPathPoint path_point_2:
            PathPoint: humerus_l (-0.0043 -0.1201277 -0.00385)
    Millard2012EquilibriumMuscle deltoideus_post_l: max_isometric_force=882.9333 optimal_fiber_length=0.08345889
        tendon_slack_length=0.06683747 pennation_angle_at_optimal=0.08726646 ignore_tendon_compliance=true
      Scholz2015GeometryPath path: algorithm=minimum_length
        path_elements:
          Scholz2015GeometryPathPoint path_point_0:
            PathPoint: scapula_l (-0.0577 -0.00687309 0.0292264)
          Scholz2015GeometryPathPoint path_point_1:
            PathPoint: scapula_l (-0.055 -0.03227364 -0.007897575)
          Scholz2015GeometryPathPoint path_point_2:
            PathPoint: humerus_l (-0.0048 -0.1030349 -0.00624)
    Millard2012EquilibriumMuscle latissimus_sup_l: max_isometric_force=201.6 optimal_fiber_length=0.2184284
        tendon_slack_length=0.08389143 ignore_tendon_compliance=true
      Scholz2015GeometryPath path: algorithm=minimum_length
        path_elements:
          Scholz2015GeometryPathPoint path_point_0:
            PathPoint: torso (-0.10088 -0.1161453 -0.001837395)
          Scholz2015GeometryPathObstacle obstacle_0: socket_contact_geometry=/bodyset/torso/thorax_l_obstacle
              contact_hint=(-0.05 0.055 -0.0785)
          Scholz2015GeometryPathPoint path_point_1:
            PathPoint: humerus_l (0.01 -0.0298825 0.003)
    Millard2012EquilibriumMuscle latissimus_med_l: max_isometric_force=315 optimal_fiber_length=0.2671025
        tendon_slack_length=0.0950346 ignore_tendon_compliance=true
      Scholz2015GeometryPath path: algorithm=minimum_length
        path_elements:
          Scholz2015GeometryPathPoint path_point_0:
            PathPoint: torso (-0.0908 -0.2166518 0.00167622)
          Scholz2015GeometryPathObstacle obstacle_0: socket_contact_geometry=/bodyset/torso/thorax_l_obstacle
              contact_hint=(-0.042 0.009 -0.085)
          Scholz2015GeometryPathPoint path_point_1:
            PathPoint: humerus_l (0.001 -0.0394449 0.002)
    Millard2012EquilibriumMuscle latissimus_inf_l: max_isometric_force=270.2 optimal_fiber_length=0.3021437
        tendon_slack_length=0.06127734 ignore_tendon_compliance=true
      Scholz2015GeometryPath path: algorithm=minimum_length
        path_elements:
          Scholz2015GeometryPathPoint path_point_0:
            PathPoint: pelvis (-0.115 0.074772 -0.0591825)
          Scholz2015GeometryPathPoint path_point_1:
            PathPoint: torso (-0.0627 -0.2538063 -0.0973497)
          Scholz2015GeometryPathObstacle obstacle_0: socket_contact_geometry=/bodyset/torso/thorax_l_obstacle
              contact_hint=(-0.025 -0.03 -0.095)
          Scholz2015GeometryPathPoint path_point_2:
            PathPoint: humerus_l (0.003 -0.0286872 0.003)
    Millard2012EquilibriumMuscle pectoralis_major_sup_l: max_isometric_force=408.8 optimal_fiber_length=0.1164047
        tendon_slack_length=0.01493735 ignore_tendon_compliance=true
      Scholz2015GeometryPath path: algorithm=minimum_length
        path_elements:
          Scholz2015GeometryPathPoint path_point_0:
            PathPoint: clavicle_l (0.0025 0.005 -0.053725)
          Scholz2015GeometryPathObstacle obstacle_0: socket_contact_geometry=/bodyset/torso/pectoralis_l_obstacle
              contact_hint=(0.065 0.107 -0.074)
          Scholz2015GeometryPathPoint path_point_1:
            PathPoint: humerus_l (0.023 -0.0179295 -0.0025)
    Millard2012EquilibriumMuscle pectoralis_major_med_l: max_isometric_force=683.2 optimal_fiber_length=0.1588777
        tendon_slack_length=0.02753881 ignore_tendon_compliance=true
      Scholz2015GeometryPath path: algorithm=minimum_length
        path_elements:
          Scholz2015GeometryPathPoint path_point_0:
            PathPoint: torso (0.0195 -0.0378518 -0.0139685)
          Scholz2015GeometryPathObstacle obstacle_0: socket_contact_geometry=/bodyset/torso/pectoralis_l_obstacle
              contact_hint=(0.08 0.1 -0.037)
          Scholz2015GeometryPathPoint path_point_1:
            PathPoint: humerus_l (0.02 -0.03131686 -0.0018)
    Millard2012EquilibriumMuscle pectoralis_major_inf_l: max_isometric_force=571.2 optimal_fiber_length=0.1860371
        tendon_slack_length=0.04371364 ignore_tendon_compliance=true
      Scholz2015GeometryPath path: algorithm=minimum_length
        path_elements:
          Scholz2015GeometryPathPoint path_point_0:
            PathPoint: torso (0.0532 -0.1152488 -0.02654015)
          Scholz2015GeometryPathObstacle obstacle_0: socket_contact_geometry=/bodyset/torso/pectoralis_l_obstacle
              contact_hint=(0.082 0.05 -0.039)
          Scholz2015GeometryPathPoint path_point_1:
            PathPoint: humerus_l (0.02 -0.035859 -0.005)
    Millard2012EquilibriumMuscle teres_major_l: max_isometric_force=851.2 optimal_fiber_length=0.1434685
        tendon_slack_length=0.006105043 ignore_tendon_compliance=true
      Scholz2015GeometryPath path: algorithm=minimum_length
        path_elements:
          Scholz2015GeometryPathPoint path_point_0:
            PathPoint: scapula_l (-0.1044 -0.1169421 0.07747145)
          Scholz2015GeometryPathPoint path_point_1:
            PathPoint: humerus_l (0.0043 -0.0466167 0.0017)
    Millard2012EquilibriumMuscle teres_minor_l: max_isometric_force=695.8 optimal_fiber_length=0.05644411
        tendon_slack_length=0.05233909 ignore_tendon_compliance=true
      Scholz2015GeometryPath path: algorithm=minimum_length
        path_elements:
          Scholz2015GeometryPathPoint path_point_0:
            PathPoint: scapula_l (-0.0844 -0.06584221 0.04545135)
          Scholz2015GeometryPathPoint path_point_1:
            PathPoint: humerus_l (-0.0159 -0.01123582 -0.0109)
    Millard2012EquilibriumMuscle infraspinatus_inf_l: max_isometric_force=1037.4 optimal_fiber_length=0.07053755
        tendon_slack_length=0.08752075
      Scholz2015GeometryPath path: algorithm=minimum_length
        path_elements:
          Scholz2015GeometryPathPoint path_point_0:
            PathPoint: scapula_l (-0.0991 -0.08058449 0.08735685)
          Scholz2015GeometryPathPoint path_point_1:
            PathPoint: scapula_l (-0.064 -0.049805 0.034384)
          Scholz2015GeometryPathPoint path_point_2:
            PathPoint: humerus_l (-0.025 0.011953 -0.005)
          Scholz2015GeometryPathPoint path_point_3:
            PathPoint: humerus_l (-0.0135 0.0047812 -0.0125)
    Millard2012EquilibriumMuscle infraspinatus_sup_l: max_isometric_force=967.4 optimal_fiber_length=0.07355552
        tendon_slack_length=0.0526902 ignore_tendon_compliance=true
      Scholz2015GeometryPath path: algorithm=minimum_length
        path_elements:
          Scholz2015GeometryPathPoint path_point_0:
            PathPoint: scapula_l (-0.0834 -0.03217403 0.09337405)
          Scholz2015GeometryPathPoint path_point_1:
            PathPoint: scapula_l (-0.054 -0.0348635 0.0483525)
          Scholz2015GeometryPathPoint path_point_2:
            PathPoint: humerus_l (-0.025 0.011953 -0.005)
          Scholz2015GeometryPathPoint path_point_3:
            PathPoint: humerus_l (-0.0135 0.0047812 -0.0125)
    Millard2012EquilibriumMuscle subscapularis_sup_l: max_isometric_force=540.4 optimal_fiber_length=0.07464067
        tendon_slack_length=0.06514496 pennation_angle_at_optimal=0.08726646 ignore_tendon_compliance=true
      Scholz2015GeometryPath path: algorithm=minimum_length
        path_elements:
          Scholz2015GeometryPathPoint path_point_0:
            PathPoint: scapula_l (-0.0788 -0.03117793 0.09702735)
          Scholz2015GeometryPathPoint path_point_1:
            PathPoint: scapula_l (-0.035 -0.0368557 0.045129)
          Scholz2015GeometryPathPoint path_point_2:
            PathPoint: humerus_l (0.0074 0.0059765 0.022)
          Scholz2015GeometryPathPoint path_point_3:
            PathPoint: humerus_l (0.0225 -0.0095624 0.01)
      FiberForceLengthCurve: strain_at_zero_force=0 strain_at_one_norm_force=0.9 stiffness_at_low_force=0.2
          stiffness_at_one_norm_force=2.857143 curviness=0.75
    Millard2012EquilibriumMuscle subscapularis_med_l: max_isometric_force=609 optimal_fiber_length=0.0770044
        tendon_slack_length=0.0569253 pennation_angle_at_optimal=0.08726646 ignore_tendon_compliance=true
      Scholz2015GeometryPath path: algorithm=minimum_length
        path_elements:
          Scholz2015GeometryPathPoint path_point_0:
            PathPoint: scapula_l (-0.0836 -0.05468589 0.08026515)
          Scholz2015GeometryPathPoint path_point_1:
            PathPoint: scapula_l (-0.035 -0.0438284 0.0397565)
          Scholz2015GeometryPathPoint path_point_2:
            PathPoint: humerus_l (0.0074 0.0059765 0.032)
          Scholz2015GeometryPathPoint path_point_3:
            PathPoint: humerus_l (0.0225 -0.0095624 0.01)
      FiberForceLengthCurve: strain_at_zero_force=0 strain_at_one_norm_force=0.9 stiffness_at_low_force=0.2
          stiffness_at_one_norm_force=2.857143 curviness=0.75
    Millard2012EquilibriumMuscle subscapularis_inf_l: max_isometric_force=854 optimal_fiber_length=0.09082225
        tendon_slack_length=0.07432057 ignore_tendon_compliance=true
      Scholz2015GeometryPath path: algorithm=minimum_length
        path_elements:
          Scholz2015GeometryPathPoint path_point_0:
            PathPoint: scapula_l (-0.0951 -0.09731897 0.0917623)
          Scholz2015GeometryPathPoint path_point_1:
            PathPoint: scapula_l (-0.035 -0.0448245 0.0483525)
          Scholz2015GeometryPathPoint path_point_2:
            PathPoint: humerus_l (0.0074 0.0059765 0.035)
          Scholz2015GeometryPathPoint path_point_3:
            PathPoint: humerus_l (0.0225 -0.0095624 0.01)
    Millard2012EquilibriumMuscle supraspinatus_post_l: max_isometric_force=326.2 optimal_fiber_length=0.0831396
        tendon_slack_length=0.03516903 ignore_tendon_compliance=true
      Scholz2015GeometryPath path: algorithm=minimum_length
        path_elements:
          Scholz2015GeometryPathPoint path_point_0:
            PathPoint: scapula_l (-0.0605 -0.00139454 0.05318775)
          Scholz2015GeometryPathPoint path_point_1:
            PathPoint: humerus_l (0 0.0370543 -0.006)
          Scholz2015GeometryPathPoint path_point_2:
            PathPoint: humerus_l (0.014 0.0203201 -0.021)
    Millard2012EquilibriumMuscle supraspinatus_ant_l: max_isometric_force=543.2 optimal_fiber_length=0.07885236
        tendon_slack_length=0.04412316 ignore_tendon_compliance=true
      Scholz2015GeometryPath path: algorithm=minimum_length
        path_elements:
          Scholz2015GeometryPathPoint path_point_0:
            PathPoint: scapula_l (-0.049 0.00139454 0.0743554)
          Scholz2015GeometryPathPoint path_point_1:
            PathPoint: humerus_l (0.007 0.0394449 0.004)
          Scholz2015GeometryPathPoint path_point_2:
            PathPoint: humerus_l (0.0178 0.02103728 -0.0096)
    Millard2012EquilibriumMuscle triceps_long_l: max_isometric_force=1580.6 optimal_fiber_length=0.1170103
        tendon_slack_length=0.2912579 pennation_angle_at_optimal=0.174533
      Scholz2015GeometryPath path: algorithm=minimum_length
        path_elements:
          Scholz2015GeometryPathPoint path_point_0:
            PathPoint: scapula_l (-0.0421 -0.05169759 0.01386105)
          Scholz2015GeometryPathObstacle obstacle_0: socket_contact_geometry=/bodyset/humerus_l/triceps_l_obstacle
              contact_hint=(-0.01 0.003 0.055)
          Scholz2015GeometryPathPoint path_point_1:
            PathPoint: ulna_l (-0.031 0.0053375 -0.001)
    Millard2012EquilibriumMuscle biceps_long_l: max_isometric_force=485.8 optimal_fiber_length=0.1630336
        tendon_slack_length=0.2946308
      Scholz2015GeometryPath path: algorithm=minimum_length
        path_elements:
          Scholz2015GeometryPathPoint path_point_0:
            PathPoint: scapula_l (-0.0226 -0.01623643 0.01944845)
          Scholz2015GeometryPathPoint path_point_1:
            PathPoint: humerus_l (0.012 0.0107577 -0.0135)
          Scholz2015GeometryPathObstacle obstacle_0: socket_contact_geometry=/bodyset/humerus_l/biceps_l_obstacle
              contact_hint=(0.014 0.007 -0.043)
          Scholz2015GeometryPathPoint path_point_2:
            PathPoint: radius_l (0.012 -0.04697 -0.002)
    Millard2012EquilibriumMuscle biceps_brevis_l: max_isometric_force=693 optimal_fiber_length=0.1464119
        tendon_slack_length=0.2455642
      Scholz2015GeometryPath path: algorithm=minimum_length
        path_elements:
          Scholz2015GeometryPathPoint path_point_0:
            PathPoint: scapula_l (0.0095 -0.03805102 0.0260029)
          Scholz2015GeometryPathObstacle obstacle_0: socket_contact_geometry=/bodyset/humerus_l/biceps_l_obstacle
              contact_hint=(0.014 -0.018 -0.043)
          Scholz2015GeometryPathPoint path_point_1:
            PathPoint: radius_l (0.012 -0.04697 -0.002)
    Millard2012EquilibriumMuscle extobl_r: max_isometric_force=900 optimal_fiber_length=0.1129063
        tendon_slack_length=0.131723
      Scholz2015GeometryPath path: algorithm=minimum_length
        path_elements:
          Scholz2015GeometryPathPoint path_point_0:
            PathPoint: pelvis (-0.029 -0.0646416 0.01320225)
          Scholz2015GeometryPathPoint path_point_1:
            PathPoint: torso (0.051 -0.268947 0.1214185)
      FiberForceLengthCurve: strain_at_zero_force=0 strain_at_one_norm_force=1.5 stiffness_at_low_force=0.2
          stiffness_at_one_norm_force=2.857143 curviness=0.75
    Millard2012EquilibriumMuscle extobl_l: max_isometric_force=900 optimal_fiber_length=0.1129063
        tendon_slack_length=0.131723
      Scholz2015GeometryPath path: algorithm=minimum_length
        path_elements:
          Scholz2015GeometryPathPoint path_point_0:
            PathPoint: pelvis (-0.029 -0.0646416 -0.01320225)
          Scholz2015GeometryPathPoint path_point_1:
            PathPoint: torso (0.051 -0.268947 -0.1214185)
      FiberForceLengthCurve: strain_at_zero_force=0 strain_at_one_norm_force=1.5 stiffness_at_low_force=0.2
          stiffness_at_one_norm_force=2.857143 curviness=0.75
    Millard2012EquilibriumMuscle intobl_r: max_isometric_force=900 optimal_fiber_length=0.09094436
        tendon_slack_length=0.09094436
      Scholz2015GeometryPath path: algorithm=minimum_length
        path_elements:
          Scholz2015GeometryPathPoint path_point_0:
            PathPoint: pelvis (-0.0445 0.0689832 0.1047075)
          Scholz2015GeometryPathPoint path_point_1:
            PathPoint: torso (0.0675 -0.2271108 0.02417625)
      FiberForceLengthCurve: strain_at_zero_force=0 strain_at_one_norm_force=1.5 stiffness_at_low_force=0.2
          stiffness_at_one_norm_force=2.857143 curviness=0.75
    Millard2012EquilibriumMuscle intobl_l: max_isometric_force=900 optimal_fiber_length=0.09094436
        tendon_slack_length=0.09094436
      Scholz2015GeometryPath path: algorithm=minimum_length
        path_elements:
          Scholz2015GeometryPathPoint path_point_0:
            PathPoint: pelvis (-0.0445 0.0689832 -0.1047075)
          Scholz2015GeometryPathPoint path_point_1:
            PathPoint: torso (0.0675 -0.2271108 -0.02417625)
      FiberForceLengthCurve: strain_at_zero_force=0 strain_at_one_norm_force=1.5 stiffness_at_low_force=0.2
          stiffness_at_one_norm_force=2.857143 curviness=0.75
    CoordinateLimitForce [values shared by the 43 below unless stated]: compute_dissipation_energy=false
    CoordinateLimitForce torso_extension_limit_force: coordinate=torso_extension upper_stiffness=8.726646
        upper_limit=9.740283 lower_stiffness=8.726646 lower_limit=-30 damping=0.01745329 transition=1
    CoordinateLimitForce torso_bending_limit_force: coordinate=torso_bending upper_stiffness=8.726646
        upper_limit=15.87114 lower_stiffness=8.726646 lower_limit=-15.87114 damping=0.01745329 transition=1
    CoordinateLimitForce torso_rotation_limit_force: coordinate=torso_rotation upper_stiffness=8.726646
        upper_limit=12.83881 lower_stiffness=8.726646 lower_limit=-12.83881 damping=0.01745329 transition=1
    CoordinateLimitForce hip_flexion_r_limit_force: coordinate=hip_flexion_r upper_stiffness=8.726646
        upper_limit=86.50309 lower_stiffness=8.726646 lower_limit=-30 damping=0.01745329 transition=1
    CoordinateLimitForce hip_adduction_r_limit_force: coordinate=hip_adduction_r upper_stiffness=8.726646
        upper_limit=30 lower_stiffness=8.726646 lower_limit=-51 damping=0.01745329 transition=1
    CoordinateLimitForce hip_rotation_r_limit_force: coordinate=hip_rotation_r upper_stiffness=8.726646 upper_limit=40
        lower_stiffness=8.726646 lower_limit=-40 damping=0.01745329 transition=1
    CoordinateLimitForce knee_angle_r_limit_force: coordinate=knee_angle_r upper_stiffness=8.726646 upper_limit=0
        lower_stiffness=8.726646 lower_limit=-142.4429 damping=0.01745329 transition=1
    CoordinateLimitForce ankle_angle_r_limit_force: coordinate=ankle_angle_r upper_stiffness=8.726646
        upper_limit=26.27021 lower_stiffness=8.726646 lower_limit=-43.94265 damping=0.01745329 transition=1
    CoordinateLimitForce subtalar_angle_r_limit_force: coordinate=subtalar_angle_r upper_stiffness=8.726646
        upper_limit=12.46985 lower_stiffness=8.726646 lower_limit=-19.43431 damping=0.01745329 transition=1
    CoordinateLimitForce mtp_angle_r_limit_force: coordinate=mtp_angle_r upper_stiffness=8.726646 upper_limit=65
        lower_stiffness=8.726646 lower_limit=-45.00006 damping=0.01745329 transition=1
    CoordinateLimitForce hip_flexion_l_limit_force: coordinate=hip_flexion_l upper_stiffness=8.726646
        upper_limit=86.50309 lower_stiffness=8.726646 lower_limit=-30 damping=0.01745329 transition=1
    CoordinateLimitForce hip_adduction_l_limit_force: coordinate=hip_adduction_l upper_stiffness=8.726646
        upper_limit=30 lower_stiffness=8.726646 lower_limit=-51 damping=0.01745329 transition=1
    CoordinateLimitForce hip_rotation_l_limit_force: coordinate=hip_rotation_l upper_stiffness=8.726646 upper_limit=40
        lower_stiffness=8.726646 lower_limit=-40 damping=0.01745329 transition=1
    CoordinateLimitForce knee_angle_l_limit_force: coordinate=knee_angle_l upper_stiffness=8.726646 upper_limit=0
        lower_stiffness=8.726646 lower_limit=-142.4429 damping=0.01745329 transition=1
    CoordinateLimitForce ankle_angle_l_limit_force: coordinate=ankle_angle_l upper_stiffness=8.726646
        upper_limit=26.27021 lower_stiffness=8.726646 lower_limit=-43.94265 damping=0.01745329 transition=1
    CoordinateLimitForce subtalar_angle_l_limit_force: coordinate=subtalar_angle_l upper_stiffness=8.726646
        upper_limit=12.46985 lower_stiffness=8.726646 lower_limit=-19.43431 damping=0.01745329 transition=1
    CoordinateLimitForce mtp_angle_l_limit_force: coordinate=mtp_angle_l upper_stiffness=8.726646 upper_limit=65
        lower_stiffness=8.726646 lower_limit=-45.00006 damping=0.01745329 transition=1
    CoordinateLimitForce shoulder_flexion_r_limit_force: coordinate=shoulder_flexion_r upper_stiffness=3.49066
        upper_limit=180 lower_stiffness=3.49066 lower_limit=-75 damping=0.01745329 transition=1
    CoordinateLimitForce shoulder_flexion_l_limit_force: coordinate=shoulder_flexion_l upper_stiffness=3.49066
        upper_limit=180 lower_stiffness=3.49066 lower_limit=-75 damping=0.01745329 transition=1
    CoordinateLimitForce shoulder_abduction_r_limit_force: coordinate=shoulder_abduction_r upper_stiffness=3.49066
        upper_limit=45 lower_stiffness=3.49066 lower_limit=0 damping=0.01745329 transition=1
    CoordinateLimitForce shoulder_abduction_l_limit_force: coordinate=shoulder_abduction_l upper_stiffness=3.49066
        upper_limit=45 lower_stiffness=3.49066 lower_limit=0 damping=0.01745329 transition=1
    CoordinateLimitForce shoulder_rotation_r_limit_force: coordinate=shoulder_rotation_r upper_stiffness=3.49066
        upper_limit=0 lower_stiffness=3.49066 lower_limit=-25 damping=0.01745329 transition=1
    CoordinateLimitForce shoulder_rotation_l_limit_force: coordinate=shoulder_rotation_l upper_stiffness=3.49066
        upper_limit=0 lower_stiffness=3.49066 lower_limit=-25 damping=0.01745329 transition=1
    CoordinateLimitForce elbow_flex_r_limit_force: coordinate=elbow_flex_r upper_stiffness=3.49066 upper_limit=150
        lower_stiffness=3.49066 lower_limit=5 damping=0.01745329 transition=1
    CoordinateLimitForce elbow_flex_l_limit_force: coordinate=elbow_flex_l upper_stiffness=3.49066 upper_limit=150
        lower_stiffness=3.49066 lower_limit=5 damping=0.01745329 transition=1
    SpringGeneralizedForce hip_flexion_r_spring_force: coordinate=hip_flexion_r stiffness=0 viscosity=0.1
    SpringGeneralizedForce hip_adduction_r_spring_force: coordinate=hip_adduction_r stiffness=0 viscosity=0.1
    SpringGeneralizedForce hip_rotation_r_spring_force: coordinate=hip_rotation_r stiffness=0 viscosity=0.1
    SpringGeneralizedForce hip_flexion_l_spring_force: coordinate=hip_flexion_l stiffness=0 viscosity=0.1
    SpringGeneralizedForce hip_adduction_l_spring_force: coordinate=hip_adduction_l stiffness=0 viscosity=0.1
    SpringGeneralizedForce hip_rotation_l_spring_force: coordinate=hip_rotation_l stiffness=0 viscosity=0.1
    SpringGeneralizedForce torso_extension_spring_force: coordinate=torso_extension stiffness=0 viscosity=1
    SpringGeneralizedForce torso_bending_spring_force: coordinate=torso_bending stiffness=0 viscosity=1
    SpringGeneralizedForce torso_rotation_spring_force: coordinate=torso_rotation stiffness=0 viscosity=1
    SpringGeneralizedForce knee_angle_r_spring_force: coordinate=knee_angle_r stiffness=0 viscosity=0.1
    SpringGeneralizedForce knee_angle_l_spring_force: coordinate=knee_angle_l stiffness=0 viscosity=0.1
    SpringGeneralizedForce ankle_angle_r_spring_force: coordinate=ankle_angle_r stiffness=0 viscosity=0.1
    SpringGeneralizedForce ankle_angle_l_spring_force: coordinate=ankle_angle_l stiffness=0 viscosity=0.1
    SpringGeneralizedForce subtalar_angle_r_spring_force: coordinate=subtalar_angle_r stiffness=0 viscosity=0.1
    SpringGeneralizedForce subtalar_angle_l_spring_force: coordinate=subtalar_angle_l stiffness=0 viscosity=0.1
    SpringGeneralizedForce mtp_angle_r_spring_force: coordinate=mtp_angle_r stiffness=65 viscosity=0.4
    SpringGeneralizedForce mtp_angle_l_spring_force: coordinate=mtp_angle_l stiffness=65 viscosity=0.4
    SpringGeneralizedForce shoulder_flexion_r_spring_force: coordinate=shoulder_flexion_r stiffness=1 viscosity=0.1
    SpringGeneralizedForce shoulder_flexion_l_spring_force: coordinate=shoulder_flexion_l stiffness=1 viscosity=0.1
    SpringGeneralizedForce shoulder_abduction_r_spring_force: coordinate=shoulder_abduction_r stiffness=5 viscosity=0.1
    SpringGeneralizedForce shoulder_abduction_l_spring_force: coordinate=shoulder_abduction_l stiffness=5 viscosity=0.1
    SpringGeneralizedForce shoulder_rotation_r_spring_force: coordinate=shoulder_rotation_r stiffness=5 viscosity=0.1
    SpringGeneralizedForce shoulder_rotation_l_spring_force: coordinate=shoulder_rotation_l stiffness=5 viscosity=0.1
    SpringGeneralizedForce elbow_flex_r_spring_force: coordinate=elbow_flex_r stiffness=0 viscosity=0.01
    SpringGeneralizedForce elbow_flex_l_spring_force: coordinate=elbow_flex_l stiffness=0 viscosity=0.01
    ActivationCoordinateActuator mtp_angle_r_motor: coordinate=mtp_angle_r optimal_force=-40
        activation_time_constant=0.01 default_activation=0.5
    ActivationCoordinateActuator mtp_angle_l_motor: coordinate=mtp_angle_l optimal_force=-40
        activation_time_constant=0.01 default_activation=0.5
    SpringGeneralizedForce lumbar1_extension_damp: coordinate=lumbar1_extension stiffness=40 rest_length=0 viscosity=2
    CoordinateLimitForce lumbar1_extension_limit: coordinate=lumbar1_extension upper_stiffness=8.726646 upper_limit=25
        lower_stiffness=8.726646 lower_limit=-25 damping=0.017453 transition=5
    SpringGeneralizedForce lumbar1_bending_damp: coordinate=lumbar1_bending stiffness=40 rest_length=0 viscosity=2
    CoordinateLimitForce lumbar1_bending_limit: coordinate=lumbar1_bending upper_stiffness=8.726646 upper_limit=25
        lower_stiffness=8.726646 lower_limit=-25 damping=0.017453 transition=5
    SpringGeneralizedForce lumbar1_rotation_damp: coordinate=lumbar1_rotation stiffness=40 rest_length=0 viscosity=2
    CoordinateLimitForce lumbar1_rotation_limit: coordinate=lumbar1_rotation upper_stiffness=8.726646 upper_limit=25
        lower_stiffness=8.726646 lower_limit=-25 damping=0.017453 transition=5
    SpringGeneralizedForce lumbar2_extension_damp: coordinate=lumbar2_extension stiffness=40 rest_length=0 viscosity=2
    CoordinateLimitForce lumbar2_extension_limit: coordinate=lumbar2_extension upper_stiffness=8.726646 upper_limit=25
        lower_stiffness=8.726646 lower_limit=-25 damping=0.017453 transition=5
    SpringGeneralizedForce lumbar2_bending_damp: coordinate=lumbar2_bending stiffness=40 rest_length=0 viscosity=2
    CoordinateLimitForce lumbar2_bending_limit: coordinate=lumbar2_bending upper_stiffness=8.726646 upper_limit=25
        lower_stiffness=8.726646 lower_limit=-25 damping=0.017453 transition=5
    SpringGeneralizedForce lumbar2_rotation_damp: coordinate=lumbar2_rotation stiffness=40 rest_length=0 viscosity=2
    CoordinateLimitForce lumbar2_rotation_limit: coordinate=lumbar2_rotation upper_stiffness=8.726646 upper_limit=25
        lower_stiffness=8.726646 lower_limit=-25 damping=0.017453 transition=5
    SpringGeneralizedForce lumbar3_extension_damp: coordinate=lumbar3_extension stiffness=40 rest_length=0 viscosity=2
    CoordinateLimitForce lumbar3_extension_limit: coordinate=lumbar3_extension upper_stiffness=8.726646 upper_limit=25
        lower_stiffness=8.726646 lower_limit=-25 damping=0.017453 transition=5
    SpringGeneralizedForce lumbar3_bending_damp: coordinate=lumbar3_bending stiffness=40 rest_length=0 viscosity=2
    CoordinateLimitForce lumbar3_bending_limit: coordinate=lumbar3_bending upper_stiffness=8.726646 upper_limit=25
        lower_stiffness=8.726646 lower_limit=-25 damping=0.017453 transition=5
    SpringGeneralizedForce lumbar3_rotation_damp: coordinate=lumbar3_rotation stiffness=40 rest_length=0 viscosity=2
    CoordinateLimitForce lumbar3_rotation_limit: coordinate=lumbar3_rotation upper_stiffness=8.726646 upper_limit=25
        lower_stiffness=8.726646 lower_limit=-25 damping=0.017453 transition=5
    SpringGeneralizedForce torso_extension_damp: coordinate=torso_extension stiffness=40 rest_length=0 viscosity=2
    CoordinateLimitForce torso_extension_limit: coordinate=torso_extension upper_stiffness=8.726646 upper_limit=25
        lower_stiffness=8.726646 lower_limit=-25 damping=0.017453 transition=5
    SpringGeneralizedForce torso_bending_damp: coordinate=torso_bending stiffness=40 rest_length=0 viscosity=2
    CoordinateLimitForce torso_bending_limit: coordinate=torso_bending upper_stiffness=8.726646 upper_limit=25
        lower_stiffness=8.726646 lower_limit=-25 damping=0.017453 transition=5
    SpringGeneralizedForce torso_rotation_damp: coordinate=torso_rotation stiffness=40 rest_length=0 viscosity=2
    CoordinateLimitForce torso_rotation_limit: coordinate=torso_rotation upper_stiffness=8.726646 upper_limit=25
        lower_stiffness=8.726646 lower_limit=-25 damping=0.017453 transition=5
    SpringGeneralizedForce scap_abduction_r_damp: coordinate=scap_abduction_r stiffness=5 rest_length=0 viscosity=1
    CoordinateLimitForce scap_abduction_r_limit: coordinate=scap_abduction_r upper_stiffness=2 upper_limit=15
        lower_stiffness=2 lower_limit=-15 damping=0.017453 transition=5
    SpringGeneralizedForce scap_elevation_r_damp: coordinate=scap_elevation_r stiffness=5 rest_length=0 viscosity=1
    CoordinateLimitForce scap_elevation_r_limit: coordinate=scap_elevation_r upper_stiffness=2 upper_limit=15
        lower_stiffness=2 lower_limit=-15 damping=0.017453 transition=5
    SpringGeneralizedForce scap_uprot_r_damp: coordinate=scap_uprot_r stiffness=5 rest_length=0 viscosity=1
    CoordinateLimitForce scap_uprot_r_limit: coordinate=scap_uprot_r upper_stiffness=2 upper_limit=15 lower_stiffness=2
        lower_limit=-15 damping=0.017453 transition=5
    SpringGeneralizedForce scap_abduction_l_damp: coordinate=scap_abduction_l stiffness=5 rest_length=0 viscosity=1
    CoordinateLimitForce scap_abduction_l_limit: coordinate=scap_abduction_l upper_stiffness=2 upper_limit=15
        lower_stiffness=2 lower_limit=-15 damping=0.017453 transition=5
    SpringGeneralizedForce scap_elevation_l_damp: coordinate=scap_elevation_l stiffness=5 rest_length=0 viscosity=1
    CoordinateLimitForce scap_elevation_l_limit: coordinate=scap_elevation_l upper_stiffness=2 upper_limit=15
        lower_stiffness=2 lower_limit=-15 damping=0.017453 transition=5
    SpringGeneralizedForce scap_uprot_l_damp: coordinate=scap_uprot_l stiffness=5 rest_length=0 viscosity=1
    CoordinateLimitForce scap_uprot_l_limit: coordinate=scap_uprot_l upper_stiffness=2 upper_limit=15 lower_stiffness=2
        lower_limit=-15 damping=0.017453 transition=5
  ContactGeometrySet:
    ContactSphere right_foot_1: socket_frame=/bodyset/toes_r location=(0.0699 -0.0299 -0.0286) radius=0.02
    ContactSphere right_foot_2: socket_frame=/bodyset/toes_r location=(0.0294 -0.0299 1.521175e-8) radius=0.02
    ContactSphere right_foot_3: socket_frame=/bodyset/calcn_r location=(0.1499 -0.0282 6.884226e-8) radius=0.02
    ContactSphere right_foot_4: socket_frame=/bodyset/calcn_r location=(0.1499 -0.0282 -0.02272616) radius=0.02
    ContactSphere right_foot_5: socket_frame=/bodyset/calcn_r location=(0.07 -0.0282 0.0449) radius=0.02
    ContactSphere right_foot_6: socket_frame=/bodyset/calcn_r location=(0.119 -0.0282 -6.092648e-8) radius=0.02
    ContactSphere right_foot_7: socket_frame=/bodyset/calcn_r location=(0.01 0.0018 0) radius=0.05
    ContactSphere left_foot_1: socket_frame=/bodyset/toes_l location=(0.0699 -0.0299 0.0286) radius=0.02
    ContactSphere left_foot_2: socket_frame=/bodyset/toes_l location=(0.0294 -0.0299 -1.521175e-8) radius=0.02
    ContactSphere left_foot_3: socket_frame=/bodyset/calcn_l location=(0.1499 -0.0282 -6.884226e-8) radius=0.02
    ContactSphere left_foot_4: socket_frame=/bodyset/calcn_l location=(0.1499 -0.0282 0.02272616) radius=0.02
    ContactSphere left_foot_5: socket_frame=/bodyset/calcn_l location=(0.07 -0.0282 -0.0449) radius=0.02
    ContactSphere left_foot_6: socket_frame=/bodyset/calcn_l location=(0.119 -0.0282 6.092648e-8) radius=0.02
    ContactSphere left_foot_7: socket_frame=/bodyset/calcn_l location=(0.01 0.0018 0) radius=0.05
    ContactEllipsoid pelvis_capsule: socket_frame=/bodyset/pelvis location=(-0.06 -0.02 0) radii=(0.065 0.06 0.065)
    ContactEllipsoid femur_r_capsule: socket_frame=/bodyset/femur_r location=(0 -0.225 0.01) orientation=(1.5707 0.1 0)
        radii=(0.06 0.16 0.06)
    ContactEllipsoid femur_l_capsule: socket_frame=/bodyset/femur_l location=(0 -0.225 0) orientation=(1.5707 0.1 0)
        radii=(0.06 0.16 0.06)
    ContactEllipsoid tibia_r_capsule: socket_frame=/bodyset/tibia_r location=(0 -0.245 0) orientation=(1.5707 0 0)
        radii=(0.05 0.18 0.05)
    ContactEllipsoid tibia_l_capsule: socket_frame=/bodyset/tibia_l location=(0 -0.245 0) orientation=(1.5707 0 0)
        radii=(0.05 0.18 0.05)
    ContactEllipsoid lumbar_spine_capsule: socket_frame=/bodyset/torso location=(0 -0.185 -0.045)
        orientation=(1.5707 0.1 0) radii=(0.09 0.135 0.09)
    ContactEllipsoid lumbar_spine_capsule1: socket_frame=/bodyset/torso location=(0 -0.185 0.045)
        orientation=(1.5707 0.1 0) radii=(0.09 0.135 0.09)
    ContactSphere head: socket_frame=/bodyset/torso location=(-0.02 0.17 0) radius=0.11
    ContactEllipsoid humerus_r_capsule: socket_frame=/bodyset/humerus_r location=(0 -0.15 0) orientation=(1.5707 0 0)
        radii=(0.035 0.15 0.035)
    ContactEllipsoid humerus_l_capsule: socket_frame=/bodyset/humerus_l location=(0 -0.15 0) orientation=(1.5707 0 0)
        radii=(0.035 0.15 0.035)
    ContactEllipsoid ulna_r_capsule: socket_frame=/bodyset/ulna_r location=(-0.01 -0.18 0.02) orientation=(1.5707 0 0)
        radii=(0.025 0.15 0.025)
    ContactEllipsoid ulna_l_capsule: socket_frame=/bodyset/ulna_l location=(-0.01 -0.18 -0.02) orientation=(1.5707 0 0)
        radii=(0.035 0.15 0.035)
