# OpenSim document version 40600
Model athlete_model:
  Ground
  BodySet:
    Body pelvis: mass=11.777 [kg] mass_center=(-0.0707 0 0) inertia=(0.1028 0.0871 0.0579 0 0 0)
        meshes=(pelvis_r.obj pelvis_l.obj sacrum.obj)
      Station iliocrestale_r: .. (-0.05 0.082 0.11)
      Station iliocrestale_l: .. (-0.05 0.082 -0.11)
      Station iliocrestale_midpoint: .. (-0.05 0.082 0)
      Station ASIS_r: .. (-0.0015 0.0065 0.125)
      Station ASIS_l: .. (-0.0015 0.0065 -0.125)
      Station ASIS_midpoint: .. (-0.0015 0.0065 0)
      Station mid_pelvis: .. (-0.05 0.0065 0)
      Station PSIS_r: .. (-0.14 0.035 0.055)
      Station PSIS_l: .. (-0.14 0.035 -0.055)
      Station PSIS_midpoint: .. (-0.14 0.035 0)
      Station acetabulum_r: .. (-0.072 -0.06 0.08)
      Station acetabulum_l: .. (-0.072 -0.06 -0.08)
      StationDefinedFrame pelvis_frame: socket_point_a=/bodyset/pelvis/mid_pelvis
          socket_point_b=/bodyset/pelvis/ASIS_midpoint socket_point_c=/bodyset/pelvis/iliocrestale_midpoint
          socket_origin_point=/bodyset/pelvis/mid_pelvis ab_axis=+x ab_x_ac_axis=+z
      StationDefinedFrame hip_r_parent_frame: socket_point_a=/bodyset/pelvis/mid_pelvis
          socket_point_b=/bodyset/pelvis/ASIS_midpoint socket_point_c=/bodyset/pelvis/iliocrestale_midpoint
          socket_origin_point=/bodyset/pelvis/acetabulum_r ab_axis=+x ab_x_ac_axis=+z
      StationDefinedFrame hip_l_parent_frame: socket_point_a=/bodyset/pelvis/mid_pelvis
          socket_point_b=/bodyset/pelvis/ASIS_midpoint socket_point_c=/bodyset/pelvis/iliocrestale_midpoint
          socket_origin_point=/bodyset/pelvis/acetabulum_l ab_axis=+x ab_x_ac_axis=+z
    Body lumbar_spine: mass=5 mass_center=(0 -0.0875 0) inertia=(0.02233073 0.01914062 0.02233073 0 0 0)
    Body thorax: mass=16.83 mass_center=(-0.0591 -0.1486 0) inertia=(1.29841 0.55245 1.29841 0 0 0) meshes=ribs.obj
      Station suprasternale: .. (0 0 0)
      ContactEllipsoid thorax_r_obstacle: location=(-0.025 -0.13 0.057) orientation=(-0.12 -0.03 0.057)
          radii=(0.077 0.145 0.077)
      ContactEllipsoid pectoralis_r_obstacle: location=(-0.0195 -0.12 0.0585) orientation=(-0.122 -0.03 0.25)
          radii=(0.075 0.15 0.077)
      ContactEllipsoid thorax_l_obstacle: location=(-0.025 -0.13 -0.057) orientation=(0.12 0.03 0.057)
          radii=(0.077 0.145 0.077)
      ContactEllipsoid pectoralis_l_obstacle: location=(-0.0195 -0.12 -0.0585) orientation=(0.122 0.03 0.25)
          radii=(0.075 0.15 0.077)
    Body head: mass=5 mass_center=(0 0.0375 0) inertia=(0.01569 0.01455 0.0186 0 0 0) meshes=skull.obj
      Station glabella: .. (0.09 0.07 0)
      Station euryon_r: .. (-0.0015 0.085 0.069)
      Station euryon_l: .. (-0.0015 0.085 -0.069)
      Station opisthocranion: .. (-0.075 0.05 0)
      Station vertex: .. (0 0.14 0)
    Body clavicle_r: mass=0.1898 mass_center=(-0.0111 0.0064 0.0542) inertia=(0.00027 0.00027 4.9e-5 0 0 0)
        meshes=clavicle_r.obj
    Body clavicle_l: mass=0.1898 mass_center=(-0.0111 0.0064 -0.0542) inertia=(0.00027 0.00027 4.9e-5 0 0 0)
        meshes=clavicle_l.obj
    Body scapula_r: mass=0.7054 mass_center=(-0.04612 -0.0319 -0.04565) inertia=(0.001 0.001 0.001 0 0 0)
        meshes=scapula_r.obj
      Station acromion_r: .. (0 0 0)
    Body scapula_l: mass=0.7054 mass_center=(-0.04612 -0.0319 0.04565) inertia=(0.001 0.001 0.001 0 0 0)
        meshes=scapula_l.obj
      Station acromion_l: .. (0 0 0)
    Body humerus_r: mass=2.0325 mass_center=(0 -0.1645 0) inertia=(0.011946 0.004121 0.01341 0 0 0)
        meshes=humerus_r.obj
      ContactEllipsoid triceps_r_obstacle: location=(0.006 -0.265 -0.02) orientation=(2.234 1.3 -0.7)
          radii=(0.03 0.1 0.03)
      ContactEllipsoid biceps_r_obstacle: location=(0.013 -0.222 0.006) orientation=(0.65 1.11 0.975)
          radii=(0.03 0.085 0.03)
    Body humerus_l: mass=2.0325 mass_center=(0 -0.1645 0) inertia=(0.011946 0.004121 0.01341 0 0 0)
        meshes=humerus_l.obj
      ContactEllipsoid triceps_l_obstacle: location=(0.006 -0.265 0.02) orientation=(-2.234 -1.3 -0.7)
          radii=(0.03 0.1 0.03)
      ContactEllipsoid biceps_l_obstacle: location=(0.013 -0.222 -0.006) orientation=(-0.65 -1.11 0.975)
          radii=(0.03 0.085 0.03)
    Body hand_r: mass=0.1 mass_center=(0 -0.068095 0) inertia=(0.000892 0.000547 0.00134 0 0 0)
        meshes=(pisiform_r.obj lunate_r.obj scaphoid_r.obj triquetrum_r.obj hamate_r.obj capitate_r.obj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)
    Body hand_l: mass=0.1 mass_center=(0 -0.068095 0) inertia=(0.000892 0.000547 0.00134 0 0 0)
        meshes=(pisiform_l.obj lunate_l.obj scaphoid_l.obj triquetrum_l.obj hamate_l.obj capitate_l.obj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)
  JointSet:
    WeldJoint ground_pelvis: socket_parent_frame=ground_offset socket_child_frame=/bodyset/pelvis/pelvis_frame
      PhysicalOffsetFrame ground_offset: translation=(0 1 0) [meters] socket_parent=/ground
    WeldJoint lumbar: socket_parent_frame=lumbar_spine_parent_frame socket_child_frame=lumbar_spine_child_frame
        beam_length=0.175
      PhysicalOffsetFrame lumbar_spine_parent_frame: socket_parent=/bodyset/pelvis translation=(-0.09 0.075 0)
          orientation=(-1.570796 0.25 0) [radians]
      PhysicalOffsetFrame lumbar_spine_child_frame: socket_parent=/bodyset/lumbar_spine translation=(0 0 0)
          orientation=(-1.570796 0 0)
    WeldJoint thorax: socket_parent_frame=thoracic_spine_parent_frame socket_child_frame=thoracic_spine_child_frame
        beam_length=0.275
      PhysicalOffsetFrame thoracic_spine_parent_frame: socket_parent=/bodyset/lumbar_spine translation=(0 0 0)
          orientation=(-1.570796 0 0)
      PhysicalOffsetFrame thoracic_spine_child_frame: socket_parent=/bodyset/thorax translation=(-0.0275 0.057 0)
          orientation=(-1.570796 0.25 0)
    WeldJoint cervical: socket_parent_frame=cervical_spine_parent_frame socket_child_frame=cervical_spine_child_frame
        beam_length=0.075
      PhysicalOffsetFrame cervical_spine_parent_frame: socket_parent=/bodyset/thorax translation=(-0.0275 0.057 0)
          orientation=(-1.570796 0.25 0)
      PhysicalOffsetFrame cervical_spine_child_frame: socket_parent=/bodyset/head translation=(0 0 0)
          orientation=(-1.570796 0 0)
    WeldJoint sternoclavicular_r: socket_parent_frame=sternoclavicular_r_parent_frame
        socket_child_frame=sternoclavicular_r_child_frame
      PhysicalOffsetFrame sternoclavicular_r_parent_frame: socket_parent=/bodyset/thorax
          translation=(0.00632 0.00693 0.0255)
      PhysicalOffsetFrame sternoclavicular_r_child_frame: socket_parent=/bodyset/clavicle_r translation=(0 0 0)
    WeldJoint sternoclavicular_l: socket_parent_frame=sternoclavicular_l_parent_frame
        socket_child_frame=sternoclavicular_l_child_frame
      PhysicalOffsetFrame sternoclavicular_l_parent_frame: socket_parent=/bodyset/thorax
          translation=(0.00632 0.00693 -0.0255)
      PhysicalOffsetFrame sternoclavicular_l_child_frame: socket_parent=/bodyset/clavicle_l translation=(0 0 0)
    WeldJoint scapulothoracic_r: socket_parent_frame=/bodyset/thorax socket_child_frame=scapulothoracic_r_weld_frame
      PhysicalOffsetFrame scapulothoracic_r_weld_frame: socket_parent=/bodyset/scapula_r
          translation=(0.0654452 -0.0600243 -0.146101) orientation=(-0.291944 -0.284971 -0.12239)
    WeldJoint scapulothoracic_l: socket_parent_frame=/bodyset/thorax socket_child_frame=scapulothoracic_l_weld_frame
      PhysicalOffsetFrame scapulothoracic_l_weld_frame: socket_parent=/bodyset/scapula_l
          translation=(0.0654452 -0.0600243 0.146101) orientation=(0.291944 0.284971 -0.12239)
    CustomJoint glenohumeral_r: socket_parent_frame=glenohumeral_r_parent_frame socket_child_frame=/bodyset/humerus_r
      Coordinate shoulder_flexion_r: default_value=0 range=(-1.047198 3.141593) clamped=true
      PhysicalOffsetFrame glenohumeral_r_parent_frame: socket_parent=/bodyset/scapula_r
          translation=(-0.00955 -0.034 0.009) orientation=(-0.25 0 -0.125)
      SpatialTransform: axes_held_at_zero=(rotation2 rotation3 translation1 translation2 translation3)
        TransformAxis rotation1: coordinates=shoulder_flexion_r axis=(0 0 1) LinearFunction(coefficients=1 0)
    CustomJoint glenohumeral_l: socket_parent_frame=glenohumeral_l_parent_frame socket_child_frame=/bodyset/humerus_l
      Coordinate shoulder_flexion_l: default_value=0 range=(-1.047198 3.141593) clamped=true
      PhysicalOffsetFrame glenohumeral_l_parent_frame: socket_parent=/bodyset/scapula_l
          translation=(-0.00955 -0.034 -0.009) orientation=(0.25 0 -0.125)
      SpatialTransform: axes_held_at_zero=(rotation2 rotation3 translation1 translation2 translation3)
        TransformAxis rotation1: coordinates=shoulder_flexion_l axis=(0 0 1) LinearFunction(coefficients=1 0)
    WeldJoint elbow_r: socket_parent_frame=elbow_r_parent_frame socket_child_frame=elbow_r_child_frame
      PhysicalOffsetFrame elbow_r_parent_frame: socket_parent=/bodyset/humerus_r
          translation=(0.013144 -0.286273 -0.009595) orientation=(-0.0228627 0.228018 0.0051689)
      PhysicalOffsetFrame elbow_r_child_frame: socket_parent=/bodyset/hand_r translation=(0 0.2 0)
          orientation=(-0.0228627 0.228018 0.0051689)
    WeldJoint elbow_l: socket_parent_frame=elbow_l_parent_frame socket_child_frame=elbow_l_child_frame
      PhysicalOffsetFrame elbow_l_parent_frame: socket_parent=/bodyset/humerus_l
          translation=(0.013144 -0.286273 0.009595) orientation=(0.0228627 -0.228018 0.0051689)
      PhysicalOffsetFrame elbow_l_child_frame: socket_parent=/bodyset/hand_l translation=(0 0.2 0)
          orientation=(0.0228627 -0.228018 0.0051689)
  ForceSet:
    SpringGeneralizedForce shoulder_flexion_r_spring_force: coordinate=shoulder_flexion_r stiffness=0.01 viscosity=0.1
    CoordinateLimitForce shoulder_flexion_r_limit_force: coordinate=shoulder_flexion_r
        upper_stiffness=8.726646 [N*m/degree] upper_limit=180 [degrees] lower_stiffness=8.726646 [N*m/degree]
        lower_limit=-60 [degrees] damping=0.01745329 transition=1 [degrees] compute_dissipation_energy=false
    SpringGeneralizedForce shoulder_flexion_l_spring_force: coordinate=shoulder_flexion_l stiffness=0.01 viscosity=0.1
    CoordinateLimitForce shoulder_flexion_l_limit_force: coordinate=shoulder_flexion_l upper_stiffness=8.726646
        upper_limit=180 lower_stiffness=8.726646 lower_limit=-60 damping=0.01745329 transition=1
        compute_dissipation_energy=false
    Millard2012EquilibriumMuscle [values shared by the 50 below unless stated]: min_control=0.01 max_control=1
        ignore_tendon_compliance=true fiber_damping=0.1
      ActiveForceLengthCurve: minimum_value=0
      ForceVelocityCurve: concentric_slope_at_vmax=0 concentric_slope_near_vmax=0.25 isometric_slope=5
          eccentric_slope_at_vmax=0 eccentric_slope_near_vmax=0.15 max_eccentric_velocity_force_multiplier=1.4
      TendonForceLengthCurve
    Millard2012EquilibriumMuscle trapezius_clav_r: max_isometric_force=201.6 optimal_fiber_length=0.1127
        tendon_slack_length=0.027 pennation_angle_at_optimal=0 [radians]
      Scholz2015GeometryPath path: algorithm=minimum_length
        path_elements:
          Scholz2015GeometryPathPoint path_point_0:
            PathPoint: head (-0.0372 -0.0108 0.00245)
          Scholz2015GeometryPathPoint path_point_1:
            PathPoint: clavicle_r (-0.0301 0.0249 0.091)
      FiberForceLengthCurve: strain_at_zero_force=0 strain_at_one_norm_force=0.7 stiffness_at_low_force=0.2
          stiffness_at_one_norm_force=2.857143 curviness=0.75
    Millard2012EquilibriumMuscle levator_scapulae_r: max_isometric_force=280 optimal_fiber_length=0.1578
        tendon_slack_length=0.019 pennation_angle_at_optimal=0
      Scholz2015GeometryPath path: algorithm=minimum_length
        path_elements:
          Scholz2015GeometryPathPoint path_point_0:
            PathPoint: head (-0.00967 -0.0102 0.0311)
          Scholz2015GeometryPathObstacle obstacle_0: socket_contact_geometry=/bodyset/thorax/thorax_r_obstacle
              contact_hint=(-0.035 0.225 0.04)
          Scholz2015GeometryPathPoint path_point_1:
            PathPoint: scapula_r (-0.078 -0.0081 -0.1029)
      FiberForceLengthCurve: strain_at_zero_force=0 strain_at_one_norm_force=0.7 stiffness_at_low_force=0.2
          stiffness_at_one_norm_force=2.857143 curviness=0.75
    Millard2012EquilibriumMuscle rectus_abdominis_r: max_isometric_force=705.9 optimal_fiber_length=0.30295
        tendon_slack_length=0.0824 pennation_angle_at_optimal=0
      Scholz2015GeometryPath path: algorithm=minimum_length
        path_elements:
          Scholz2015GeometryPathPoint path_point_0:
            PathPoint: pelvis (-0.0275 -0.075 0.0125)
          Scholz2015GeometryPathPoint path_point_1:
            PathPoint: pelvis (-0.002 0.07 0.035)
          Scholz2015GeometryPathPoint path_point_2:
            PathPoint: lumbar_spine (0.082 -0.11 0.035)
          Scholz2015GeometryPathPoint path_point_3:
            PathPoint: thorax (0.083 -0.225 0.035)
          Scholz2015GeometryPathPoint path_point_4:
            PathPoint: thorax (0.072 -0.17 0.035)
      FiberForceLengthCurve: strain_at_zero_force=0 strain_at_one_norm_force=0.7 stiffness_at_low_force=0.2
          stiffness_at_one_norm_force=2.857143 curviness=0.75
    Millard2012EquilibriumMuscle trapezius_clav_l: max_isometric_force=201.6 optimal_fiber_length=0.1127
        tendon_slack_length=0.027 pennation_angle_at_optimal=0
      Scholz2015GeometryPath path: algorithm=minimum_length
        path_elements:
          Scholz2015GeometryPathPoint path_point_0:
            PathPoint: head (-0.0372 -0.0108 -0.00245)
          Scholz2015GeometryPathPoint path_point_1:
            PathPoint: clavicle_l (-0.0301 0.0249 -0.091)
      FiberForceLengthCurve: strain_at_zero_force=0 strain_at_one_norm_force=0.7 stiffness_at_low_force=0.2
          stiffness_at_one_norm_force=2.857143 curviness=0.75
    Millard2012EquilibriumMuscle levator_scapulae_l: max_isometric_force=280 optimal_fiber_length=0.1578
        tendon_slack_length=0.019 pennation_angle_at_optimal=0
      Scholz2015GeometryPath path: algorithm=minimum_length
        path_elements:
          Scholz2015GeometryPathPoint path_point_0:
            PathPoint: head (-0.00967 -0.0102 -0.0311)
          Scholz2015GeometryPathObstacle obstacle_0: socket_contact_geometry=/bodyset/thorax/thorax_l_obstacle
              contact_hint=(-0.035 0.225 -0.04)
          Scholz2015GeometryPathPoint path_point_1:
            PathPoint: scapula_l (-0.078 -0.0081 0.1029)
      FiberForceLengthCurve: strain_at_zero_force=0 strain_at_one_norm_force=0.7 stiffness_at_low_force=0.2
          stiffness_at_one_norm_force=2.857143 curviness=0.75
    Millard2012EquilibriumMuscle rectus_abdominis_l: max_isometric_force=705.9 optimal_fiber_length=0.30295
        tendon_slack_length=0.0824 pennation_angle_at_optimal=0
      Scholz2015GeometryPath path: algorithm=minimum_length
        path_elements:
          Scholz2015GeometryPathPoint path_point_0:
            PathPoint: pelvis (-0.0275 -0.075 -0.0125)
          Scholz2015GeometryPathPoint path_point_1:
            PathPoint: pelvis (-0.002 0.07 -0.035)
          Scholz2015GeometryPathPoint path_point_2:
            PathPoint: lumbar_spine (0.082 -0.11 -0.035)
          Scholz2015GeometryPathPoint path_point_3:
            PathPoint: thorax (0.083 -0.225 -0.035)
          Scholz2015GeometryPathPoint path_point_4:
            PathPoint: thorax (0.072 -0.17 -0.035)
      FiberForceLengthCurve: strain_at_zero_force=0 strain_at_one_norm_force=0.7 stiffness_at_low_force=0.2
          stiffness_at_one_norm_force=2.857143 curviness=0.75
    Millard2012EquilibriumMuscle extobl1_r: max_isometric_force=820.0712 optimal_fiber_length=0.04521444
        tendon_slack_length=0.05894471 pennation_angle_at_optimal=0
      Scholz2015GeometryPath path: algorithm=minimum_length
        path_elements:
          Scholz2015GeometryPathPoint path_point_0:
            PathPoint: lumbar_spine (0.083 -0.104 0.05)
          Scholz2015GeometryPathPoint path_point_1:
            PathPoint: thorax (0.083 -0.225 0.077)
          Scholz2015GeometryPathPoint path_point_2:
            PathPoint: thorax (0.075 -0.195 0.094)
      FiberForceLengthCurve: strain_at_zero_force=0 strain_at_one_norm_force=0.9 stiffness_at_low_force=0.2
          stiffness_at_one_norm_force=2.857143 curviness=0.75
    Millard2012EquilibriumMuscle extobl2_r: max_isometric_force=1464.327 optimal_fiber_length=0.07409505
        tendon_slack_length=0.09013928 pennation_angle_at_optimal=0
      Scholz2015GeometryPath path: algorithm=minimum_length
        path_elements:
          Scholz2015GeometryPathPoint path_point_0:
            PathPoint: lumbar_spine (0.057 -0.175 0.05)
          Scholz2015GeometryPathPoint path_point_1:
            PathPoint: thorax (0.059 -0.242 0.125)
          Scholz2015GeometryPathPoint path_point_2:
            PathPoint: thorax (0.048 -0.22 0.133)
      FiberForceLengthCurve: strain_at_zero_force=0 strain_at_one_norm_force=0.9 stiffness_at_low_force=0.2
          stiffness_at_one_norm_force=2.857143 curviness=0.75
    Millard2012EquilibriumMuscle extobl3_r: max_isometric_force=125.5796 optimal_fiber_length=0.09674745
        tendon_slack_length=0.0926754 pennation_angle_at_optimal=0
      Scholz2015GeometryPath path: algorithm=minimum_length
        path_elements:
          Scholz2015GeometryPathPoint path_point_0:
            PathPoint: pelvis (-0.035 0.05 0.128)
          Scholz2015GeometryPathPoint path_point_1:
            PathPoint: thorax (-0.027 -0.234 0.119)
      FiberForceLengthCurve: strain_at_zero_force=0 strain_at_one_norm_force=0.9 stiffness_at_low_force=0.2
          stiffness_at_one_norm_force=2.857143 curviness=0.75
    Millard2012EquilibriumMuscle extobl4_r: max_isometric_force=149.8368 optimal_fiber_length=0.08819434
        tendon_slack_length=0.04651049 pennation_angle_at_optimal=0
      Scholz2015GeometryPath path: algorithm=minimum_length
        path_elements:
          Scholz2015GeometryPathPoint path_point_0:
            PathPoint: pelvis (-0.1 0.0875 0.076)
          Scholz2015GeometryPathPoint path_point_1:
            PathPoint: thorax (-0.06 -0.25 0.072)
      FiberForceLengthCurve: strain_at_zero_force=0 strain_at_one_norm_force=0.9 stiffness_at_low_force=0.2
          stiffness_at_one_norm_force=2.857143 curviness=0.75
    Millard2012EquilibriumMuscle intobl1_r: max_isometric_force=911.3819 optimal_fiber_length=0.0563702
        tendon_slack_length=0.06428265 pennation_angle_at_optimal=0
      Scholz2015GeometryPath path: algorithm=minimum_length
        path_elements:
          Scholz2015GeometryPathPoint path_point_0:
            PathPoint: pelvis (-0.023 0.043 0.129)
          Scholz2015GeometryPathPoint path_point_1:
            PathPoint: lumbar_spine (0.055 -0.142 0.06)
      FiberForceLengthCurve: strain_at_zero_force=0 strain_at_one_norm_force=0.8 stiffness_at_low_force=0.2
          stiffness_at_one_norm_force=2.857143 curviness=0.75
    Millard2012EquilibriumMuscle intobl2_r: max_isometric_force=122.0465 optimal_fiber_length=0.04583168
        tendon_slack_length=0.05541231 pennation_angle_at_optimal=0
      Scholz2015GeometryPath path: algorithm=minimum_length
        path_elements:
          Scholz2015GeometryPathPoint path_point_0:
            PathPoint: pelvis (-0.044 0.068 0.12)
          Scholz2015GeometryPathPoint path_point_1:
            PathPoint: lumbar_spine (0.042 -0.116 0.0655)
      FiberForceLengthCurve: strain_at_zero_force=0 strain_at_one_norm_force=0.8 stiffness_at_low_force=0.2
          stiffness_at_one_norm_force=2.857143 curviness=0.75
    Millard2012EquilibriumMuscle intobl3_r: max_isometric_force=426.7694 optimal_fiber_length=0.09717005
        tendon_slack_length=0.04093657 pennation_angle_at_optimal=0
      Scholz2015GeometryPath path: algorithm=minimum_length
        path_elements:
          Scholz2015GeometryPathPoint path_point_0:
            PathPoint: pelvis (-0.063 0.088 0.101)
          Scholz2015GeometryPathPoint path_point_1:
            PathPoint: thorax (0.032 -0.266 0.112)
      FiberForceLengthCurve: strain_at_zero_force=0 strain_at_one_norm_force=0.8 stiffness_at_low_force=0.2
          stiffness_at_one_norm_force=2.857143 curviness=0.75
    Millard2012EquilibriumMuscle intobl4_r: max_isometric_force=652.5784 optimal_fiber_length=0.08988439
        tendon_slack_length=0.03833113 pennation_angle_at_optimal=0
      Scholz2015GeometryPath path: algorithm=minimum_length
        path_elements:
          Scholz2015GeometryPathPoint path_point_0:
            PathPoint: pelvis (-0.085 0.091 0.083)
          Scholz2015GeometryPathPoint path_point_1:
            PathPoint: thorax (-0.001 -0.265 0.105)
      FiberForceLengthCurve: strain_at_zero_force=0 strain_at_one_norm_force=0.8 stiffness_at_low_force=0.2
          stiffness_at_one_norm_force=2.857143 curviness=0.75
    Millard2012EquilibriumMuscle qlpost1_r: max_isometric_force=81.71412 optimal_fiber_length=0.07838761
        tendon_slack_length=0.06586498 pennation_angle_at_optimal=0.12915
      Scholz2015GeometryPath path: algorithm=minimum_length
        path_elements:
          Scholz2015GeometryPathPoint path_point_0:
            PathPoint: pelvis (-0.103 0.089 0.07)
          Scholz2015GeometryPathPoint path_point_1:
            PathPoint: lumbar_spine (-0.001 -0.032 0.026)
      FiberForceLengthCurve: strain_at_zero_force=0 strain_at_one_norm_force=0.7 stiffness_at_low_force=0.2
          stiffness_at_one_norm_force=2.857143 curviness=0.75
    Millard2012EquilibriumMuscle qlpost2_r: max_isometric_force=87.71271 optimal_fiber_length=0.05639958
        tendon_slack_length=0.0473896 pennation_angle_at_optimal=0.12915
      Scholz2015GeometryPath path: algorithm=minimum_length
        path_elements:
          Scholz2015GeometryPathPoint path_point_0:
            PathPoint: pelvis (-0.111 0.082 0.065)
          Scholz2015GeometryPathPoint path_point_1:
            PathPoint: lumbar_spine (-0.013 -0.076 0.027)
      FiberForceLengthCurve: strain_at_zero_force=0 strain_at_one_norm_force=0.7 stiffness_at_low_force=0.2
          stiffness_at_one_norm_force=2.857143 curviness=0.75
    Millard2012EquilibriumMuscle qlpost3_r: max_isometric_force=199.5611 optimal_fiber_length=0.03984876
        tendon_slack_length=0.03348282 pennation_angle_at_optimal=0.12915
      Scholz2015GeometryPath path: algorithm=minimum_length
        path_elements:
          Scholz2015GeometryPathPoint path_point_0:
            PathPoint: pelvis (-0.119 0.077 0.062)
          Scholz2015GeometryPathPoint path_point_1:
            PathPoint: lumbar_spine (-0.029 -0.111 0.034)
      FiberForceLengthCurve: strain_at_zero_force=0 strain_at_one_norm_force=0.7 stiffness_at_low_force=0.2
          stiffness_at_one_norm_force=2.857143 curviness=0.75
    Millard2012EquilibriumMuscle qlmid1_r: max_isometric_force=327.7053 optimal_fiber_length=0.04339944
        tendon_slack_length=0.02253553 pennation_angle_at_optimal=0.12915
      Scholz2015GeometryPath path: algorithm=minimum_length
        path_elements:
          Scholz2015GeometryPathPoint path_point_0:
            PathPoint: lumbar_spine (0.003 -0.046 0.018)
          Scholz2015GeometryPathPoint path_point_1:
            PathPoint: thorax (-0.066 -0.215 0.026)
      FiberForceLengthCurve: strain_at_zero_force=0 strain_at_one_norm_force=0.7 stiffness_at_low_force=0.2
          stiffness_at_one_norm_force=2.857143 curviness=0.75
    Millard2012EquilibriumMuscle qlmid2_r: max_isometric_force=175.9307 optimal_fiber_length=0.06346574
        tendon_slack_length=0.03295513 pennation_angle_at_optimal=0.12915
      Scholz2015GeometryPath path: algorithm=minimum_length
        path_elements:
          Scholz2015GeometryPathPoint path_point_0:
            PathPoint: lumbar_spine (0.004 -0.072 0.021)
          Scholz2015GeometryPathPoint path_point_1:
            PathPoint: thorax (-0.071 -0.231 0.05)
      FiberForceLengthCurve: strain_at_zero_force=0 strain_at_one_norm_force=0.7 stiffness_at_low_force=0.2
          stiffness_at_one_norm_force=2.857143 curviness=0.75
    Millard2012EquilibriumMuscle qlmid3_r: max_isometric_force=51.06528 optimal_fiber_length=0.07583145
        tendon_slack_length=0.03937613 pennation_angle_at_optimal=0.12915
      Scholz2015GeometryPath path: algorithm=minimum_length
        path_elements:
          Scholz2015GeometryPathPoint path_point_0:
            PathPoint: lumbar_spine (0.005 -0.103 0.024)
          Scholz2015GeometryPathPoint path_point_1:
            PathPoint: thorax (-0.058 -0.25 0.071)
      FiberForceLengthCurve: strain_at_zero_force=0 strain_at_one_norm_force=0.7 stiffness_at_low_force=0.2
          stiffness_at_one_norm_force=2.857143 curviness=0.75
    Millard2012EquilibriumMuscle qlant1_r: max_isometric_force=134.8054 optimal_fiber_length=0.1175095
        tendon_slack_length=0.06101783 pennation_angle_at_optimal=0.12915
      Scholz2015GeometryPath path: algorithm=minimum_length
        path_elements:
          Scholz2015GeometryPathPoint path_point_0:
            PathPoint: pelvis (-0.1 0.085 0.065)
          Scholz2015GeometryPathPoint path_point_1:
            PathPoint: thorax (-0.046 -0.214 0.026)
      FiberForceLengthCurve: strain_at_zero_force=0 strain_at_one_norm_force=0.7 stiffness_at_low_force=0.2
          stiffness_at_one_norm_force=2.857143 curviness=0.75
    Millard2012EquilibriumMuscle qlant2_r: max_isometric_force=167.3588 optimal_fiber_length=0.0989391
        tendon_slack_length=0.05137497 pennation_angle_at_optimal=0.12915
      Scholz2015GeometryPath path: algorithm=minimum_length
        path_elements:
          Scholz2015GeometryPathPoint path_point_0:
            PathPoint: pelvis (-0.1 0.085 0.065)
          Scholz2015GeometryPathPoint path_point_1:
            PathPoint: thorax (-0.067 -0.23 0.05)
      FiberForceLengthCurve: strain_at_zero_force=0 strain_at_one_norm_force=0.7 stiffness_at_low_force=0.2
          stiffness_at_one_norm_force=2.857143 curviness=0.75
    Millard2012EquilibriumMuscle scm1_r: max_isometric_force=197 optimal_fiber_length=0.108
        tendon_slack_length=0.056123 pennation_angle_at_optimal=0.2618
      Scholz2015GeometryPath path: algorithm=minimum_length
        path_elements:
          Scholz2015GeometryPathPoint path_point_0:
            PathPoint: thorax (0 0 0.02)
          Scholz2015GeometryPathPoint path_point_1:
            PathPoint: head (0.002 0.007 0.054)
      FiberForceLengthCurve: strain_at_zero_force=0 strain_at_one_norm_force=0.7 stiffness_at_low_force=0.2
          stiffness_at_one_norm_force=2.857143 curviness=0.75
    Millard2012EquilibriumMuscle scm2_r: max_isometric_force=98.5 optimal_fiber_length=0.108
        tendon_slack_length=0.035198 pennation_angle_at_optimal=0.2618
      Scholz2015GeometryPath path: algorithm=minimum_length
        path_elements:
          Scholz2015GeometryPathPoint path_point_0:
            PathPoint: clavicle_r (0.00388 0.00542 0.0352)
          Scholz2015GeometryPathPoint path_point_1:
            PathPoint: head (0.002 0.007 0.054)
      FiberForceLengthCurve: strain_at_zero_force=0 strain_at_one_norm_force=0.7 stiffness_at_low_force=0.2
          stiffness_at_one_norm_force=2.857143 curviness=0.75
    Millard2012EquilibriumMuscle scm3_r: max_isometric_force=98.5 optimal_fiber_length=0.108
        tendon_slack_length=0.069467 pennation_angle_at_optimal=0.2618
      Scholz2015GeometryPath path: algorithm=minimum_length
        path_elements:
          Scholz2015GeometryPathPoint path_point_0:
            PathPoint: clavicle_r (0.00388 0.00542 0.0352)
          Scholz2015GeometryPathPoint path_point_1:
            PathPoint: head (-0.026 0.019 0.055)
      FiberForceLengthCurve: strain_at_zero_force=0 strain_at_one_norm_force=0.7 stiffness_at_low_force=0.2
          stiffness_at_one_norm_force=2.857143 curviness=0.75
    Millard2012EquilibriumMuscle scalenus_ant_r: max_isometric_force=147 optimal_fiber_length=0.042
        tendon_slack_length=0.053421 pennation_angle_at_optimal=0.17453
      Scholz2015GeometryPath path: algorithm=minimum_length
        path_elements:
          Scholz2015GeometryPathPoint path_point_0:
            PathPoint: thorax (-0.005 0 0.054)
          Scholz2015GeometryPathPoint path_point_1:
            PathPoint: head (0.005 -0.034 0.02)
      FiberForceLengthCurve: strain_at_zero_force=0 strain_at_one_norm_force=0.7 stiffness_at_low_force=0.2
          stiffness_at_one_norm_force=2.857143 curviness=0.75
    Millard2012EquilibriumMuscle scalenus_med_r: max_isometric_force=206 optimal_fiber_length=0.05
        tendon_slack_length=0.061508 pennation_angle_at_optimal=0.17453
      Scholz2015GeometryPath path: algorithm=minimum_length
        path_elements:
          Scholz2015GeometryPathPoint path_point_0:
            PathPoint: thorax (-0.028 0.017 0.07)
          Scholz2015GeometryPathPoint path_point_1:
            PathPoint: head (-0.005 -0.02 0.02)
      FiberForceLengthCurve: strain_at_zero_force=0 strain_at_one_norm_force=0.7 stiffness_at_low_force=0.2
          stiffness_at_one_norm_force=2.857143 curviness=0.75
    Millard2012EquilibriumMuscle scalenus_post_r: max_isometric_force=157 optimal_fiber_length=0.062
        tendon_slack_length=0.072845 pennation_angle_at_optimal=0.17453
      Scholz2015GeometryPath path: algorithm=minimum_length
        path_elements:
          Scholz2015GeometryPathPoint path_point_0:
            PathPoint: thorax (-0.035 -0.008 0.088)
          Scholz2015GeometryPathPoint path_point_1:
            PathPoint: head (-0.007 -0.051 0.021)
      FiberForceLengthCurve: strain_at_zero_force=0 strain_at_one_norm_force=0.7 stiffness_at_low_force=0.2
          stiffness_at_one_norm_force=2.857143 curviness=0.75
    Millard2012EquilibriumMuscle extobl1_l: max_isometric_force=820.0712 optimal_fiber_length=0.04521444
        tendon_slack_length=0.05894471 pennation_angle_at_optimal=0
      Scholz2015GeometryPath path: algorithm=minimum_length
        path_elements:
          Scholz2015GeometryPathPoint path_point_0:
            PathPoint: lumbar_spine (0.083 -0.104 -0.05)
          Scholz2015GeometryPathPoint path_point_1:
            PathPoint: thorax (0.083 -0.225 -0.077)
          Scholz2015GeometryPathPoint path_point_2:
            PathPoint: thorax (0.075 -0.195 -0.094)
      FiberForceLengthCurve: strain_at_zero_force=0 strain_at_one_norm_force=0.9 stiffness_at_low_force=0.2
          stiffness_at_one_norm_force=2.857143 curviness=0.75
    Millard2012EquilibriumMuscle extobl2_l: max_isometric_force=1464.327 optimal_fiber_length=0.07409505
        tendon_slack_length=0.09013928 pennation_angle_at_optimal=0
      Scholz2015GeometryPath path: algorithm=minimum_length
        path_elements:
          Scholz2015GeometryPathPoint path_point_0:
            PathPoint: lumbar_spine (0.057 -0.175 -0.05)
          Scholz2015GeometryPathPoint path_point_1:
            PathPoint: thorax (0.059 -0.242 -0.125)
          Scholz2015GeometryPathPoint path_point_2:
            PathPoint: thorax (0.048 -0.22 -0.133)
      FiberForceLengthCurve: strain_at_zero_force=0 strain_at_one_norm_force=0.9 stiffness_at_low_force=0.2
          stiffness_at_one_norm_force=2.857143 curviness=0.75
    Millard2012EquilibriumMuscle extobl3_l: max_isometric_force=125.5796 optimal_fiber_length=0.09674745
        tendon_slack_length=0.0926754 pennation_angle_at_optimal=0
      Scholz2015GeometryPath path: algorithm=minimum_length
        path_elements:
          Scholz2015GeometryPathPoint path_point_0:
            PathPoint: pelvis (-0.035 0.05 -0.128)
          Scholz2015GeometryPathPoint path_point_1:
            PathPoint: thorax (-0.027 -0.234 -0.119)
      FiberForceLengthCurve: strain_at_zero_force=0 strain_at_one_norm_force=0.9 stiffness_at_low_force=0.2
          stiffness_at_one_norm_force=2.857143 curviness=0.75
    Millard2012EquilibriumMuscle extobl4_l: max_isometric_force=149.8368 optimal_fiber_length=0.08819434
        tendon_slack_length=0.04651049 pennation_angle_at_optimal=0
      Scholz2015GeometryPath path: algorithm=minimum_length
        path_elements:
          Scholz2015GeometryPathPoint path_point_0:
            PathPoint: pelvis (-0.1 0.0875 -0.076)
          Scholz2015GeometryPathPoint path_point_1:
            PathPoint: thorax (-0.06 -0.25 -0.072)
      FiberForceLengthCurve: strain_at_zero_force=0 strain_at_one_norm_force=0.9 stiffness_at_low_force=0.2
          stiffness_at_one_norm_force=2.857143 curviness=0.75
    Millard2012EquilibriumMuscle intobl1_l: max_isometric_force=911.3819 optimal_fiber_length=0.0563702
        tendon_slack_length=0.06428265 pennation_angle_at_optimal=0
      Scholz2015GeometryPath path: algorithm=minimum_length
        path_elements:
          Scholz2015GeometryPathPoint path_point_0:
            PathPoint: pelvis (-0.023 0.043 -0.129)
          Scholz2015GeometryPathPoint path_point_1:
            PathPoint: lumbar_spine (0.055 -0.142 -0.06)
      FiberForceLengthCurve: strain_at_zero_force=0 strain_at_one_norm_force=0.8 stiffness_at_low_force=0.2
          stiffness_at_one_norm_force=2.857143 curviness=0.75
    Millard2012EquilibriumMuscle intobl2_l: max_isometric_force=122.0465 optimal_fiber_length=0.04583168
        tendon_slack_length=0.05541231 pennation_angle_at_optimal=0
      Scholz2015GeometryPath path: algorithm=minimum_length
        path_elements:
          Scholz2015GeometryPathPoint path_point_0:
            PathPoint: pelvis (-0.044 0.068 -0.12)
          Scholz2015GeometryPathPoint path_point_1:
            PathPoint: lumbar_spine (0.042 -0.116 -0.0655)
      FiberForceLengthCurve: strain_at_zero_force=0 strain_at_one_norm_force=0.8 stiffness_at_low_force=0.2
          stiffness_at_one_norm_force=2.857143 curviness=0.75
    Millard2012EquilibriumMuscle intobl3_l: max_isometric_force=426.7694 optimal_fiber_length=0.09717005
        tendon_slack_length=0.04093657 pennation_angle_at_optimal=0
      Scholz2015GeometryPath path: algorithm=minimum_length
        path_elements:
          Scholz2015GeometryPathPoint path_point_0:
            PathPoint: pelvis (-0.063 0.088 -0.101)
          Scholz2015GeometryPathPoint path_point_1:
            PathPoint: thorax (0.032 -0.266 -0.112)
      FiberForceLengthCurve: strain_at_zero_force=0 strain_at_one_norm_force=0.8 stiffness_at_low_force=0.2
          stiffness_at_one_norm_force=2.857143 curviness=0.75
    Millard2012EquilibriumMuscle intobl4_l: max_isometric_force=652.5784 optimal_fiber_length=0.08988439
        tendon_slack_length=0.03833113 pennation_angle_at_optimal=0
      Scholz2015GeometryPath path: algorithm=minimum_length
        path_elements:
          Scholz2015GeometryPathPoint path_point_0:
            PathPoint: pelvis (-0.085 0.091 -0.083)
          Scholz2015GeometryPathPoint path_point_1:
            PathPoint: thorax (-0.001 -0.265 -0.105)
      FiberForceLengthCurve: strain_at_zero_force=0 strain_at_one_norm_force=0.8 stiffness_at_low_force=0.2
          stiffness_at_one_norm_force=2.857143 curviness=0.75
    Millard2012EquilibriumMuscle qlpost1_l: max_isometric_force=81.71412 optimal_fiber_length=0.07838761
        tendon_slack_length=0.06586498 pennation_angle_at_optimal=0.12915
      Scholz2015GeometryPath path: algorithm=minimum_length
        path_elements:
          Scholz2015GeometryPathPoint path_point_0:
            PathPoint: pelvis (-0.103 0.089 -0.07)
          Scholz2015GeometryPathPoint path_point_1:
            PathPoint: lumbar_spine (-0.001 -0.032 -0.026)
      FiberForceLengthCurve: strain_at_zero_force=0 strain_at_one_norm_force=0.7 stiffness_at_low_force=0.2
          stiffness_at_one_norm_force=2.857143 curviness=0.75
    Millard2012EquilibriumMuscle qlpost2_l: max_isometric_force=87.71271 optimal_fiber_length=0.05639958
        tendon_slack_length=0.0473896 pennation_angle_at_optimal=0.12915
      Scholz2015GeometryPath path: algorithm=minimum_length
        path_elements:
          Scholz2015GeometryPathPoint path_point_0:
            PathPoint: pelvis (-0.111 0.082 -0.065)
          Scholz2015GeometryPathPoint path_point_1:
            PathPoint: lumbar_spine (-0.013 -0.076 -0.027)
      FiberForceLengthCurve: strain_at_zero_force=0 strain_at_one_norm_force=0.7 stiffness_at_low_force=0.2
          stiffness_at_one_norm_force=2.857143 curviness=0.75
    Millard2012EquilibriumMuscle qlpost3_l: max_isometric_force=199.5611 optimal_fiber_length=0.03984876
        tendon_slack_length=0.03348282 pennation_angle_at_optimal=0.12915
      Scholz2015GeometryPath path: algorithm=minimum_length
        path_elements:
          Scholz2015GeometryPathPoint path_point_0:
            PathPoint: pelvis (-0.119 0.077 -0.062)
          Scholz2015GeometryPathPoint path_point_1:
            PathPoint: lumbar_spine (-0.029 -0.111 -0.034)
      FiberForceLengthCurve: strain_at_zero_force=0 strain_at_one_norm_force=0.7 stiffness_at_low_force=0.2
          stiffness_at_one_norm_force=2.857143 curviness=0.75
    Millard2012EquilibriumMuscle qlmid1_l: max_isometric_force=327.7053 optimal_fiber_length=0.04339944
        tendon_slack_length=0.02253553 pennation_angle_at_optimal=0.12915
      Scholz2015GeometryPath path: algorithm=minimum_length
        path_elements:
          Scholz2015GeometryPathPoint path_point_0:
            PathPoint: lumbar_spine (0.003 -0.046 -0.018)
          Scholz2015GeometryPathPoint path_point_1:
            PathPoint: thorax (-0.066 -0.215 -0.026)
      FiberForceLengthCurve: strain_at_zero_force=0 strain_at_one_norm_force=0.7 stiffness_at_low_force=0.2
          stiffness_at_one_norm_force=2.857143 curviness=0.75
    Millard2012EquilibriumMuscle qlmid2_l: max_isometric_force=175.9307 optimal_fiber_length=0.06346574
        tendon_slack_length=0.03295513 pennation_angle_at_optimal=0.12915
      Scholz2015GeometryPath path: algorithm=minimum_length
        path_elements:
          Scholz2015GeometryPathPoint path_point_0:
            PathPoint: lumbar_spine (0.004 -0.072 -0.021)
          Scholz2015GeometryPathPoint path_point_1:
            PathPoint: thorax (-0.071 -0.231 -0.05)
      FiberForceLengthCurve: strain_at_zero_force=0 strain_at_one_norm_force=0.7 stiffness_at_low_force=0.2
          stiffness_at_one_norm_force=2.857143 curviness=0.75
    Millard2012EquilibriumMuscle qlmid3_l: max_isometric_force=51.06528 optimal_fiber_length=0.07583145
        tendon_slack_length=0.03937613 pennation_angle_at_optimal=0.12915
      Scholz2015GeometryPath path: algorithm=minimum_length
        path_elements:
          Scholz2015GeometryPathPoint path_point_0:
            PathPoint: lumbar_spine (0.005 -0.103 -0.024)
          Scholz2015GeometryPathPoint path_point_1:
            PathPoint: thorax (-0.058 -0.25 -0.071)
      FiberForceLengthCurve: strain_at_zero_force=0 strain_at_one_norm_force=0.7 stiffness_at_low_force=0.2
          stiffness_at_one_norm_force=2.857143 curviness=0.75
    Millard2012EquilibriumMuscle qlant1_l: max_isometric_force=134.8054 optimal_fiber_length=0.1175095
        tendon_slack_length=0.06101783 pennation_angle_at_optimal=0.12915
      Scholz2015GeometryPath path: algorithm=minimum_length
        path_elements:
          Scholz2015GeometryPathPoint path_point_0:
            PathPoint: pelvis (-0.1 0.085 -0.065)
          Scholz2015GeometryPathPoint path_point_1:
            PathPoint: thorax (-0.046 -0.214 -0.026)
      FiberForceLengthCurve: strain_at_zero_force=0 strain_at_one_norm_force=0.7 stiffness_at_low_force=0.2
          stiffness_at_one_norm_force=2.857143 curviness=0.75
    Millard2012EquilibriumMuscle qlant2_l: max_isometric_force=167.3588 optimal_fiber_length=0.0989391
        tendon_slack_length=0.05137497 pennation_angle_at_optimal=0.12915
      Scholz2015GeometryPath path: algorithm=minimum_length
        path_elements:
          Scholz2015GeometryPathPoint path_point_0:
            PathPoint: pelvis (-0.1 0.085 -0.065)
          Scholz2015GeometryPathPoint path_point_1:
            PathPoint: thorax (-0.067 -0.23 -0.05)
      FiberForceLengthCurve: strain_at_zero_force=0 strain_at_one_norm_force=0.7 stiffness_at_low_force=0.2
          stiffness_at_one_norm_force=2.857143 curviness=0.75
    Millard2012EquilibriumMuscle scm1_l: max_isometric_force=197 optimal_fiber_length=0.108
        tendon_slack_length=0.056123 pennation_angle_at_optimal=0.2618
      Scholz2015GeometryPath path: algorithm=minimum_length
        path_elements:
          Scholz2015GeometryPathPoint path_point_0:
            PathPoint: thorax (0 0 -0.02)
          Scholz2015GeometryPathPoint path_point_1:
            PathPoint: head (0.002 0.007 -0.054)
      FiberForceLengthCurve: strain_at_zero_force=0 strain_at_one_norm_force=0.7 stiffness_at_low_force=0.2
          stiffness_at_one_norm_force=2.857143 curviness=0.75
    Millard2012EquilibriumMuscle scm2_l: max_isometric_force=98.5 optimal_fiber_length=0.108
        tendon_slack_length=0.035198 pennation_angle_at_optimal=0.2618
      Scholz2015GeometryPath path: algorithm=minimum_length
        path_elements:
          Scholz2015GeometryPathPoint path_point_0:
            PathPoint: clavicle_l (0.00388 0.00542 -0.0352)
          Scholz2015GeometryPathPoint path_point_1:
            PathPoint: head (0.002 0.007 -0.054)
      FiberForceLengthCurve: strain_at_zero_force=0 strain_at_one_norm_force=0.7 stiffness_at_low_force=0.2
          stiffness_at_one_norm_force=2.857143 curviness=0.75
    Millard2012EquilibriumMuscle scm3_l: max_isometric_force=98.5 optimal_fiber_length=0.108
        tendon_slack_length=0.069467 pennation_angle_at_optimal=0.2618
      Scholz2015GeometryPath path: algorithm=minimum_length
        path_elements:
          Scholz2015GeometryPathPoint path_point_0:
            PathPoint: clavicle_l (0.00388 0.00542 -0.0352)
          Scholz2015GeometryPathPoint path_point_1:
            PathPoint: head (-0.026 0.019 -0.055)
      FiberForceLengthCurve: strain_at_zero_force=0 strain_at_one_norm_force=0.7 stiffness_at_low_force=0.2
          stiffness_at_one_norm_force=2.857143 curviness=0.75
    Millard2012EquilibriumMuscle scalenus_ant_l: max_isometric_force=147 optimal_fiber_length=0.042
        tendon_slack_length=0.053421 pennation_angle_at_optimal=0.17453
      Scholz2015GeometryPath path: algorithm=minimum_length
        path_elements:
          Scholz2015GeometryPathPoint path_point_0:
            PathPoint: thorax (-0.005 0 -0.054)
          Scholz2015GeometryPathPoint path_point_1:
            PathPoint: head (0.005 -0.034 -0.02)
      FiberForceLengthCurve: strain_at_zero_force=0 strain_at_one_norm_force=0.7 stiffness_at_low_force=0.2
          stiffness_at_one_norm_force=2.857143 curviness=0.75
    Millard2012EquilibriumMuscle scalenus_med_l: max_isometric_force=206 optimal_fiber_length=0.05
        tendon_slack_length=0.061508 pennation_angle_at_optimal=0.17453
      Scholz2015GeometryPath path: algorithm=minimum_length
        path_elements:
          Scholz2015GeometryPathPoint path_point_0:
            PathPoint: thorax (-0.028 0.017 -0.07)
          Scholz2015GeometryPathPoint path_point_1:
            PathPoint: head (-0.005 -0.02 -0.02)
      FiberForceLengthCurve: strain_at_zero_force=0 strain_at_one_norm_force=0.7 stiffness_at_low_force=0.2
          stiffness_at_one_norm_force=2.857143 curviness=0.75
    Millard2012EquilibriumMuscle scalenus_post_l: max_isometric_force=157 optimal_fiber_length=0.062
        tendon_slack_length=0.072845 pennation_angle_at_optimal=0.17453
      Scholz2015GeometryPath path: algorithm=minimum_length
        path_elements:
          Scholz2015GeometryPathPoint path_point_0:
            PathPoint: thorax (-0.035 -0.008 -0.088)
          Scholz2015GeometryPathPoint path_point_1:
            PathPoint: head (-0.007 -0.051 -0.021)
      FiberForceLengthCurve: strain_at_zero_force=0 strain_at_one_norm_force=0.7 stiffness_at_low_force=0.2
          stiffness_at_one_norm_force=2.857143 curviness=0.75
    ActivationCoordinateActuator shoulder_flexion_r_motor: optimal_force=100 coordinate=shoulder_flexion_r
        activation_time_constant=0.035 default_activation=0.5
    ActivationCoordinateActuator shoulder_flexion_l_motor: optimal_force=100 coordinate=shoulder_flexion_l
        activation_time_constant=0.035 default_activation=0.5
