# OpenSim document version 40600
Model athlete_model:
  Ground
  BodySet:
    Body pelvis: mass=11.777 [kg] mass_center=(-0.0707 0 0) inertia=(0.08915337 0.08915337 0.05586192 0 0 0)
        meshes=(pelvis_r.obj pelvis_l.obj sacrum.obj)
      Station iliocrestale_r: .. (-0.05 0.0791136 0.100155)
      Station iliocrestale_l: .. (-0.05 0.0791136 -0.100155)
      Station iliocrestale_midpoint: .. (-0.05 0.0791136 0)
      Station ASIS_r: .. (-0.0015 0.0062712 0.1138125)
      Station ASIS_l: .. (-0.0015 0.0062712 -0.1138125)
      Station ASIS_midpoint: .. (-0.0015 0.0062712 0)
      Station mid_pelvis: .. (-0.05 0.0062712 0)
      Station PSIS_r: .. (-0.14 0.033768 0.0500775)
      Station PSIS_l: .. (-0.14 0.033768 -0.0500775)
      Station PSIS_midpoint: .. (-0.14 0.033768 0)
      Station acetabulum_r: .. (-0.072 -0.057888 0.07284)
      Station acetabulum_l: .. (-0.072 -0.057888 -0.07284)
      StationDefinedFrame pelvis_frame: socket_point_a=/bodyset/pelvis/mid_pelvis
          socket_point_b=/bodyset/pelvis/ASIS_midpoint socket_point_c=/bodyset/pelvis/iliocrestale_midpoint
          socket_origin_point=/bodyset/pelvis/mid_pelvis ab_axis=+x ab_x_ac_axis=+z
      StationDefinedFrame hip_r_parent_frame: socket_point_a=/bodyset/pelvis/mid_pelvis
          socket_point_b=/bodyset/pelvis/ASIS_midpoint socket_point_c=/bodyset/pelvis/iliocrestale_midpoint
          socket_origin_point=/bodyset/pelvis/acetabulum_r ab_axis=+x ab_x_ac_axis=+z
      StationDefinedFrame hip_l_parent_frame: socket_point_a=/bodyset/pelvis/mid_pelvis
          socket_point_b=/bodyset/pelvis/ASIS_midpoint socket_point_c=/bodyset/pelvis/iliocrestale_midpoint
          socket_origin_point=/bodyset/pelvis/acetabulum_l ab_axis=+x ab_x_ac_axis=+z
    Body lumbar_spine: mass=5 mass_center=(0 -0.08715875 0) inertia=(0.02294438 0.0205666 0.02294438 0 0 0)
    Body thorax: mass=16.83 mass_center=(-0.0591 -0.1480205 0) inertia=(1.311031 0.5936075 1.311031 0 0 0)
        meshes=ribs.obj
      Station suprasternale: .. (0 0 0)
      ContactEllipsoid thorax_r_obstacle: location=(-0.025 -0.13 0.057) orientation=(-0.12 -0.03 0.057)
          radii=(0.077 0.145 0.077)
      ContactEllipsoid pectoralis_r_obstacle: location=(-0.0195 -0.12 0.0585) orientation=(-0.122 -0.03 0.25)
          radii=(0.075 0.15 0.077)
      ContactEllipsoid thorax_l_obstacle: location=(-0.025 -0.13 -0.057) orientation=(0.12 0.03 0.057)
          radii=(0.077 0.145 0.077)
      ContactEllipsoid pectoralis_l_obstacle: location=(-0.0195 -0.12 -0.0585) orientation=(0.122 0.03 0.25)
          radii=(0.075 0.15 0.077)
    Body head: mass=5 mass_center=(0 0.03735375 0) inertia=(0.01616648 0.01563398 0.01616648 0 0 0) meshes=skull.obj
      Station glabella: .. (0.09 0.069727 0)
      Station euryon_r: .. (-0.0015 0.0846685 0.0741405)
      Station euryon_l: .. (-0.0015 0.0846685 -0.0741405)
      Station opisthocranion: .. (-0.075 0.049805 0)
      Station vertex: .. (0 0.139454 0)
    Body clavicle_r: mass=0.1898 mass_center=(-0.0111 0.0064 0.0582379)
        inertia=(0.0003079421 0.0003079421 4.9e-5 0 0 0) meshes=clavicle_r.obj
    Body clavicle_l: mass=0.1898 mass_center=(-0.0111 0.0064 -0.0582379)
        inertia=(0.0003079421 0.0003079421 4.9e-5 0 0 0) meshes=clavicle_l.obj
    Body scapula_r: mass=0.7054 mass_center=(-0.04612 -0.03177559 -0.04905093)
        inertia=(0.001070309 0.001035155 0.001035155 0 0 0) meshes=scapula_r.obj
      Station acromion_r: .. (0 0 0)
    Body scapula_l: mass=0.7054 mass_center=(-0.04612 -0.03177559 0.04905093)
        inertia=(0.001070309 0.001035155 0.001035155 0 0 0) meshes=scapula_l.obj
      Station acromion_l: .. (0 0 0)
    Body humerus_r: mass=2.0325 mass_center=(0 -0.1966269 0) inertia=(0.01618433 0.004121 0.01618433 0 0 0)
        meshes=humerus_r.obj
      ContactEllipsoid triceps_r_obstacle: location=(0.006 -0.265 -0.02) orientation=(2.234 1.3 -0.7)
          radii=(0.03 0.1 0.03)
      ContactEllipsoid biceps_r_obstacle: location=(0.013 -0.222 0.006) orientation=(0.65 1.11 0.975)
          radii=(0.03 0.085 0.03)
    Body humerus_l: mass=2.0325 mass_center=(0 -0.1966269 0) inertia=(0.01618433 0.004121 0.01618433 0 0 0)
        meshes=humerus_l.obj
      ContactEllipsoid triceps_l_obstacle: location=(0.006 -0.265 0.02) orientation=(-2.234 -1.3 -0.7)
          radii=(0.03 0.1 0.03)
      ContactEllipsoid biceps_l_obstacle: location=(0.013 -0.222 -0.006) orientation=(-0.65 -1.11 0.975)
          radii=(0.03 0.085 0.03)
    Body ulna_r: mass=0.6075 mass_center=(0 -0.1286604 0) inertia=(0.003332243 0.000618 0.003332243 0 0 0)
        meshes=ulna_r.obj
      Station olecranon_r: .. (-0.03 -0.0010675 0)
    Body ulna_l: mass=0.6075 mass_center=(0 -0.1286604 0) inertia=(0.003332243 0.000618 0.003332243 0 0 0)
        meshes=ulna_l.obj
      Station olecranon_l: .. (-0.03 -0.0010675 0)
    Body radius_r: mass=0.6075 mass_center=(0 -0.1286604 0) inertia=(0.003332243 0.000618 0.003332243 0 0 0)
        meshes=radius_r.obj
      Station radiale_r: .. (0 -0.00427 0.006)
      Station stylion_r: .. (0 -0.245525 0.03)
    Body radius_l: mass=0.6075 mass_center=(0 -0.1286604 0) inertia=(0.003332243 0.000618 0.003332243 0 0 0)
        meshes=radius_l.obj
      Station radiale_l: .. (0 -0.00427 -0.006)
      Station stylion_l: .. (0 -0.245525 -0.03)
    Body hand_r: mass=0.4575 mass_center=(0 -0.068095 0) inertia=(0.000892 0.000547 0.00134 0 0 0)
        meshes=(pisiform_r.obj lunate_r.obj scaphoid_r.obj triquetrum_r.obj hamate_r.obj capitate_r.obj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)
    Body hand_l: mass=0.4575 mass_center=(0 -0.068095 0) inertia=(0.000892 0.000547 0.00134 0 0 0)
        meshes=(pisiform_l.obj lunate_l.obj scaphoid_l.obj triquetrum_l.obj hamate_l.obj capitate_l.obj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)
  JointSet:
    WeldJoint ground_pelvis: socket_parent_frame=ground_offset socket_child_frame=/bodyset/pelvis/pelvis_frame
      PhysicalOffsetFrame ground_offset: translation=(0 1 0) [meters] socket_parent=/ground
    CantileverFreeBeamJoint lumbar: socket_parent_frame=lumbar_spine_parent_frame
        socket_child_frame=lumbar_spine_child_frame beam_length=0.175
      Coordinate lumbar_bending: default_value=0 range=(-0.5235988 0.5235988) clamped=true
      Coordinate lumbar_extension: default_value=-0.6414085 range=(-1.182461 0.4930555) clamped=true
      Coordinate lumbar_rotation: default_value=0 range=(-0.2617994 0.2617994) clamped=true
      PhysicalOffsetFrame lumbar_spine_parent_frame: socket_parent=/bodyset/pelvis translation=(-0.09 0.07236 0)
          orientation=(-1.570796 0.25 0) [radians]
      PhysicalOffsetFrame lumbar_spine_child_frame: socket_parent=/bodyset/lumbar_spine translation=(0 0 0)
          orientation=(-1.570796 0 0)
    CantileverFreeBeamJoint thorax: socket_parent_frame=thoracic_spine_parent_frame
        socket_child_frame=thoracic_spine_child_frame beam_length=0.275
      Coordinate thorax_bending: default_value=0 range=(-0.5235988 0.5235988) clamped=true
      Coordinate thorax_extension: default_value=0.6326819 range=(0.2487094 1.086467) clamped=true
      Coordinate thorax_rotation: default_value=0 range=(-0.8203047 0.8203047) clamped=true
      PhysicalOffsetFrame thoracic_spine_parent_frame: socket_parent=/bodyset/lumbar_spine translation=(0 0 0)
          orientation=(-1.570796 0 0)
      PhysicalOffsetFrame thoracic_spine_child_frame: socket_parent=/bodyset/thorax translation=(-0.0275 0.0567777 0)
          orientation=(-1.570796 0.25 0)
    CantileverFreeBeamJoint cervical: socket_parent_frame=cervical_spine_parent_frame
        socket_child_frame=cervical_spine_child_frame beam_length=0.075
      Coordinate cervical_bending: default_value=0 range=(-0.8552113 0.8552113) clamped=true
      Coordinate cervical_extension: default_value=-0.2487094 range=(-1.348267 0.8683013) clamped=true
      Coordinate cervical_rotation: default_value=0 range=(-1.48353 1.48353) clamped=true
      PhysicalOffsetFrame cervical_spine_parent_frame: socket_parent=/bodyset/thorax translation=(-0.0275 0.0567777 0)
          orientation=(-1.570796 0.25 0)
      PhysicalOffsetFrame cervical_spine_child_frame: socket_parent=/bodyset/head translation=(0 0 0)
          orientation=(-1.570796 0 0)
    WeldJoint sternoclavicular_r: socket_parent_frame=sternoclavicular_r_parent_frame
        socket_child_frame=sternoclavicular_r_child_frame
      PhysicalOffsetFrame sternoclavicular_r_parent_frame: socket_parent=/bodyset/thorax
          translation=(0.00632 0.006902973 0.02739975)
      PhysicalOffsetFrame sternoclavicular_r_child_frame: socket_parent=/bodyset/clavicle_r translation=(0 0 0)
    WeldJoint sternoclavicular_l: socket_parent_frame=sternoclavicular_l_parent_frame
        socket_child_frame=sternoclavicular_l_child_frame
      PhysicalOffsetFrame sternoclavicular_l_parent_frame: socket_parent=/bodyset/thorax
          translation=(0.00632 0.006902973 -0.02739975)
      PhysicalOffsetFrame sternoclavicular_l_child_frame: socket_parent=/bodyset/clavicle_l translation=(0 0 0)
    WeldJoint scapulothoracic_r: socket_parent_frame=/bodyset/thorax socket_child_frame=scapulothoracic_r_weld_frame
      PhysicalOffsetFrame scapulothoracic_r_weld_frame: socket_parent=/bodyset/scapula_r
          translation=(0.0654452 -0.05979021 -0.1569855) orientation=(-0.291944 -0.284971 -0.12239)
    WeldJoint scapulothoracic_l: socket_parent_frame=/bodyset/thorax socket_child_frame=scapulothoracic_l_weld_frame
      PhysicalOffsetFrame scapulothoracic_l_weld_frame: socket_parent=/bodyset/scapula_l
          translation=(0.0654452 -0.05979021 0.1569855) orientation=(0.291944 0.284971 -0.12239)
    CustomJoint glenohumeral_r: socket_parent_frame=glenohumeral_r_parent_frame socket_child_frame=/bodyset/humerus_r
      Coordinate shoulder_flexion_r: default_value=0 range=(-1.047198 3.141593) clamped=true
      Coordinate shoulder_abduction_r: default_value=0 range=(-0.5235988 2.513274) clamped=true
      Coordinate shoulder_rotation_r: default_value=0 range=(-0.5235988 0.5235988) clamped=true
      PhysicalOffsetFrame glenohumeral_r_parent_frame: socket_parent=/bodyset/scapula_r
          translation=(-0.00955 -0.0338674 0.0096705) orientation=(-0.25 0 -0.125)
      SpatialTransform: axes_held_at_zero=(translation1 translation2 translation3)
        TransformAxis rotation1: coordinates=shoulder_flexion_r axis=(0 0 1) LinearFunction(coefficients=1 0)
        TransformAxis rotation2: coordinates=shoulder_abduction_r axis=(1 0 0) LinearFunction(coefficients=-1 0)
        TransformAxis rotation3: coordinates=shoulder_rotation_r axis=(0 1 0) LinearFunction(coefficients=1 0)
    CustomJoint glenohumeral_l: socket_parent_frame=glenohumeral_l_parent_frame socket_child_frame=/bodyset/humerus_l
      Coordinate shoulder_flexion_l: default_value=0 range=(-1.047198 3.141593) clamped=true
      Coordinate shoulder_abduction_l: default_value=0 range=(-0.5235988 2.513274) clamped=true
      Coordinate shoulder_rotation_l: default_value=0 range=(-0.5235988 0.5235988) clamped=true
      PhysicalOffsetFrame glenohumeral_l_parent_frame: socket_parent=/bodyset/scapula_l
          translation=(-0.00955 -0.0338674 -0.0096705) orientation=(0.25 0 -0.125)
      SpatialTransform: axes_held_at_zero=(translation1 translation2 translation3)
        TransformAxis rotation1: coordinates=shoulder_flexion_l axis=(0 0 1) LinearFunction(coefficients=1 0)
        TransformAxis rotation2: coordinates=shoulder_abduction_l axis=(1 0 0) LinearFunction(coefficients=1 0)
        TransformAxis rotation3: coordinates=shoulder_rotation_l axis=(0 1 0) LinearFunction(coefficients=-1 0)
    PinJoint elbow_r: socket_parent_frame=elbow_r_parent_frame socket_child_frame=elbow_r_child_frame
      Coordinate elbow_flex_r: default_value=0 range=(0 2.617994) clamped=true
      PhysicalOffsetFrame elbow_r_parent_frame: socket_parent=/bodyset/humerus_r
          translation=(0.013144 -0.3421821 -0.009595) orientation=(-0.0228627 0.228018 0.0051689)
      PhysicalOffsetFrame elbow_r_child_frame: socket_parent=/bodyset/ulna_r translation=(0 0 0)
          orientation=(-0.0228627 0.228018 0.0051689)
    PinJoint elbow_l: socket_parent_frame=elbow_l_parent_frame socket_child_frame=elbow_l_child_frame
      Coordinate elbow_flex_l: default_value=0 range=(0 2.617994) clamped=true
      PhysicalOffsetFrame elbow_l_parent_frame: socket_parent=/bodyset/humerus_l
          translation=(0.013144 -0.3421821 0.009595) orientation=(0.0228627 -0.228018 0.0051689)
      PhysicalOffsetFrame elbow_l_child_frame: socket_parent=/bodyset/ulna_l translation=(0 0 0)
          orientation=(0.0228627 -0.228018 0.0051689)
    PinJoint radioulnar_r: socket_parent_frame=radioulnar_r_parent_frame socket_child_frame=radioulnar_r_child_frame
      Coordinate pro_sup_r: default_value=0 range=(0 1.570796) clamped=true
      PhysicalOffsetFrame radioulnar_r_parent_frame: socket_parent=/bodyset/ulna_r
          translation=(-0.006727 -0.01388497 0.026083) orientation=(-1.56884 0.056428 1.53614)
      PhysicalOffsetFrame radioulnar_r_child_frame: socket_parent=/bodyset/radius_r translation=(0 0 0)
          orientation=(-1.56884 0.056428 1.53614)
    PinJoint radioulnar_l: socket_parent_frame=radioulnar_l_parent_frame socket_child_frame=radioulnar_l_child_frame
      Coordinate pro_sup_l: default_value=0 range=(0 1.570796) clamped=true
      PhysicalOffsetFrame radioulnar_l_parent_frame: socket_parent=/bodyset/ulna_l
          translation=(-0.006727 -0.01388497 -0.026083) orientation=(1.56884 -0.056428 1.53614)
      PhysicalOffsetFrame radioulnar_l_child_frame: socket_parent=/bodyset/radius_l translation=(0 0 0)
          orientation=(1.56884 -0.056428 1.53614)
    UniversalJoint radius_hand_r: socket_parent_frame=radius_hand_r_parent_frame
        socket_child_frame=radius_hand_r_child_frame
      Coordinate wrist_flex_r: default_value=0 range=(-1.256637 1.256637) clamped=true
      Coordinate wrist_dev_r: default_value=0 range=(-0.448799 0.6283185) clamped=true
      PhysicalOffsetFrame radius_hand_r_parent_frame: socket_parent=/bodyset/radius_r
          translation=(-0.008797 -0.2517603 0.01361) orientation=(-1.5708 0 -1.5708)
      PhysicalOffsetFrame radius_hand_r_child_frame: socket_parent=/bodyset/hand_r translation=(0 0 0)
          orientation=(-1.5708 0 -1.5708)
    UniversalJoint radius_hand_l: socket_parent_frame=radius_hand_l_parent_frame
        socket_child_frame=radius_hand_l_child_frame
      Coordinate wrist_flex_l: default_value=0 range=(-1.256637 1.256637) clamped=true
      Coordinate wrist_dev_l: default_value=0 range=(-0.448799 0.6283185) clamped=true
      PhysicalOffsetFrame radius_hand_l_parent_frame: socket_parent=/bodyset/radius_l
          translation=(-0.008797 -0.2517603 -0.01361) orientation=(1.5708 0 1.5708)
      PhysicalOffsetFrame radius_hand_l_child_frame: socket_parent=/bodyset/hand_l translation=(0 0 0)
          orientation=(1.5708 0 1.5708)
  ForceSet:
    SpringGeneralizedForce lumbar_bending_spring_force: coordinate=lumbar_bending stiffness=25 viscosity=1
    CoordinateLimitForce [values shared by the 23 below unless stated]: upper_stiffness=8.726646 [N*m/degree]
        lower_stiffness=8.726646 [N*m/degree] damping=0.01745329 transition=1 [degrees]
        compute_dissipation_energy=false
    CoordinateLimitForce lumbar_bending_limit_force: coordinate=lumbar_bending upper_limit=30 [degrees]
        lower_limit=-30 [degrees]
    SpringGeneralizedForce lumbar_extension_spring_force: coordinate=lumbar_extension stiffness=25 viscosity=1
    CoordinateLimitForce lumbar_extension_limit_force: coordinate=lumbar_extension upper_limit=28.25 lower_limit=-67.75
    SpringGeneralizedForce lumbar_rotation_spring_force: coordinate=lumbar_rotation stiffness=25 viscosity=1
    CoordinateLimitForce lumbar_rotation_limit_force: coordinate=lumbar_rotation upper_limit=15 lower_limit=-15
    SpringGeneralizedForce thorax_bending_spring_force: coordinate=thorax_bending stiffness=25 viscosity=1
    CoordinateLimitForce thorax_bending_limit_force: coordinate=thorax_bending upper_limit=30 lower_limit=-30
    SpringGeneralizedForce thorax_extension_spring_force: coordinate=thorax_extension stiffness=25 viscosity=1
    CoordinateLimitForce thorax_extension_limit_force: coordinate=thorax_extension upper_limit=62.25 lower_limit=14.25
    SpringGeneralizedForce thorax_rotation_spring_force: coordinate=thorax_rotation stiffness=25 viscosity=1
    CoordinateLimitForce thorax_rotation_limit_force: coordinate=thorax_rotation upper_limit=47 lower_limit=-47
    SpringGeneralizedForce cervical_bending_spring_force: coordinate=cervical_bending stiffness=25 viscosity=1
    CoordinateLimitForce cervical_bending_limit_force: coordinate=cervical_bending upper_limit=49 lower_limit=-49
    SpringGeneralizedForce cervical_extension_spring_force: coordinate=cervical_extension stiffness=25 viscosity=1
    CoordinateLimitForce cervical_extension_limit_force: coordinate=cervical_extension upper_limit=49.75
        lower_limit=-77.25
    SpringGeneralizedForce cervical_rotation_spring_force: coordinate=cervical_rotation stiffness=25 viscosity=1
    CoordinateLimitForce cervical_rotation_limit_force: coordinate=cervical_rotation upper_limit=85 lower_limit=-85
    SpringGeneralizedForce shoulder_flexion_r_spring_force: coordinate=shoulder_flexion_r stiffness=0.01 viscosity=0.1
    CoordinateLimitForce shoulder_flexion_r_limit_force: coordinate=shoulder_flexion_r upper_limit=180 lower_limit=-60
    SpringGeneralizedForce shoulder_abduction_r_spring_force: coordinate=shoulder_abduction_r stiffness=0.01
        viscosity=0.1
    CoordinateLimitForce shoulder_abduction_r_limit_force: coordinate=shoulder_abduction_r upper_limit=144
        lower_limit=-30
    SpringGeneralizedForce shoulder_rotation_r_spring_force: coordinate=shoulder_rotation_r stiffness=0.01
        viscosity=0.1
    CoordinateLimitForce shoulder_rotation_r_limit_force: coordinate=shoulder_rotation_r upper_limit=30 lower_limit=-30
    SpringGeneralizedForce shoulder_flexion_l_spring_force: coordinate=shoulder_flexion_l stiffness=0.01 viscosity=0.1
    CoordinateLimitForce shoulder_flexion_l_limit_force: coordinate=shoulder_flexion_l upper_limit=180 lower_limit=-60
    SpringGeneralizedForce shoulder_abduction_l_spring_force: coordinate=shoulder_abduction_l stiffness=0.01
        viscosity=0.1
    CoordinateLimitForce shoulder_abduction_l_limit_force: coordinate=shoulder_abduction_l upper_limit=144
        lower_limit=-30
    SpringGeneralizedForce shoulder_rotation_l_spring_force: coordinate=shoulder_rotation_l stiffness=0.01
        viscosity=0.1
    CoordinateLimitForce shoulder_rotation_l_limit_force: coordinate=shoulder_rotation_l upper_limit=30 lower_limit=-30
    SpringGeneralizedForce elbow_flex_r_spring_force: coordinate=elbow_flex_r stiffness=0.01 viscosity=0.1
    CoordinateLimitForce elbow_flex_r_limit_force: coordinate=elbow_flex_r upper_limit=150 lower_limit=0
    SpringGeneralizedForce elbow_flex_l_spring_force: coordinate=elbow_flex_l stiffness=0.01 viscosity=0.1
    CoordinateLimitForce elbow_flex_l_limit_force: coordinate=elbow_flex_l upper_limit=150 lower_limit=0
    SpringGeneralizedForce pro_sup_r_spring_force: coordinate=pro_sup_r stiffness=0.01 viscosity=0.1
    CoordinateLimitForce pro_sup_r_limit_force: coordinate=pro_sup_r upper_limit=90 lower_limit=0
    SpringGeneralizedForce pro_sup_l_spring_force: coordinate=pro_sup_l stiffness=0.01 viscosity=0.1
    CoordinateLimitForce pro_sup_l_limit_force: coordinate=pro_sup_l upper_limit=90 lower_limit=0
    SpringGeneralizedForce wrist_flex_r_spring_force: coordinate=wrist_flex_r stiffness=0.01 viscosity=0.1
    CoordinateLimitForce wrist_flex_r_limit_force: coordinate=wrist_flex_r upper_limit=72 lower_limit=-72
    SpringGeneralizedForce wrist_dev_r_spring_force: coordinate=wrist_dev_r stiffness=0.01 viscosity=0.1
    CoordinateLimitForce wrist_dev_r_limit_force: coordinate=wrist_dev_r upper_limit=36 lower_limit=-25.71429
    SpringGeneralizedForce wrist_flex_l_spring_force: coordinate=wrist_flex_l stiffness=0.01 viscosity=0.1
    CoordinateLimitForce wrist_flex_l_limit_force: coordinate=wrist_flex_l upper_limit=72 lower_limit=-72
    SpringGeneralizedForce wrist_dev_l_spring_force: coordinate=wrist_dev_l stiffness=0.01 viscosity=0.1
    CoordinateLimitForce wrist_dev_l_limit_force: coordinate=wrist_dev_l upper_limit=36 lower_limit=-25.71429
    Millard2012EquilibriumMuscle [values shared by the 112 below unless stated]: min_control=0.01 max_control=1
        ignore_tendon_compliance=true fiber_damping=0.1
      ActiveForceLengthCurve: minimum_value=0
      ForceVelocityCurve: concentric_slope_at_vmax=0 concentric_slope_near_vmax=0.25 isometric_slope=5
          eccentric_slope_at_vmax=0 eccentric_slope_near_vmax=0.15 max_eccentric_velocity_force_multiplier=1.4
      FiberForceLengthCurve: strain_at_zero_force=0 strain_at_one_norm_force=0.7 stiffness_at_low_force=0.2
          stiffness_at_one_norm_force=2.857143 curviness=0.75
      TendonForceLengthCurve
    Millard2012EquilibriumMuscle trapezius_clav_r: max_isometric_force=201.6 optimal_fiber_length=0.1176415
        tendon_slack_length=0.02818386 pennation_angle_at_optimal=0 [radians]
      Scholz2015GeometryPath path: algorithm=minimum_length
        path_elements:
          Scholz2015GeometryPathPoint path_point_0:
            PathPoint: head (-0.0372 -0.01075788 0.002632525)
          Scholz2015GeometryPathPoint path_point_1:
            PathPoint: clavicle_r (-0.0301 0.0249 0.0977795)
    Millard2012EquilibriumMuscle trapezius_sup_r: max_isometric_force=1043 optimal_fiber_length=0.1432636
        tendon_slack_length=0.03432226 pennation_angle_at_optimal=0
      Scholz2015GeometryPath path: algorithm=minimum_length
        path_elements:
          Scholz2015GeometryPathPoint path_point_0:
            PathPoint: thorax (-0.0748 0.0448245 -0.003900435)
          Scholz2015GeometryPathObstacle obstacle_0: socket_contact_geometry=/bodyset/thorax/thorax_r_obstacle
              contact_hint=(0.003 0.165 0.065)
          Scholz2015GeometryPathPoint path_point_1:
            PathPoint: scapula_r (-0.0517 0.00687309 -0.0262178)
    Millard2012EquilibriumMuscle trapezius_med_r: max_isometric_force=470.4 optimal_fiber_length=0.1166263
        tendon_slack_length=0.04485628 pennation_angle_at_optimal=0
      Scholz2015GeometryPath path: algorithm=minimum_length
        path_elements:
          Scholz2015GeometryPathPoint path_point_0:
            PathPoint: thorax (-0.0845 -0.00029883 -0.001901865)
          Scholz2015GeometryPathObstacle obstacle_0: socket_contact_geometry=/bodyset/thorax/thorax_r_obstacle
              contact_hint=(-0.042 0.155 0.029)
          Scholz2015GeometryPathPoint path_point_1:
            PathPoint: scapula_r (-0.0582 -0.001952356 -0.03900435)
    Millard2012EquilibriumMuscle trapezius_inf_r: max_isometric_force=414.4 optimal_fiber_length=0.1272921
        tendon_slack_length=0.03524702 pennation_angle_at_optimal=0
      Scholz2015GeometryPath path: algorithm=minimum_length
        path_elements:
          Scholz2015GeometryPathPoint path_point_0:
            PathPoint: thorax (-0.1016 -0.1340751 0.001235675)
          Scholz2015GeometryPathObstacle obstacle_0: socket_contact_geometry=/bodyset/thorax/thorax_r_obstacle
              contact_hint=(-0.082 0.12 0.0195)
          Scholz2015GeometryPathPoint path_point_1:
            PathPoint: scapula_r (-0.0757 -0.009413145 -0.07940555)
    Millard2012EquilibriumMuscle serratus_sup_r: max_isometric_force=387.8 optimal_fiber_length=0.09190721
        tendon_slack_length=0 pennation_angle_at_optimal=0
      Scholz2015GeometryPath path: algorithm=minimum_length
        path_elements:
          Scholz2015GeometryPathPoint path_point_0:
            PathPoint: thorax (-0.0285 -0.01444345 0.1066978)
          Scholz2015GeometryPathObstacle obstacle_0: socket_contact_geometry=/bodyset/thorax/thorax_r_obstacle
              contact_hint=(0.0125 0.16 0.07)
          Scholz2015GeometryPathPoint path_point_1:
            PathPoint: scapula_r (-0.0485 0.0089649 -0.0909027)
    Millard2012EquilibriumMuscle serratus_med_r: max_isometric_force=508 optimal_fiber_length=0.1514059
        tendon_slack_length=0.0118132 pennation_angle_at_optimal=0
      Scholz2015GeometryPath path: algorithm=minimum_length
        path_elements:
          Scholz2015GeometryPathPoint path_point_0:
            PathPoint: thorax (0.0167 -0.07600243 0.1232451)
          Scholz2015GeometryPathObstacle obstacle_0: socket_contact_geometry=/bodyset/thorax/thorax_r_obstacle
              contact_hint=(-0.032 0.089 0.077)
          Scholz2015GeometryPathPoint path_point_1:
            PathPoint: scapula_r (-0.1031 -0.08277591 -0.1059457)
    Millard2012EquilibriumMuscle serratus_inf_r: max_isometric_force=430 optimal_fiber_length=0.1590438
        tendon_slack_length=0 pennation_angle_at_optimal=0
      Scholz2015GeometryPath path: algorithm=minimum_length
        path_elements:
          Scholz2015GeometryPathPoint path_point_0:
            PathPoint: thorax (-0.00054 -0.1698351 0.1592409)
          Scholz2015GeometryPathObstacle obstacle_0: socket_contact_geometry=/bodyset/thorax/thorax_r_obstacle
              contact_hint=(-0.05 0.0155 0.085)
          Scholz2015GeometryPathPoint path_point_1:
            PathPoint: scapula_r (-0.1135 -0.1117624 -0.09186975)
    Millard2012EquilibriumMuscle rhomboideus_sup_r: max_isometric_force=200.2 optimal_fiber_length=0.1006399
        tendon_slack_length=0.01531033 pennation_angle_at_optimal=0
      Scholz2015GeometryPath path: algorithm=minimum_length
        path_elements:
          Scholz2015GeometryPathPoint path_point_0:
            PathPoint: thorax (-0.0733 0.04004322 -0.00219198)
          Scholz2015GeometryPathObstacle obstacle_0: socket_contact_geometry=/bodyset/thorax/thorax_r_obstacle
              contact_hint=(-0.062 0.2 0.0075)
          Scholz2015GeometryPathPoint path_point_1:
            PathPoint: scapula_r (-0.0827 -0.02281069 -0.1092767)
    Millard2012EquilibriumMuscle rhomboideus_inf_r: max_isometric_force=407.4 optimal_fiber_length=0.1176298
        tendon_slack_length=0.02859057 pennation_angle_at_optimal=0
      Scholz2015GeometryPath path: algorithm=minimum_length
        path_elements:
          Scholz2015GeometryPathPoint path_point_0:
            PathPoint: thorax (-0.0907 -0.009233847 -0.000547995)
          Scholz2015GeometryPathObstacle obstacle_0: socket_contact_geometry=/bodyset/thorax/thorax_r_obstacle
              contact_hint=(-0.085 0.135 -0.015)
          Scholz2015GeometryPathPoint path_point_1:
            PathPoint: scapula_r (-0.1063 -0.1062839 -0.09960615)
    Millard2012EquilibriumMuscle levator_scapulae_r: max_isometric_force=280 optimal_fiber_length=0.1579889
        tendon_slack_length=0.01902275 pennation_angle_at_optimal=0
      Scholz2015GeometryPath path: algorithm=minimum_length
        path_elements:
          Scholz2015GeometryPathPoint path_point_0:
            PathPoint: head (-0.00967 -0.01016022 0.03341695)
          Scholz2015GeometryPathObstacle obstacle_0: socket_contact_geometry=/bodyset/thorax/thorax_r_obstacle
              contact_hint=(-0.035 0.225 0.04)
          Scholz2015GeometryPathPoint path_point_1:
            PathPoint: scapula_r (-0.078 -0.00806841 -0.1105661)
    Millard2012EquilibriumMuscle coracobrachialis_r: max_isometric_force=648.2 optimal_fiber_length=0.08121961
        tendon_slack_length=0.1236726 pennation_angle_at_optimal=0
      Scholz2015GeometryPath path: algorithm=minimum_length
        path_elements:
          Scholz2015GeometryPathPoint path_point_0:
            PathPoint: scapula_r (0.0083 -0.04223464 -0.03019345)
          Scholz2015GeometryPathPoint path_point_1:
            PathPoint: humerus_r (-0.00231 -0.1733185 -0.00933)
    Millard2012EquilibriumMuscle deltoideus_ant_r: max_isometric_force=707.7 optimal_fiber_length=0.10544
        tendon_slack_length=0.1132699 pennation_angle_at_optimal=0.08726646
      Scholz2015GeometryPath path: algorithm=minimum_length
        path_elements:
          Scholz2015GeometryPathPoint path_point_0:
            PathPoint: clavicle_r (-0.0228 0.0195 0.09036545)
          Scholz2015GeometryPathPoint path_point_1:
            PathPoint: scapula_r (0.0196 -0.00657426 0.0111748)
          Scholz2015GeometryPathPoint path_point_2:
            PathPoint: humerus_r (0.00664 -0.1312439 0.00115)
    Millard2012EquilibriumMuscle deltoideus_med_r: max_isometric_force=2597.8 optimal_fiber_length=0.0849428
        tendon_slack_length=0.07267833 pennation_angle_at_optimal=0.08726646
      Scholz2015GeometryPath path: algorithm=minimum_length
        path_elements:
          Scholz2015GeometryPathPoint path_point_0:
            PathPoint: scapula_r (-0.016 0.002022083 0.0083811)
          Scholz2015GeometryPathPoint path_point_1:
            PathPoint: scapula_r (-0.0051 -0.00667387 0.0333095)
          Scholz2015GeometryPathPoint path_point_2:
            PathPoint: humerus_r (-0.0043 -0.1201277 0.00385)
    Millard2012EquilibriumMuscle deltoideus_post_r: max_isometric_force=1324.4 optimal_fiber_length=0.107105
        tendon_slack_length=0.08577426 pennation_angle_at_optimal=0.08726646
      Scholz2015GeometryPath path: algorithm=minimum_length
        path_elements:
          Scholz2015GeometryPathPoint path_point_0:
            PathPoint: scapula_r (-0.0577 -0.00687309 -0.0292264)
          Scholz2015GeometryPathPoint path_point_1:
            PathPoint: scapula_r (-0.055 -0.03227364 0.007897575)
          Scholz2015GeometryPathPoint path_point_2:
            PathPoint: humerus_r (-0.0048 -0.1030349 0.00624)
    Millard2012EquilibriumMuscle latissimus_sup_r: max_isometric_force=201.6 optimal_fiber_length=0.2184284
        tendon_slack_length=0.08389143 pennation_angle_at_optimal=0
      Scholz2015GeometryPath path: algorithm=minimum_length
        path_elements:
          Scholz2015GeometryPathPoint path_point_0:
            PathPoint: thorax (-0.10088 -0.1161453 0.001837395)
          Scholz2015GeometryPathObstacle obstacle_0: socket_contact_geometry=/bodyset/thorax/thorax_r_obstacle
              contact_hint=(-0.05 0.055 0.0785)
          Scholz2015GeometryPathPoint path_point_1:
            PathPoint: humerus_r (0.01 -0.0298825 -0.003)
    Millard2012EquilibriumMuscle latissimus_med_r: max_isometric_force=315 optimal_fiber_length=0.2646889
        tendon_slack_length=0.09417582 pennation_angle_at_optimal=0
      Scholz2015GeometryPath path: algorithm=minimum_length
        path_elements:
          Scholz2015GeometryPathPoint path_point_0:
            PathPoint: lumbar_spine (-0.045 -0.0069727 0.017192)
          Scholz2015GeometryPathObstacle obstacle_0: socket_contact_geometry=/bodyset/thorax/thorax_r_obstacle
              contact_hint=(-0.042 0.009 0.085)
          Scholz2015GeometryPathPoint path_point_1:
            PathPoint: humerus_r (0.001 -0.0394449 -0.002)
    Millard2012EquilibriumMuscle latissimus_inf_r: max_isometric_force=270.2 optimal_fiber_length=0.3036902
        tendon_slack_length=0.06159098 pennation_angle_at_optimal=0
      Scholz2015GeometryPath path: algorithm=minimum_length
        path_elements:
          Scholz2015GeometryPathPoint path_point_0:
            PathPoint: pelvis (-0.115 0.074772 0.0591825)
          Scholz2015GeometryPathPoint path_point_1:
            PathPoint: thorax (-0.0627 -0.2538063 0.0973497)
          Scholz2015GeometryPathObstacle obstacle_0: socket_contact_geometry=/bodyset/thorax/thorax_r_obstacle
              contact_hint=(-0.025 -0.03 0.095)
          Scholz2015GeometryPathPoint path_point_2:
            PathPoint: humerus_r (0.003 -0.0286872 -0.003)
    Millard2012EquilibriumMuscle pectoralis_major_sup_r: max_isometric_force=408.8 optimal_fiber_length=0.1162699
        tendon_slack_length=0.01492006 pennation_angle_at_optimal=0
      Scholz2015GeometryPath path: algorithm=minimum_length
        path_elements:
          Scholz2015GeometryPathPoint path_point_0:
            PathPoint: clavicle_r (0.0025 0.005 0.053725)
          Scholz2015GeometryPathObstacle obstacle_0: socket_contact_geometry=/bodyset/thorax/pectoralis_r_obstacle
              contact_hint=(0.065 0.107 0.074)
          Scholz2015GeometryPathPoint path_point_1:
            PathPoint: humerus_r (0.023 -0.0179295 0.0025)
    Millard2012EquilibriumMuscle pectoralis_major_med_r: max_isometric_force=683.2 optimal_fiber_length=0.1588777
        tendon_slack_length=0.02753881 pennation_angle_at_optimal=0
      Scholz2015GeometryPath path: algorithm=minimum_length
        path_elements:
          Scholz2015GeometryPathPoint path_point_0:
            PathPoint: thorax (0.0195 -0.0378518 0.0139685)
          Scholz2015GeometryPathObstacle obstacle_0: socket_contact_geometry=/bodyset/thorax/pectoralis_r_obstacle
              contact_hint=(0.08 0.1 0.037)
          Scholz2015GeometryPathPoint path_point_1:
            PathPoint: humerus_r (0.02 -0.03131686 0.0018)
    Millard2012EquilibriumMuscle pectoralis_major_inf_r: max_isometric_force=571.2 optimal_fiber_length=0.1860371
        tendon_slack_length=0.04371364 pennation_angle_at_optimal=0
      Scholz2015GeometryPath path: algorithm=minimum_length
        path_elements:
          Scholz2015GeometryPathPoint path_point_0:
            PathPoint: thorax (0.0532 -0.1152488 0.02654015)
          Scholz2015GeometryPathObstacle obstacle_0: socket_contact_geometry=/bodyset/thorax/pectoralis_r_obstacle
              contact_hint=(0.082 0.05 0.039)
          Scholz2015GeometryPathPoint path_point_1:
            PathPoint: humerus_r (0.02 -0.035859 0.005)
    Millard2012EquilibriumMuscle pectoralis_minor_r: max_isometric_force=429.8 optimal_fiber_length=0.1155041
        tendon_slack_length=0.03124371 pennation_angle_at_optimal=0
      Scholz2015GeometryPath path: algorithm=minimum_length
        path_elements:
          Scholz2015GeometryPathPoint path_point_0:
            PathPoint: thorax (0.055 -0.1035944 0.0979944)
          Scholz2015GeometryPathObstacle obstacle_0: socket_contact_geometry=/bodyset/thorax/pectoralis_r_obstacle
              contact_hint=(0.072 0.076 0.059)
          Scholz2015GeometryPathPoint path_point_1:
            PathPoint: scapula_r (0.021 -0.0348635 -0.0161175)
    Millard2012EquilibriumMuscle teres_major_r: max_isometric_force=851.2 optimal_fiber_length=0.1434685
        tendon_slack_length=0.006105043 pennation_angle_at_optimal=0
      Scholz2015GeometryPath path: algorithm=minimum_length
        path_elements:
          Scholz2015GeometryPathPoint path_point_0:
            PathPoint: scapula_r (-0.1044 -0.1169421 -0.07747145)
          Scholz2015GeometryPathPoint path_point_1:
            PathPoint: humerus_r (0.0043 -0.0466167 -0.0017)
    Millard2012EquilibriumMuscle teres_minor_r: max_isometric_force=695.8 optimal_fiber_length=0.05644411
        tendon_slack_length=0.05233909 pennation_angle_at_optimal=0
      Scholz2015GeometryPath path: algorithm=minimum_length
        path_elements:
          Scholz2015GeometryPathPoint path_point_0:
            PathPoint: scapula_r (-0.0844 -0.06584221 -0.04545135)
          Scholz2015GeometryPathPoint path_point_1:
            PathPoint: humerus_r (-0.0159 -0.01123582 0.0109)
    Millard2012EquilibriumMuscle infraspinatus_inf_r: max_isometric_force=1037.4 optimal_fiber_length=0.07053755
        tendon_slack_length=0.08752075 pennation_angle_at_optimal=0
      Scholz2015GeometryPath path: algorithm=minimum_length
        path_elements:
          Scholz2015GeometryPathPoint path_point_0:
            PathPoint: scapula_r (-0.0991 -0.08058449 -0.08735685)
          Scholz2015GeometryPathPoint path_point_1:
            PathPoint: scapula_r (-0.064 -0.049805 -0.034384)
          Scholz2015GeometryPathPoint path_point_2:
            PathPoint: humerus_r (-0.025 0.011953 0.005)
          Scholz2015GeometryPathPoint path_point_3:
            PathPoint: humerus_r (-0.0135 0.0047812 0.0125)
    Millard2012EquilibriumMuscle infraspinatus_sup_r: max_isometric_force=967.4 optimal_fiber_length=0.07355552
        tendon_slack_length=0.0526902 pennation_angle_at_optimal=0
      Scholz2015GeometryPath path: algorithm=minimum_length
        path_elements:
          Scholz2015GeometryPathPoint path_point_0:
            PathPoint: scapula_r (-0.0834 -0.03217403 -0.09337405)
          Scholz2015GeometryPathPoint path_point_1:
            PathPoint: scapula_r (-0.054 -0.0348635 -0.0483525)
          Scholz2015GeometryPathPoint path_point_2:
            PathPoint: humerus_r (-0.025 0.011953 0.005)
          Scholz2015GeometryPathPoint path_point_3:
            PathPoint: humerus_r (-0.0135 0.0047812 0.0125)
    Millard2012EquilibriumMuscle subscapularis_sup_r: max_isometric_force=540.4 optimal_fiber_length=0.07464067
        tendon_slack_length=0.06514496 pennation_angle_at_optimal=0.08726646
      Scholz2015GeometryPath path: algorithm=minimum_length
        path_elements:
          Scholz2015GeometryPathPoint path_point_0:
            PathPoint: scapula_r (-0.0788 -0.03117793 -0.09702735)
          Scholz2015GeometryPathPoint path_point_1:
            PathPoint: scapula_r (-0.035 -0.0368557 -0.045129)
          Scholz2015GeometryPathPoint path_point_2:
            PathPoint: humerus_r (0.0074 0.0059765 -0.022)
          Scholz2015GeometryPathPoint path_point_3:
            PathPoint: humerus_r (0.0225 -0.0095624 -0.01)
    Millard2012EquilibriumMuscle subscapularis_med_r: max_isometric_force=609 optimal_fiber_length=0.0770044
        tendon_slack_length=0.0569253 pennation_angle_at_optimal=0.08726646
      Scholz2015GeometryPath path: algorithm=minimum_length
        path_elements:
          Scholz2015GeometryPathPoint path_point_0:
            PathPoint: scapula_r (-0.0836 -0.05468589 -0.08026515)
          Scholz2015GeometryPathPoint path_point_1:
            PathPoint: scapula_r (-0.035 -0.0438284 -0.0397565)
          Scholz2015GeometryPathPoint path_point_2:
            PathPoint: humerus_r (0.0074 0.0059765 -0.032)
          Scholz2015GeometryPathPoint path_point_3:
            PathPoint: humerus_r (0.0225 -0.0095624 -0.01)
    Millard2012EquilibriumMuscle subscapularis_inf_r: max_isometric_force=854 optimal_fiber_length=0.09082225
        tendon_slack_length=0.07432057 pennation_angle_at_optimal=0
      Scholz2015GeometryPath path: algorithm=minimum_length
        path_elements:
          Scholz2015GeometryPathPoint path_point_0:
            PathPoint: scapula_r (-0.0951 -0.09731897 -0.0917623)
          Scholz2015GeometryPathPoint path_point_1:
            PathPoint: scapula_r (-0.035 -0.0448245 -0.0483525)
          Scholz2015GeometryPathPoint path_point_2:
            PathPoint: humerus_r (0.0074 0.0059765 -0.035)
          Scholz2015GeometryPathPoint path_point_3:
            PathPoint: humerus_r (0.0225 -0.0095624 -0.01)
    Millard2012EquilibriumMuscle supraspinatus_post_r: max_isometric_force=326.2 optimal_fiber_length=0.06158489
        tendon_slack_length=0.02605114 pennation_angle_at_optimal=0
      Scholz2015GeometryPath path: algorithm=minimum_length
        path_elements:
          Scholz2015GeometryPathPoint path_point_0:
            PathPoint: scapula_r (-0.0605 -0.00139454 -0.05318775)
          Scholz2015GeometryPathPoint path_point_1:
            PathPoint: humerus_r (0 0.0370543 0.006)
          Scholz2015GeometryPathPoint path_point_2:
            PathPoint: humerus_r (0.014 0.0203201 0.021)
    Millard2012EquilibriumMuscle supraspinatus_ant_r: max_isometric_force=543.2 optimal_fiber_length=0.05840915
        tendon_slack_length=0.03268382 pennation_angle_at_optimal=0
      Scholz2015GeometryPath path: algorithm=minimum_length
        path_elements:
          Scholz2015GeometryPathPoint path_point_0:
            PathPoint: scapula_r (-0.049 0.00139454 -0.0743554)
          Scholz2015GeometryPathPoint path_point_1:
            PathPoint: humerus_r (0.007 0.0394449 -0.004)
          Scholz2015GeometryPathPoint path_point_2:
            PathPoint: humerus_r (0.0178 0.02103728 0.0096)
    Millard2012EquilibriumMuscle triceps_long_r: max_isometric_force=1580.6 optimal_fiber_length=0.1170103
        tendon_slack_length=0.2912579 pennation_angle_at_optimal=0.174533
      Scholz2015GeometryPath path: algorithm=minimum_length
        path_elements:
          Scholz2015GeometryPathPoint path_point_0:
            PathPoint: scapula_r (-0.0421 -0.05169759 -0.01386105)
          Scholz2015GeometryPathObstacle obstacle_0: socket_contact_geometry=/bodyset/humerus_r/triceps_r_obstacle
              contact_hint=(-0.01 0.003 -0.055)
          Scholz2015GeometryPathPoint path_point_1:
            PathPoint: ulna_r (-0.031 0.0053375 0.001)
    Millard2012EquilibriumMuscle biceps_long_r: max_isometric_force=485.8 optimal_fiber_length=0.1633802
        tendon_slack_length=0.2952571 pennation_angle_at_optimal=0
      Scholz2015GeometryPath path: algorithm=minimum_length
        path_elements:
          Scholz2015GeometryPathPoint path_point_0:
            PathPoint: scapula_r (-0.0226 -0.01623643 -0.01944845)
          Scholz2015GeometryPathPoint path_point_1:
            PathPoint: humerus_r (0.012 0.0107577 0.0135)
          Scholz2015GeometryPathObstacle obstacle_0: socket_contact_geometry=/bodyset/humerus_r/biceps_r_obstacle
              contact_hint=(0.014 0.007 0.043)
          Scholz2015GeometryPathPoint path_point_2:
            PathPoint: radius_r (-0.0009 -0.04697 -0.0095)
    Millard2012EquilibriumMuscle biceps_brevis_r: max_isometric_force=693 optimal_fiber_length=0.1469053
        tendon_slack_length=0.2463918 pennation_angle_at_optimal=0
      Scholz2015GeometryPath path: algorithm=minimum_length
        path_elements:
          Scholz2015GeometryPathPoint path_point_0:
            PathPoint: scapula_r (0.0095 -0.03805102 -0.0260029)
          Scholz2015GeometryPathObstacle obstacle_0: socket_contact_geometry=/bodyset/humerus_r/biceps_r_obstacle
              contact_hint=(0.014 -0.018 0.043)
          Scholz2015GeometryPathPoint path_point_1:
            PathPoint: radius_r (-0.0002 -0.04729025 -0.0099)
    Millard2012EquilibriumMuscle rectus_abdominis_r: max_isometric_force=705.9 optimal_fiber_length=0.2993743
        tendon_slack_length=0.08142743 pennation_angle_at_optimal=0
      Scholz2015GeometryPath path: algorithm=minimum_length
        path_elements:
          Scholz2015GeometryPathPoint path_point_0:
            PathPoint: pelvis (-0.0275 -0.07236 0.01138125)
          Scholz2015GeometryPathPoint path_point_1:
            PathPoint: pelvis (-0.002 0.067536 0.0318675)
          Scholz2015GeometryPathPoint path_point_2:
            PathPoint: lumbar_spine (0.082 -0.109571 0.0376075)
          Scholz2015GeometryPathPoint path_point_3:
            PathPoint: thorax (0.083 -0.2241225 0.0376075)
          Scholz2015GeometryPathPoint path_point_4:
            PathPoint: thorax (0.072 -0.169337 0.0376075)
    Millard2012EquilibriumMuscle trapezius_clav_l: max_isometric_force=201.6 optimal_fiber_length=0.1176415
        tendon_slack_length=0.02818386 pennation_angle_at_optimal=0
      Scholz2015GeometryPath path: algorithm=minimum_length
        path_elements:
          Scholz2015GeometryPathPoint path_point_0:
            PathPoint: head (-0.0372 -0.01075788 -0.002632525)
          Scholz2015GeometryPathPoint path_point_1:
            PathPoint: clavicle_l (-0.0301 0.0249 -0.0977795)
    Millard2012EquilibriumMuscle trapezius_sup_l: max_isometric_force=1043 optimal_fiber_length=0.1431332
        tendon_slack_length=0.034291 pennation_angle_at_optimal=0
      Scholz2015GeometryPath path: algorithm=minimum_length
        path_elements:
          Scholz2015GeometryPathPoint path_point_0:
            PathPoint: thorax (-0.0748 0.0448245 -0.003900435)
          Scholz2015GeometryPathObstacle obstacle_0: socket_contact_geometry=/bodyset/thorax/thorax_l_obstacle
              contact_hint=(0.003 0.165 -0.065)
          Scholz2015GeometryPathPoint path_point_1:
            PathPoint: scapula_l (-0.0517 0.00687309 0.0262178)
    Millard2012EquilibriumMuscle trapezius_med_l: max_isometric_force=470.4 optimal_fiber_length=0.1166263
        tendon_slack_length=0.04485628 pennation_angle_at_optimal=0
      Scholz2015GeometryPath path: algorithm=minimum_length
        path_elements:
          Scholz2015GeometryPathPoint path_point_0:
            PathPoint: thorax (-0.0845 -0.00029883 0.001901865)
          Scholz2015GeometryPathObstacle obstacle_0: socket_contact_geometry=/bodyset/thorax/thorax_l_obstacle
              contact_hint=(-0.042 0.155 -0.029)
          Scholz2015GeometryPathPoint path_point_1:
            PathPoint: scapula_l (-0.0582 -0.001952356 0.03900435)
    Millard2012EquilibriumMuscle trapezius_inf_l: max_isometric_force=414.4 optimal_fiber_length=0.1272921
        tendon_slack_length=0.03524702 pennation_angle_at_optimal=0
      Scholz2015GeometryPath path: algorithm=minimum_length
        path_elements:
          Scholz2015GeometryPathPoint path_point_0:
            PathPoint: thorax (-0.1016 -0.1340751 -0.001235675)
          Scholz2015GeometryPathObstacle obstacle_0: socket_contact_geometry=/bodyset/thorax/thorax_l_obstacle
              contact_hint=(-0.082 0.12 -0.0195)
          Scholz2015GeometryPathPoint path_point_1:
            PathPoint: scapula_l (-0.0757 -0.009413145 0.07940555)
    Millard2012EquilibriumMuscle serratus_sup_l: max_isometric_force=387.8 optimal_fiber_length=0.09190721
        tendon_slack_length=0 pennation_angle_at_optimal=0
      Scholz2015GeometryPath path: algorithm=minimum_length
        path_elements:
          Scholz2015GeometryPathPoint path_point_0:
            PathPoint: thorax (-0.0285 -0.01444345 -0.1066978)
          Scholz2015GeometryPathObstacle obstacle_0: socket_contact_geometry=/bodyset/thorax/thorax_l_obstacle
              contact_hint=(0.0125 0.16 -0.07)
          Scholz2015GeometryPathPoint path_point_1:
            PathPoint: scapula_l (-0.0485 0.0089649 0.0909027)
    Millard2012EquilibriumMuscle serratus_med_l: max_isometric_force=508 optimal_fiber_length=0.1514059
        tendon_slack_length=0.0118132 pennation_angle_at_optimal=0
      Scholz2015GeometryPath path: algorithm=minimum_length
        path_elements:
          Scholz2015GeometryPathPoint path_point_0:
            PathPoint: thorax (0.0167 -0.07600243 -0.1232451)
          Scholz2015GeometryPathObstacle obstacle_0: socket_contact_geometry=/bodyset/thorax/thorax_l_obstacle
              contact_hint=(-0.032 0.089 -0.077)
          Scholz2015GeometryPathPoint path_point_1:
            PathPoint: scapula_l (-0.1031 -0.08277591 0.1059457)
    Millard2012EquilibriumMuscle serratus_inf_l: max_isometric_force=430 optimal_fiber_length=0.1590438
        tendon_slack_length=0 pennation_angle_at_optimal=0
      Scholz2015GeometryPath path: algorithm=minimum_length
        path_elements:
          Scholz2015GeometryPathPoint path_point_0:
            PathPoint: thorax (-0.00054 -0.1698351 -0.1592409)
          Scholz2015GeometryPathObstacle obstacle_0: socket_contact_geometry=/bodyset/thorax/thorax_l_obstacle
              contact_hint=(-0.05 0.0155 -0.085)
          Scholz2015GeometryPathPoint path_point_1:
            PathPoint: scapula_l (-0.1135 -0.1117624 0.09186975)
    Millard2012EquilibriumMuscle rhomboideus_sup_l: max_isometric_force=200.2 optimal_fiber_length=0.1006399
        tendon_slack_length=0.01531033 pennation_angle_at_optimal=0
      Scholz2015GeometryPath path: algorithm=minimum_length
        path_elements:
          Scholz2015GeometryPathPoint path_point_0:
            PathPoint: thorax (-0.0733 0.04004322 0.00219198)
          Scholz2015GeometryPathObstacle obstacle_0: socket_contact_geometry=/bodyset/thorax/thorax_l_obstacle
              contact_hint=(-0.062 0.2 -0.0075)
          Scholz2015GeometryPathPoint path_point_1:
            PathPoint: scapula_l (-0.0827 -0.02281069 0.1092767)
    Millard2012EquilibriumMuscle rhomboideus_inf_l: max_isometric_force=407.4 optimal_fiber_length=0.1176298
        tendon_slack_length=0.02859057 pennation_angle_at_optimal=0
      Scholz2015GeometryPath path: algorithm=minimum_length
        path_elements:
          Scholz2015GeometryPathPoint path_point_0:
            PathPoint: thorax (-0.0907 -0.009233847 0.000547995)
          Scholz2015GeometryPathObstacle obstacle_0: socket_contact_geometry=/bodyset/thorax/thorax_l_obstacle
              contact_hint=(-0.085 0.135 0.015)
          Scholz2015GeometryPathPoint path_point_1:
            PathPoint: scapula_l (-0.1063 -0.1062839 0.09960615)
    Millard2012EquilibriumMuscle levator_scapulae_l: max_isometric_force=280 optimal_fiber_length=0.1579889
        tendon_slack_length=0.01902275 pennation_angle_at_optimal=0
      Scholz2015GeometryPath path: algorithm=minimum_length
        path_elements:
          Scholz2015GeometryPathPoint path_point_0:
            PathPoint: head (-0.00967 -0.01016022 -0.03341695)
          Scholz2015GeometryPathObstacle obstacle_0: socket_contact_geometry=/bodyset/thorax/thorax_l_obstacle
              contact_hint=(-0.035 0.225 -0.04)
          Scholz2015GeometryPathPoint path_point_1:
            PathPoint: scapula_l (-0.078 -0.00806841 0.1105661)
    Millard2012EquilibriumMuscle coracobrachialis_l: max_isometric_force=648.2 optimal_fiber_length=0.08121961
        tendon_slack_length=0.1236726 pennation_angle_at_optimal=0
      Scholz2015GeometryPath path: algorithm=minimum_length
        path_elements:
          Scholz2015GeometryPathPoint path_point_0:
            PathPoint: scapula_l (0.0083 -0.04223464 0.03019345)
          Scholz2015GeometryPathPoint path_point_1:
            PathPoint: humerus_l (-0.00231 -0.1733185 0.00933)
    Millard2012EquilibriumMuscle deltoideus_ant_l: max_isometric_force=707.7 optimal_fiber_length=0.10544
        tendon_slack_length=0.1132699 pennation_angle_at_optimal=0.08726646
      Scholz2015GeometryPath path: algorithm=minimum_length
        path_elements:
          Scholz2015GeometryPathPoint path_point_0:
            PathPoint: clavicle_l (-0.0228 0.0195 -0.09036545)
          Scholz2015GeometryPathPoint path_point_1:
            PathPoint: scapula_l (0.0196 -0.00657426 -0.0111748)
          Scholz2015GeometryPathPoint path_point_2:
            PathPoint: humerus_l (0.00664 -0.1312439 -0.00115)
    Millard2012EquilibriumMuscle deltoideus_med_l: max_isometric_force=2597.8 optimal_fiber_length=0.0849428
        tendon_slack_length=0.07267833 pennation_angle_at_optimal=0.08726646
      Scholz2015GeometryPath path: algorithm=minimum_length
        path_elements:
          Scholz2015GeometryPathPoint path_point_0:
            PathPoint: scapula_l (-0.016 0.002022083 -0.0083811)
          Scholz2015GeometryPathPoint path_point_1:
            PathPoint: scapula_l (-0.0051 -0.00667387 -0.0333095)
          Scholz2015GeometryPathPoint path_point_2:
            PathPoint: humerus_l (-0.0043 -0.1201277 -0.00385)
    Millard2012EquilibriumMuscle deltoideus_post_l: max_isometric_force=1324.4 optimal_fiber_length=0.107105
        tendon_slack_length=0.08577426 pennation_angle_at_optimal=0.08726646
      Scholz2015GeometryPath path: algorithm=minimum_length
        path_elements:
          Scholz2015GeometryPathPoint path_point_0:
            PathPoint: scapula_l (-0.0577 -0.00687309 0.0292264)
          Scholz2015GeometryPathPoint path_point_1:
            PathPoint: scapula_l (-0.055 -0.03227364 -0.007897575)
          Scholz2015GeometryPathPoint path_point_2:
            PathPoint: humerus_l (-0.0048 -0.1030349 -0.00624)
    Millard2012EquilibriumMuscle latissimus_sup_l: max_isometric_force=201.6 optimal_fiber_length=0.2184284
        tendon_slack_length=0.08389143 pennation_angle_at_optimal=0
      Scholz2015GeometryPath path: algorithm=minimum_length
        path_elements:
          Scholz2015GeometryPathPoint path_point_0:
            PathPoint: thorax (-0.10088 -0.1161453 -0.001837395)
          Scholz2015GeometryPathObstacle obstacle_0: socket_contact_geometry=/bodyset/thorax/thorax_l_obstacle
              contact_hint=(-0.05 0.055 -0.0785)
          Scholz2015GeometryPathPoint path_point_1:
            PathPoint: humerus_l (0.01 -0.0298825 0.003)
    Millard2012EquilibriumMuscle latissimus_med_l: max_isometric_force=315 optimal_fiber_length=0.2646889
        tendon_slack_length=0.09417582 pennation_angle_at_optimal=0
      Scholz2015GeometryPath path: algorithm=minimum_length
        path_elements:
          Scholz2015GeometryPathPoint path_point_0:
            PathPoint: lumbar_spine (-0.045 -0.0069727 -0.017192)
          Scholz2015GeometryPathObstacle obstacle_0: socket_contact_geometry=/bodyset/thorax/thorax_l_obstacle
              contact_hint=(-0.042 0.009 -0.085)
          Scholz2015GeometryPathPoint path_point_1:
            PathPoint: humerus_l (0.001 -0.0394449 0.002)
    Millard2012EquilibriumMuscle latissimus_inf_l: max_isometric_force=270.2 optimal_fiber_length=0.3036902
        tendon_slack_length=0.06159098 pennation_angle_at_optimal=0
      Scholz2015GeometryPath path: algorithm=minimum_length
        path_elements:
          Scholz2015GeometryPathPoint path_point_0:
            PathPoint: pelvis (-0.115 0.074772 -0.0591825)
          Scholz2015GeometryPathPoint path_point_1:
            PathPoint: thorax (-0.0627 -0.2538063 -0.0973497)
          Scholz2015GeometryPathObstacle obstacle_0: socket_contact_geometry=/bodyset/thorax/thorax_l_obstacle
              contact_hint=(-0.025 -0.03 -0.095)
          Scholz2015GeometryPathPoint path_point_2:
            PathPoint: humerus_l (0.003 -0.0286872 0.003)
    Millard2012EquilibriumMuscle pectoralis_major_sup_l: max_isometric_force=408.8 optimal_fiber_length=0.1165395
        tendon_slack_length=0.01495465 pennation_angle_at_optimal=0
      Scholz2015GeometryPath path: algorithm=minimum_length
        path_elements:
          Scholz2015GeometryPathPoint path_point_0:
            PathPoint: clavicle_l (0.0025 0.005 -0.053725)
          Scholz2015GeometryPathObstacle obstacle_0: socket_contact_geometry=/bodyset/thorax/pectoralis_l_obstacle
              contact_hint=(0.065 0.107 -0.074)
          Scholz2015GeometryPathPoint path_point_1:
            PathPoint: humerus_l (0.023 -0.0179295 0.0025)
    Millard2012EquilibriumMuscle pectoralis_major_med_l: max_isometric_force=683.2 optimal_fiber_length=0.1588777
        tendon_slack_length=0.02753881 pennation_angle_at_optimal=0
      Scholz2015GeometryPath path: algorithm=minimum_length
        path_elements:
          Scholz2015GeometryPathPoint path_point_0:
            PathPoint: thorax (0.0195 -0.0378518 -0.0139685)
          Scholz2015GeometryPathObstacle obstacle_0: socket_contact_geometry=/bodyset/thorax/pectoralis_l_obstacle
              contact_hint=(0.08 0.1 -0.037)
          Scholz2015GeometryPathPoint path_point_1:
            PathPoint: humerus_l (0.02 -0.03131686 -0.0018)
    Millard2012EquilibriumMuscle pectoralis_major_inf_l: max_isometric_force=571.2 optimal_fiber_length=0.1860371
        tendon_slack_length=0.04371364 pennation_angle_at_optimal=0
      Scholz2015GeometryPath path: algorithm=minimum_length
        path_elements:
          Scholz2015GeometryPathPoint path_point_0:
            PathPoint: thorax (0.0532 -0.1152488 -0.02654015)
          Scholz2015GeometryPathObstacle obstacle_0: socket_contact_geometry=/bodyset/thorax/pectoralis_l_obstacle
              contact_hint=(0.082 0.05 -0.039)
          Scholz2015GeometryPathPoint path_point_1:
            PathPoint: humerus_l (0.02 -0.035859 -0.005)
    Millard2012EquilibriumMuscle pectoralis_minor_l: max_isometric_force=429.8 optimal_fiber_length=0.1155041
        tendon_slack_length=0.03124371 pennation_angle_at_optimal=0
      Scholz2015GeometryPath path: algorithm=minimum_length
        path_elements:
          Scholz2015GeometryPathPoint path_point_0:
            PathPoint: thorax (0.055 -0.1035944 -0.0979944)
          Scholz2015GeometryPathObstacle obstacle_0: socket_contact_geometry=/bodyset/thorax/pectoralis_l_obstacle
              contact_hint=(0.072 0.076 -0.059)
          Scholz2015GeometryPathPoint path_point_1:
            PathPoint: scapula_l (0.021 -0.0348635 0.0161175)
    Millard2012EquilibriumMuscle teres_major_l: max_isometric_force=851.2 optimal_fiber_length=0.1434685
        tendon_slack_length=0.006105043 pennation_angle_at_optimal=0
      Scholz2015GeometryPath path: algorithm=minimum_length
        path_elements:
          Scholz2015GeometryPathPoint path_point_0:
            PathPoint: scapula_l (-0.1044 -0.1169421 0.07747145)
          Scholz2015GeometryPathPoint path_point_1:
            PathPoint: humerus_l (0.0043 -0.0466167 0.0017)
    Millard2012EquilibriumMuscle teres_minor_l: max_isometric_force=695.8 optimal_fiber_length=0.05644411
        tendon_slack_length=0.05233909 pennation_angle_at_optimal=0
      Scholz2015GeometryPath path: algorithm=minimum_length
        path_elements:
          Scholz2015GeometryPathPoint path_point_0:
            PathPoint: scapula_l (-0.0844 -0.06584221 0.04545135)
          Scholz2015GeometryPathPoint path_point_1:
            PathPoint: humerus_l (-0.0159 -0.01123582 -0.0109)
    Millard2012EquilibriumMuscle infraspinatus_inf_l: max_isometric_force=1037.4 optimal_fiber_length=0.07053755
        tendon_slack_length=0.08752075 pennation_angle_at_optimal=0
      Scholz2015GeometryPath path: algorithm=minimum_length
        path_elements:
          Scholz2015GeometryPathPoint path_point_0:
            PathPoint: scapula_l (-0.0991 -0.08058449 0.08735685)
          Scholz2015GeometryPathPoint path_point_1:
            PathPoint: scapula_l (-0.064 -0.049805 0.034384)
          Scholz2015GeometryPathPoint path_point_2:
            PathPoint: humerus_l (-0.025 0.011953 -0.005)
          Scholz2015GeometryPathPoint path_point_3:
            PathPoint: humerus_l (-0.0135 0.0047812 -0.0125)
    Millard2012EquilibriumMuscle infraspinatus_sup_l: max_isometric_force=967.4 optimal_fiber_length=0.07355552
        tendon_slack_length=0.0526902 pennation_angle_at_optimal=0
      Scholz2015GeometryPath path: algorithm=minimum_length
        path_elements:
          Scholz2015GeometryPathPoint path_point_0:
            PathPoint: scapula_l (-0.0834 -0.03217403 0.09337405)
          Scholz2015GeometryPathPoint path_point_1:
            PathPoint: scapula_l (-0.054 -0.0348635 0.0483525)
          Scholz2015GeometryPathPoint path_point_2:
            PathPoint: humerus_l (-0.025 0.011953 -0.005)
          Scholz2015GeometryPathPoint path_point_3:
            PathPoint: humerus_l (-0.0135 0.0047812 -0.0125)
    Millard2012EquilibriumMuscle subscapularis_sup_l: max_isometric_force=540.4 optimal_fiber_length=0.07464067
        tendon_slack_length=0.06514496 pennation_angle_at_optimal=0.08726646
      Scholz2015GeometryPath path: algorithm=minimum_length
        path_elements:
          Scholz2015GeometryPathPoint path_point_0:
            PathPoint: scapula_l (-0.0788 -0.03117793 0.09702735)
          Scholz2015GeometryPathPoint path_point_1:
            PathPoint: scapula_l (-0.035 -0.0368557 0.045129)
          Scholz2015GeometryPathPoint path_point_2:
            PathPoint: humerus_l (0.0074 0.0059765 0.022)
          Scholz2015GeometryPathPoint path_point_3:
            PathPoint: humerus_l (0.0225 -0.0095624 0.01)
    Millard2012EquilibriumMuscle subscapularis_med_l: max_isometric_force=609 optimal_fiber_length=0.0770044
        tendon_slack_length=0.0569253 pennation_angle_at_optimal=0.08726646
      Scholz2015GeometryPath path: algorithm=minimum_length
        path_elements:
          Scholz2015GeometryPathPoint path_point_0:
            PathPoint: scapula_l (-0.0836 -0.05468589 0.08026515)
          Scholz2015GeometryPathPoint path_point_1:
            PathPoint: scapula_l (-0.035 -0.0438284 0.0397565)
          Scholz2015GeometryPathPoint path_point_2:
            PathPoint: humerus_l (0.0074 0.0059765 0.032)
          Scholz2015GeometryPathPoint path_point_3:
            PathPoint: humerus_l (0.0225 -0.0095624 0.01)
    Millard2012EquilibriumMuscle subscapularis_inf_l: max_isometric_force=854 optimal_fiber_length=0.09082225
        tendon_slack_length=0.07432057 pennation_angle_at_optimal=0
      Scholz2015GeometryPath path: algorithm=minimum_length
        path_elements:
          Scholz2015GeometryPathPoint path_point_0:
            PathPoint: scapula_l (-0.0951 -0.09731897 0.0917623)
          Scholz2015GeometryPathPoint path_point_1:
            PathPoint: scapula_l (-0.035 -0.0448245 0.0483525)
          Scholz2015GeometryPathPoint path_point_2:
            PathPoint: humerus_l (0.0074 0.0059765 0.035)
          Scholz2015GeometryPathPoint path_point_3:
            PathPoint: humerus_l (0.0225 -0.0095624 0.01)
    Millard2012EquilibriumMuscle supraspinatus_post_l: max_isometric_force=326.2 optimal_fiber_length=0.06158489
        tendon_slack_length=0.02605114 pennation_angle_at_optimal=0
      Scholz2015GeometryPath path: algorithm=minimum_length
        path_elements:
          Scholz2015GeometryPathPoint path_point_0:
            PathPoint: scapula_l (-0.0605 -0.00139454 0.05318775)
          Scholz2015GeometryPathPoint path_point_1:
            PathPoint: humerus_l (0 0.0370543 -0.006)
          Scholz2015GeometryPathPoint path_point_2:
            PathPoint: humerus_l (0.014 0.0203201 -0.021)
    Millard2012EquilibriumMuscle supraspinatus_ant_l: max_isometric_force=543.2 optimal_fiber_length=0.05840915
        tendon_slack_length=0.03268382 pennation_angle_at_optimal=0
      Scholz2015GeometryPath path: algorithm=minimum_length
        path_elements:
          Scholz2015GeometryPathPoint path_point_0:
            PathPoint: scapula_l (-0.049 0.00139454 0.0743554)
          Scholz2015GeometryPathPoint path_point_1:
            PathPoint: humerus_l (0.007 0.0394449 0.004)
          Scholz2015GeometryPathPoint path_point_2:
            PathPoint: humerus_l (0.0178 0.02103728 -0.0096)
    Millard2012EquilibriumMuscle triceps_long_l: max_isometric_force=1580.6 optimal_fiber_length=0.1170103
        tendon_slack_length=0.2912579 pennation_angle_at_optimal=0.174533
      Scholz2015GeometryPath path: algorithm=minimum_length
        path_elements:
          Scholz2015GeometryPathPoint path_point_0:
            PathPoint: scapula_l (-0.0421 -0.05169759 0.01386105)
          Scholz2015GeometryPathObstacle obstacle_0: socket_contact_geometry=/bodyset/humerus_l/triceps_l_obstacle
              contact_hint=(-0.01 0.003 0.055)
          Scholz2015GeometryPathPoint path_point_1:
            PathPoint: ulna_l (-0.031 0.0053375 -0.001)
    Millard2012EquilibriumMuscle biceps_long_l: max_isometric_force=485.8 optimal_fiber_length=0.1633802
        tendon_slack_length=0.2952571 pennation_angle_at_optimal=0
      Scholz2015GeometryPath path: algorithm=minimum_length
        path_elements:
          Scholz2015GeometryPathPoint path_point_0:
            PathPoint: scapula_l (-0.0226 -0.01623643 0.01944845)
          Scholz2015GeometryPathPoint path_point_1:
            PathPoint: humerus_l (0.012 0.0107577 -0.0135)
          Scholz2015GeometryPathObstacle obstacle_0: socket_contact_geometry=/bodyset/humerus_l/biceps_l_obstacle
              contact_hint=(0.014 0.007 -0.043)
          Scholz2015GeometryPathPoint path_point_2:
            PathPoint: radius_l (-0.0009 -0.04697 0.0095)
    Millard2012EquilibriumMuscle biceps_brevis_l: max_isometric_force=693 optimal_fiber_length=0.1469053
        tendon_slack_length=0.2463918 pennation_angle_at_optimal=0
      Scholz2015GeometryPath path: algorithm=minimum_length
        path_elements:
          Scholz2015GeometryPathPoint path_point_0:
            PathPoint: scapula_l (0.0095 -0.03805102 0.0260029)
          Scholz2015GeometryPathObstacle obstacle_0: socket_contact_geometry=/bodyset/humerus_l/biceps_l_obstacle
              contact_hint=(0.014 -0.018 -0.043)
          Scholz2015GeometryPathPoint path_point_1:
            PathPoint: radius_l (-0.0002 -0.04729025 0.0099)
    Millard2012EquilibriumMuscle rectus_abdominis_l: max_isometric_force=705.9 optimal_fiber_length=0.2993743
        tendon_slack_length=0.08142743 pennation_angle_at_optimal=0
      Scholz2015GeometryPath path: algorithm=minimum_length
        path_elements:
          Scholz2015GeometryPathPoint path_point_0:
            PathPoint: pelvis (-0.0275 -0.07236 -0.01138125)
          Scholz2015GeometryPathPoint path_point_1:
            PathPoint: pelvis (-0.002 0.067536 -0.0318675)
          Scholz2015GeometryPathPoint path_point_2:
            PathPoint: lumbar_spine (0.082 -0.109571 -0.0376075)
          Scholz2015GeometryPathPoint path_point_3:
            PathPoint: thorax (0.083 -0.2241225 -0.0376075)
          Scholz2015GeometryPathPoint path_point_4:
            PathPoint: thorax (0.072 -0.169337 -0.0376075)
    Millard2012EquilibriumMuscle extobl1_r: max_isometric_force=820.0712 optimal_fiber_length=0.04618498
        tendon_slack_length=0.06020997 pennation_angle_at_optimal=0
      Scholz2015GeometryPath path: algorithm=minimum_length
        path_elements:
          Scholz2015GeometryPathPoint path_point_0:
            PathPoint: lumbar_spine (0.083 -0.1035944 0.053725)
          Scholz2015GeometryPathPoint path_point_1:
            PathPoint: thorax (0.083 -0.2241225 0.0827365)
          Scholz2015GeometryPathPoint path_point_2:
            PathPoint: thorax (0.075 -0.1942395 0.101003)
      FiberForceLengthCurve: strain_at_zero_force=0 strain_at_one_norm_force=0.9 stiffness_at_low_force=0.2
          stiffness_at_one_norm_force=2.857143 curviness=0.75
    Millard2012EquilibriumMuscle extobl2_r: max_isometric_force=1464.327 optimal_fiber_length=0.07576442
        tendon_slack_length=0.09217014 pennation_angle_at_optimal=0
      Scholz2015GeometryPath path: algorithm=minimum_length
        path_elements:
          Scholz2015GeometryPathPoint path_point_0:
            PathPoint: lumbar_spine (0.057 -0.1743175 0.053725)
          Scholz2015GeometryPathPoint path_point_1:
            PathPoint: thorax (0.059 -0.2410562 0.1343125)
          Scholz2015GeometryPathPoint path_point_2:
            PathPoint: thorax (0.048 -0.219142 0.1429085)
      FiberForceLengthCurve: strain_at_zero_force=0 strain_at_one_norm_force=0.9 stiffness_at_low_force=0.2
          stiffness_at_one_norm_force=2.857143 curviness=0.75
    Millard2012EquilibriumMuscle extobl3_r: max_isometric_force=125.5796 optimal_fiber_length=0.09693302
        tendon_slack_length=0.09285316 pennation_angle_at_optimal=0
      Scholz2015GeometryPath path: algorithm=minimum_length
        path_elements:
          Scholz2015GeometryPathPoint path_point_0:
            PathPoint: pelvis (-0.035 0.04824 0.116544)
          Scholz2015GeometryPathPoint path_point_1:
            PathPoint: thorax (-0.027 -0.2330874 0.1278655)
      FiberForceLengthCurve: strain_at_zero_force=0 strain_at_one_norm_force=0.9 stiffness_at_low_force=0.2
          stiffness_at_one_norm_force=2.857143 curviness=0.75
    Millard2012EquilibriumMuscle extobl4_r: max_isometric_force=149.8368 optimal_fiber_length=0.08940599
        tendon_slack_length=0.04714947 pennation_angle_at_optimal=0
      Scholz2015GeometryPath path: algorithm=minimum_length
        path_elements:
          Scholz2015GeometryPathPoint path_point_0:
            PathPoint: pelvis (-0.1 0.08442 0.069198)
          Scholz2015GeometryPathPoint path_point_1:
            PathPoint: thorax (-0.06 -0.249025 0.077364)
      FiberForceLengthCurve: strain_at_zero_force=0 strain_at_one_norm_force=0.9 stiffness_at_low_force=0.2
          stiffness_at_one_norm_force=2.857143 curviness=0.75
    Millard2012EquilibriumMuscle intobl1_r: max_isometric_force=911.3819 optimal_fiber_length=0.05172974
        tendon_slack_length=0.05899083 pennation_angle_at_optimal=0
      Scholz2015GeometryPath path: algorithm=minimum_length
        path_elements:
          Scholz2015GeometryPathPoint path_point_0:
            PathPoint: pelvis (-0.023 0.0414864 0.1174545)
          Scholz2015GeometryPathPoint path_point_1:
            PathPoint: lumbar_spine (0.055 -0.1414462 0.06447)
      FiberForceLengthCurve: strain_at_zero_force=0 strain_at_one_norm_force=0.8 stiffness_at_low_force=0.2
          stiffness_at_one_norm_force=2.857143 curviness=0.75
    Millard2012EquilibriumMuscle intobl2_r: max_isometric_force=122.0465 optimal_fiber_length=0.042514
        tendon_slack_length=0.05140111 pennation_angle_at_optimal=0
      Scholz2015GeometryPath path: algorithm=minimum_length
        path_elements:
          Scholz2015GeometryPathPoint path_point_0:
            PathPoint: pelvis (-0.044 0.0656064 0.10926)
          Scholz2015GeometryPathPoint path_point_1:
            PathPoint: lumbar_spine (0.042 -0.1155476 0.07037975)
      FiberForceLengthCurve: strain_at_zero_force=0 strain_at_one_norm_force=0.8 stiffness_at_low_force=0.2
          stiffness_at_one_norm_force=2.857143 curviness=0.75
    Millard2012EquilibriumMuscle intobl3_r: max_isometric_force=426.7694 optimal_fiber_length=0.1015294
        tendon_slack_length=0.0427731 pennation_angle_at_optimal=0
      Scholz2015GeometryPath path: algorithm=minimum_length
        path_elements:
          Scholz2015GeometryPathPoint path_point_0:
            PathPoint: pelvis (-0.063 0.0849024 0.0919605)
          Scholz2015GeometryPathPoint path_point_1:
            PathPoint: thorax (0.032 -0.2649626 0.120344)
      FiberForceLengthCurve: strain_at_zero_force=0 strain_at_one_norm_force=0.8 stiffness_at_low_force=0.2
          stiffness_at_one_norm_force=2.857143 curviness=0.75
    Millard2012EquilibriumMuscle intobl4_r: max_isometric_force=652.5784 optimal_fiber_length=0.09492555
        tendon_slack_length=0.04048093 pennation_angle_at_optimal=0
      Scholz2015GeometryPath path: algorithm=minimum_length
        path_elements:
          Scholz2015GeometryPathPoint path_point_0:
            PathPoint: pelvis (-0.085 0.0877968 0.0755715)
          Scholz2015GeometryPathPoint path_point_1:
            PathPoint: thorax (-0.001 -0.2639665 0.1128225)
      FiberForceLengthCurve: strain_at_zero_force=0 strain_at_one_norm_force=0.8 stiffness_at_low_force=0.2
          stiffness_at_one_norm_force=2.857143 curviness=0.75
    Millard2012EquilibriumMuscle qlpost1_r: max_isometric_force=81.71412 optimal_fiber_length=0.07727648
        tendon_slack_length=0.06493135 pennation_angle_at_optimal=0.12915
      Scholz2015GeometryPath path: algorithm=minimum_length
        path_elements:
          Scholz2015GeometryPathPoint path_point_0:
            PathPoint: pelvis (-0.103 0.0858672 0.063735)
          Scholz2015GeometryPathPoint path_point_1:
            PathPoint: lumbar_spine (-0.001 -0.0318752 0.027937)
    Millard2012EquilibriumMuscle qlpost2_r: max_isometric_force=87.71271 optimal_fiber_length=0.05500402
        tendon_slack_length=0.04621698 pennation_angle_at_optimal=0.12915
      Scholz2015GeometryPath path: algorithm=minimum_length
        path_elements:
          Scholz2015GeometryPathPoint path_point_0:
            PathPoint: pelvis (-0.111 0.0791136 0.0591825)
          Scholz2015GeometryPathPoint path_point_1:
            PathPoint: lumbar_spine (-0.013 -0.0757036 0.0290115)
    Millard2012EquilibriumMuscle qlpost3_r: max_isometric_force=199.5611 optimal_fiber_length=0.03802031
        tendon_slack_length=0.03194647 pennation_angle_at_optimal=0.12915
      Scholz2015GeometryPath path: algorithm=minimum_length
        path_elements:
          Scholz2015GeometryPathPoint path_point_0:
            PathPoint: pelvis (-0.119 0.0742896 0.056451)
          Scholz2015GeometryPathPoint path_point_1:
            PathPoint: lumbar_spine (-0.029 -0.1105671 0.036533)
    Millard2012EquilibriumMuscle qlmid1_r: max_isometric_force=327.7053 optimal_fiber_length=0.04387451
        tendon_slack_length=0.02278221 pennation_angle_at_optimal=0.12915
      Scholz2015GeometryPath path: algorithm=minimum_length
        path_elements:
          Scholz2015GeometryPathPoint path_point_0:
            PathPoint: lumbar_spine (0.003 -0.0458206 0.019341)
          Scholz2015GeometryPathPoint path_point_1:
            PathPoint: thorax (-0.066 -0.2141615 0.027937)
    Millard2012EquilibriumMuscle qlmid2_r: max_isometric_force=175.9307 optimal_fiber_length=0.06443317
        tendon_slack_length=0.03345747 pennation_angle_at_optimal=0.12915
      Scholz2015GeometryPath path: algorithm=minimum_length
        path_elements:
          Scholz2015GeometryPathPoint path_point_0:
            PathPoint: lumbar_spine (0.004 -0.0717192 0.0225645)
          Scholz2015GeometryPathPoint path_point_1:
            PathPoint: thorax (-0.071 -0.2300991 0.053725)
    Millard2012EquilibriumMuscle qlmid3_r: max_isometric_force=51.06528 optimal_fiber_length=0.077603
        tendon_slack_length=0.04029602 pennation_angle_at_optimal=0.12915
      Scholz2015GeometryPath path: algorithm=minimum_length
        path_elements:
          Scholz2015GeometryPathPoint path_point_0:
            PathPoint: lumbar_spine (0.005 -0.1025983 0.025788)
          Scholz2015GeometryPathPoint path_point_1:
            PathPoint: thorax (-0.058 -0.249025 0.0762895)
    Millard2012EquilibriumMuscle qlant1_r: max_isometric_force=134.8054 optimal_fiber_length=0.1173134
        tendon_slack_length=0.06091599 pennation_angle_at_optimal=0.12915
      Scholz2015GeometryPath path: algorithm=minimum_length
        path_elements:
          Scholz2015GeometryPathPoint path_point_0:
            PathPoint: pelvis (-0.1 0.082008 0.0591825)
          Scholz2015GeometryPathPoint path_point_1:
            PathPoint: thorax (-0.046 -0.2131654 0.027937)
    Millard2012EquilibriumMuscle qlant2_r: max_isometric_force=167.3588 optimal_fiber_length=0.09943138
        tendon_slack_length=0.05163059 pennation_angle_at_optimal=0.12915
      Scholz2015GeometryPath path: algorithm=minimum_length
        path_elements:
          Scholz2015GeometryPathPoint path_point_0:
            PathPoint: pelvis (-0.1 0.082008 0.0591825)
          Scholz2015GeometryPathPoint path_point_1:
            PathPoint: thorax (-0.067 -0.229103 0.053725)
    Millard2012EquilibriumMuscle scm1_r: max_isometric_force=197 optimal_fiber_length=0.1082851
        tendon_slack_length=0.05627117 pennation_angle_at_optimal=0.2618
      Scholz2015GeometryPath path: algorithm=minimum_length
        path_elements:
          Scholz2015GeometryPathPoint path_point_0:
            PathPoint: thorax (0 0 0.02149)
          Scholz2015GeometryPathPoint path_point_1:
            PathPoint: head (0.002 0.0069727 0.058023)
    Millard2012EquilibriumMuscle scm2_r: max_isometric_force=98.5 optimal_fiber_length=0.1078422
        tendon_slack_length=0.03514656 pennation_angle_at_optimal=0.2618
      Scholz2015GeometryPath path: algorithm=minimum_length
        path_elements:
          Scholz2015GeometryPathPoint path_point_0:
            PathPoint: clavicle_r (0.00388 0.00542 0.0378224)
          Scholz2015GeometryPathPoint path_point_1:
            PathPoint: head (0.002 0.0069727 0.058023)
    Millard2012EquilibriumMuscle scm3_r: max_isometric_force=98.5 optimal_fiber_length=0.107833
        tendon_slack_length=0.06935957 pennation_angle_at_optimal=0.2618
      Scholz2015GeometryPath path: algorithm=minimum_length
        path_elements:
          Scholz2015GeometryPathPoint path_point_0:
            PathPoint: clavicle_r (0.00388 0.00542 0.0378224)
          Scholz2015GeometryPathPoint path_point_1:
            PathPoint: head (-0.026 0.0189259 0.0590975)
    Millard2012EquilibriumMuscle scalenus_ant_r: max_isometric_force=147 optimal_fiber_length=0.04231225
        tendon_slack_length=0.05381816 pennation_angle_at_optimal=0.17453
      Scholz2015GeometryPath path: algorithm=minimum_length
        path_elements:
          Scholz2015GeometryPathPoint path_point_0:
            PathPoint: thorax (-0.005 0 0.058023)
          Scholz2015GeometryPathPoint path_point_1:
            PathPoint: head (0.005 -0.0338674 0.02149)
    Millard2012EquilibriumMuscle scalenus_med_r: max_isometric_force=206 optimal_fiber_length=0.05080543
        tendon_slack_length=0.06249881 pennation_angle_at_optimal=0.17453
      Scholz2015GeometryPath path: algorithm=minimum_length
        path_elements:
          Scholz2015GeometryPathPoint path_point_0:
            PathPoint: thorax (-0.028 0.0169337 0.075215)
          Scholz2015GeometryPathPoint path_point_1:
            PathPoint: head (-0.005 -0.019922 0.02149)
    Millard2012EquilibriumMuscle scalenus_post_r: max_isometric_force=157 optimal_fiber_length=0.06369067
        tendon_slack_length=0.0748314 pennation_angle_at_optimal=0.17453
      Scholz2015GeometryPath path: algorithm=minimum_length
        path_elements:
          Scholz2015GeometryPathPoint path_point_0:
            PathPoint: thorax (-0.035 -0.0079688 0.094556)
          Scholz2015GeometryPathPoint path_point_1:
            PathPoint: head (-0.007 -0.0508011 0.0225645)
    Millard2012EquilibriumMuscle extobl1_l: max_isometric_force=820.0712 optimal_fiber_length=0.04618498
        tendon_slack_length=0.06020997 pennation_angle_at_optimal=0
      Scholz2015GeometryPath path: algorithm=minimum_length
        path_elements:
          Scholz2015GeometryPathPoint path_point_0:
            PathPoint: lumbar_spine (0.083 -0.1035944 -0.053725)
          Scholz2015GeometryPathPoint path_point_1:
            PathPoint: thorax (0.083 -0.2241225 -0.0827365)
          Scholz2015GeometryPathPoint path_point_2:
            PathPoint: thorax (0.075 -0.1942395 -0.101003)
      FiberForceLengthCurve: strain_at_zero_force=0 strain_at_one_norm_force=0.9 stiffness_at_low_force=0.2
          stiffness_at_one_norm_force=2.857143 curviness=0.75
    Millard2012EquilibriumMuscle extobl2_l: max_isometric_force=1464.327 optimal_fiber_length=0.07576442
        tendon_slack_length=0.09217014 pennation_angle_at_optimal=0
      Scholz2015GeometryPath path: algorithm=minimum_length
        path_elements:
          Scholz2015GeometryPathPoint path_point_0:
            PathPoint: lumbar_spine (0.057 -0.1743175 -0.053725)
          Scholz2015GeometryPathPoint path_point_1:
            PathPoint: thorax (0.059 -0.2410562 -0.1343125)
          Scholz2015GeometryPathPoint path_point_2:
            PathPoint: thorax (0.048 -0.219142 -0.1429085)
      FiberForceLengthCurve: strain_at_zero_force=0 strain_at_one_norm_force=0.9 stiffness_at_low_force=0.2
          stiffness_at_one_norm_force=2.857143 curviness=0.75
    Millard2012EquilibriumMuscle extobl3_l: max_isometric_force=125.5796 optimal_fiber_length=0.09693302
        tendon_slack_length=0.09285316 pennation_angle_at_optimal=0
      Scholz2015GeometryPath path: algorithm=minimum_length
        path_elements:
          Scholz2015GeometryPathPoint path_point_0:
            PathPoint: pelvis (-0.035 0.04824 -0.116544)
          Scholz2015GeometryPathPoint path_point_1:
            PathPoint: thorax (-0.027 -0.2330874 -0.1278655)
      FiberForceLengthCurve: strain_at_zero_force=0 strain_at_one_norm_force=0.9 stiffness_at_low_force=0.2
          stiffness_at_one_norm_force=2.857143 curviness=0.75
    Millard2012EquilibriumMuscle extobl4_l: max_isometric_force=149.8368 optimal_fiber_length=0.08940599
        tendon_slack_length=0.04714947 pennation_angle_at_optimal=0
      Scholz2015GeometryPath path: algorithm=minimum_length
        path_elements:
          Scholz2015GeometryPathPoint path_point_0:
            PathPoint: pelvis (-0.1 0.08442 -0.069198)
          Scholz2015GeometryPathPoint path_point_1:
            PathPoint: thorax (-0.06 -0.249025 -0.077364)
      FiberForceLengthCurve: strain_at_zero_force=0 strain_at_one_norm_force=0.9 stiffness_at_low_force=0.2
          stiffness_at_one_norm_force=2.857143 curviness=0.75
    Millard2012EquilibriumMuscle intobl1_l: max_isometric_force=911.3819 optimal_fiber_length=0.05172974
        tendon_slack_length=0.05899083 pennation_angle_at_optimal=0
      Scholz2015GeometryPath path: algorithm=minimum_length
        path_elements:
          Scholz2015GeometryPathPoint path_point_0:
            PathPoint: pelvis (-0.023 0.0414864 -0.1174545)
          Scholz2015GeometryPathPoint path_point_1:
            PathPoint: lumbar_spine (0.055 -0.1414462 -0.06447)
      FiberForceLengthCurve: strain_at_zero_force=0 strain_at_one_norm_force=0.8 stiffness_at_low_force=0.2
          stiffness_at_one_norm_force=2.857143 curviness=0.75
    Millard2012EquilibriumMuscle intobl2_l: max_isometric_force=122.0465 optimal_fiber_length=0.042514
        tendon_slack_length=0.05140111 pennation_angle_at_optimal=0
      Scholz2015GeometryPath path: algorithm=minimum_length
        path_elements:
          Scholz2015GeometryPathPoint path_point_0:
            PathPoint: pelvis (-0.044 0.0656064 -0.10926)
          Scholz2015GeometryPathPoint path_point_1:
            PathPoint: lumbar_spine (0.042 -0.1155476 -0.07037975)
      FiberForceLengthCurve: strain_at_zero_force=0 strain_at_one_norm_force=0.8 stiffness_at_low_force=0.2
          stiffness_at_one_norm_force=2.857143 curviness=0.75
    Millard2012EquilibriumMuscle intobl3_l: max_isometric_force=426.7694 optimal_fiber_length=0.1015294
        tendon_slack_length=0.0427731 pennation_angle_at_optimal=0
      Scholz2015GeometryPath path: algorithm=minimum_length
        path_elements:
          Scholz2015GeometryPathPoint path_point_0:
            PathPoint: pelvis (-0.063 0.0849024 -0.0919605)
          Scholz2015GeometryPathPoint path_point_1:
            PathPoint: thorax (0.032 -0.2649626 -0.120344)
      FiberForceLengthCurve: strain_at_zero_force=0 strain_at_one_norm_force=0.8 stiffness_at_low_force=0.2
          stiffness_at_one_norm_force=2.857143 curviness=0.75
    Millard2012EquilibriumMuscle intobl4_l: max_isometric_force=652.5784 optimal_fiber_length=0.09492555
        tendon_slack_length=0.04048093 pennation_angle_at_optimal=0
      Scholz2015GeometryPath path: algorithm=minimum_length
        path_elements:
          Scholz2015GeometryPathPoint path_point_0:
            PathPoint: pelvis (-0.085 0.0877968 -0.0755715)
          Scholz2015GeometryPathPoint path_point_1:
            PathPoint: thorax (-0.001 -0.2639665 -0.1128225)
      FiberForceLengthCurve: strain_at_zero_force=0 strain_at_one_norm_force=0.8 stiffness_at_low_force=0.2
          stiffness_at_one_norm_force=2.857143 curviness=0.75
    Millard2012EquilibriumMuscle qlpost1_l: max_isometric_force=81.71412 optimal_fiber_length=0.07727648
        tendon_slack_length=0.06493135 pennation_angle_at_optimal=0.12915
      Scholz2015GeometryPath path: algorithm=minimum_length
        path_elements:
          Scholz2015GeometryPathPoint path_point_0:
            PathPoint: pelvis (-0.103 0.0858672 -0.063735)
          Scholz2015GeometryPathPoint path_point_1:
            PathPoint: lumbar_spine (-0.001 -0.0318752 -0.027937)
    Millard2012EquilibriumMuscle qlpost2_l: max_isometric_force=87.71271 optimal_fiber_length=0.05500402
        tendon_slack_length=0.04621698 pennation_angle_at_optimal=0.12915
      Scholz2015GeometryPath path: algorithm=minimum_length
        path_elements:
          Scholz2015GeometryPathPoint path_point_0:
            PathPoint: pelvis (-0.111 0.0791136 -0.0591825)
          Scholz2015GeometryPathPoint path_point_1:
            PathPoint: lumbar_spine (-0.013 -0.0757036 -0.0290115)
    Millard2012EquilibriumMuscle qlpost3_l: max_isometric_force=199.5611 optimal_fiber_length=0.03802031
        tendon_slack_length=0.03194647 pennation_angle_at_optimal=0.12915
      Scholz2015GeometryPath path: algorithm=minimum_length
        path_elements:
          Scholz2015GeometryPathPoint path_point_0:
            PathPoint: pelvis (-0.119 0.0742896 -0.056451)
          Scholz2015GeometryPathPoint path_point_1:
            PathPoint: lumbar_spine (-0.029 -0.1105671 -0.036533)
    Millard2012EquilibriumMuscle qlmid1_l: max_isometric_force=327.7053 optimal_fiber_length=0.04387451
        tendon_slack_length=0.02278221 pennation_angle_at_optimal=0.12915
      Scholz2015GeometryPath path: algorithm=minimum_length
        path_elements:
          Scholz2015GeometryPathPoint path_point_0:
            PathPoint: lumbar_spine (0.003 -0.0458206 -0.019341)
          Scholz2015GeometryPathPoint path_point_1:
            PathPoint: thorax (-0.066 -0.2141615 -0.027937)
    Millard2012EquilibriumMuscle qlmid2_l: max_isometric_force=175.9307 optimal_fiber_length=0.06443317
        tendon_slack_length=0.03345747 pennation_angle_at_optimal=0.12915
      Scholz2015GeometryPath path: algorithm=minimum_length
        path_elements:
          Scholz2015GeometryPathPoint path_point_0:
            PathPoint: lumbar_spine (0.004 -0.0717192 -0.0225645)
          Scholz2015GeometryPathPoint path_point_1:
            PathPoint: thorax (-0.071 -0.2300991 -0.053725)
    Millard2012EquilibriumMuscle qlmid3_l: max_isometric_force=51.06528 optimal_fiber_length=0.077603
        tendon_slack_length=0.04029602 pennation_angle_at_optimal=0.12915
      Scholz2015GeometryPath path: algorithm=minimum_length
        path_elements:
          Scholz2015GeometryPathPoint path_point_0:
            PathPoint: lumbar_spine (0.005 -0.1025983 -0.025788)
          Scholz2015GeometryPathPoint path_point_1:
            PathPoint: thorax (-0.058 -0.249025 -0.0762895)
    Millard2012EquilibriumMuscle qlant1_l: max_isometric_force=134.8054 optimal_fiber_length=0.1173134
        tendon_slack_length=0.06091599 pennation_angle_at_optimal=0.12915
      Scholz2015GeometryPath path: algorithm=minimum_length
        path_elements:
          Scholz2015GeometryPathPoint path_point_0:
            PathPoint: pelvis (-0.1 0.082008 -0.0591825)
          Scholz2015GeometryPathPoint path_point_1:
            PathPoint: thorax (-0.046 -0.2131654 -0.027937)
    Millard2012EquilibriumMuscle qlant2_l: max_isometric_force=167.3588 optimal_fiber_length=0.09943138
        tendon_slack_length=0.05163059 pennation_angle_at_optimal=0.12915
      Scholz2015GeometryPath path: algorithm=minimum_length
        path_elements:
          Scholz2015GeometryPathPoint path_point_0:
            PathPoint: pelvis (-0.1 0.082008 -0.0591825)
          Scholz2015GeometryPathPoint path_point_1:
            PathPoint: thorax (-0.067 -0.229103 -0.053725)
    Millard2012EquilibriumMuscle scm1_l: max_isometric_force=197 optimal_fiber_length=0.1082851
        tendon_slack_length=0.05627117 pennation_angle_at_optimal=0.2618
      Scholz2015GeometryPath path: algorithm=minimum_length
        path_elements:
          Scholz2015GeometryPathPoint path_point_0:
            PathPoint: thorax (0 0 -0.02149)
          Scholz2015GeometryPathPoint path_point_1:
            PathPoint: head (0.002 0.0069727 -0.058023)
    Millard2012EquilibriumMuscle scm2_l: max_isometric_force=98.5 optimal_fiber_length=0.1078422
        tendon_slack_length=0.03514656 pennation_angle_at_optimal=0.2618
      Scholz2015GeometryPath path: algorithm=minimum_length
        path_elements:
          Scholz2015GeometryPathPoint path_point_0:
            PathPoint: clavicle_l (0.00388 0.00542 -0.0378224)
          Scholz2015GeometryPathPoint path_point_1:
            PathPoint: head (0.002 0.0069727 -0.058023)
    Millard2012EquilibriumMuscle scm3_l: max_isometric_force=98.5 optimal_fiber_length=0.107833
        tendon_slack_length=0.06935957 pennation_angle_at_optimal=0.2618
      Scholz2015GeometryPath path: algorithm=minimum_length
        path_elements:
          Scholz2015GeometryPathPoint path_point_0:
            PathPoint: clavicle_l (0.00388 0.00542 -0.0378224)
          Scholz2015GeometryPathPoint path_point_1:
            PathPoint: head (-0.026 0.0189259 -0.0590975)
    Millard2012EquilibriumMuscle scalenus_ant_l: max_isometric_force=147 optimal_fiber_length=0.04231225
        tendon_slack_length=0.05381816 pennation_angle_at_optimal=0.17453
      Scholz2015GeometryPath path: algorithm=minimum_length
        path_elements:
          Scholz2015GeometryPathPoint path_point_0:
            PathPoint: thorax (-0.005 0 -0.058023)
          Scholz2015GeometryPathPoint path_point_1:
            PathPoint: head (0.005 -0.0338674 -0.02149)
    Millard2012EquilibriumMuscle scalenus_med_l: max_isometric_force=206 optimal_fiber_length=0.05080543
        tendon_slack_length=0.06249881 pennation_angle_at_optimal=0.17453
      Scholz2015GeometryPath path: algorithm=minimum_length
        path_elements:
          Scholz2015GeometryPathPoint path_point_0:
            PathPoint: thorax (-0.028 0.0169337 -0.075215)
          Scholz2015GeometryPathPoint path_point_1:
            PathPoint: head (-0.005 -0.019922 -0.02149)
    Millard2012EquilibriumMuscle scalenus_post_l: max_isometric_force=157 optimal_fiber_length=0.06369067
        tendon_slack_length=0.0748314 pennation_angle_at_optimal=0.17453
      Scholz2015GeometryPath path: algorithm=minimum_length
        path_elements:
          Scholz2015GeometryPathPoint path_point_0:
            PathPoint: thorax (-0.035 -0.0079688 -0.094556)
          Scholz2015GeometryPathPoint path_point_1:
            PathPoint: head (-0.007 -0.0508011 -0.0225645)
