# OpenSim document version 40500
Model subject01:
  gravity: 0 -9.80665 0
  length_units: meters
  force_units: N
  Ground
  BodySet:
    Body pelvis: mass=11.3078 [kg] mass_center=(-0.0623853 0 0) inertia=(0.0756014 0.0756014 0.043286 0 0 0)
        meshes=(sacrum.vtp pelvis.vtp l_pelvis.vtp)
    Body femur_r: mass=8.930827 mass_center=(0 -0.181569 0) inertia=(0.139837 0.0248011 0.139837 0 0 0)
        meshes=femur_r.vtp
    Body tibia_r: mass=3.559791 mass_center=(0 -0.208895 0) inertia=(0.059175 0.00331717 0.059175 0 0 0)
        meshes=(tibia_r.vtp fibula_r.vtp)
    Body talus_r: mass=0.09601594 mass_center=(0 0 0) inertia=(0.000739195 0.000703926 0.000703926 0 0 0)
        meshes=talus_rv.vtp
    Body calcn_r: mass=1.200199 mass_center=(0.0834506 0.0263226 0) inertia=(0.00103487 0.00265714 0.00265714 0 0 0)
        meshes=foot.vtp
    Body toes_r: mass=0.2079705 mass_center=(0.0288739 0.00526452 -0.0153549)
        inertia=(7.39195e-5 0.000137258 0.000137258 0 0 0) meshes=bofoot.vtp
    Body femur_l: mass=8.930827 mass_center=(0 -0.181569 0) inertia=(0.139837 0.0248011 0.139837 0 0 0)
        meshes=femur_l.vtp
    Body tibia_l: mass=3.559791 mass_center=(0 -0.208895 0) inertia=(0.059175 0.00331717 0.059175 0 0 0)
        meshes=(tibia_l.vtp fibula_l.vtp)
    Body talus_l: mass=0.09601594 mass_center=(0 0 0) inertia=(0.000739195 0.000703926 0.000703926 0 0 0)
        meshes=talus_lv.vtp
    Body calcn_l: mass=1.200199 mass_center=(0.0834506 0.0263226 0) inertia=(0.00103487 0.00265714 0.00265714 0 0 0)
        meshes=l_foot.vtp
    Body toes_l: mass=0.2079705 mass_center=(0.0288739 0.00526452 0.0153549)
        inertia=(7.39195e-5 0.000137258 0.000137258 0 0 0) meshes=l_bofoot.vtp
    Body lumbar_spine: mass=5 mass_center=(0 -0.08715875 0) inertia=(0.02294438 0.0205666 0.02294438 0 0 0)
    Body thorax: mass=16.83 mass_center=(-0.0591 -0.1480205 0) inertia=(1.311031 0.5936075 1.311031 0 0 0)
        meshes=ribs.obj
      Station suprasternale: .. (0 0 0)
      ContactEllipsoid thorax_r_obstacle: location=(-0.025 -0.13 0.057) orientation=(-0.12 -0.03 0.057)
          radii=(0.077 0.145 0.077)
      ContactEllipsoid pectoralis_r_obstacle: location=(-0.0195 -0.12 0.0585) orientation=(-0.122 -0.03 0.25)
          radii=(0.075 0.15 0.077)
      ContactEllipsoid thorax_l_obstacle: location=(-0.025 -0.13 -0.057) orientation=(0.12 0.03 0.057)
          radii=(0.077 0.145 0.077)
      ContactEllipsoid pectoralis_l_obstacle: location=(-0.0195 -0.12 -0.0585) orientation=(0.122 0.03 0.25)
          radii=(0.075 0.15 0.077)
    Body head: mass=5 mass_center=(0 0.03735375 0) inertia=(0.01616648 0.01563398 0.01616648 0 0 0) meshes=skull.obj
      Station glabella: .. (0.09 0.069727 0)
      Station euryon_r: .. (-0.0015 0.0846685 0.0741405)
      Station euryon_l: .. (-0.0015 0.0846685 -0.0741405)
      Station opisthocranion: .. (-0.075 0.049805 0)
      Station vertex: .. (0 0.139454 0)
    Body clavicle_r: mass=0.1898 mass_center=(-0.0111 0.0064 0.0582379)
        inertia=(0.0003079421 0.0003079421 4.9e-5 0 0 0) meshes=clavicle_r.obj
    Body clavicle_l: mass=0.1898 mass_center=(-0.0111 0.0064 -0.0582379)
        inertia=(0.0003079421 0.0003079421 4.9e-5 0 0 0) meshes=clavicle_l.obj
    Body scapula_r: mass=0.7054 mass_center=(-0.04612 -0.03177559 -0.04905093)
        inertia=(0.001070309 0.001035155 0.001035155 0 0 0) meshes=scapula_r.obj
      Station acromion_r: .. (0 0 0)
    Body scapula_l: mass=0.7054 mass_center=(-0.04612 -0.03177559 0.04905093)
        inertia=(0.001070309 0.001035155 0.001035155 0 0 0) meshes=scapula_l.obj
      Station acromion_l: .. (0 0 0)
    Body humerus_r: mass=2.0325 mass_center=(0 -0.1966269 0) inertia=(0.01618433 0.004121 0.01618433 0 0 0)
        meshes=humerus_r.obj
      ContactEllipsoid triceps_r_obstacle: location=(0.006 -0.265 -0.02) orientation=(2.234 1.3 -0.7)
          radii=(0.03 0.1 0.03)
      ContactEllipsoid biceps_r_obstacle: location=(0.013 -0.222 0.006) orientation=(0.65 1.11 0.975)
          radii=(0.03 0.085 0.03)
    Body humerus_l: mass=2.0325 mass_center=(0 -0.1966269 0) inertia=(0.01618433 0.004121 0.01618433 0 0 0)
        meshes=humerus_l.obj
      ContactEllipsoid triceps_l_obstacle: location=(0.006 -0.265 0.02) orientation=(-2.234 -1.3 -0.7)
          radii=(0.03 0.1 0.03)
      ContactEllipsoid biceps_l_obstacle: location=(0.013 -0.222 -0.006) orientation=(-0.65 -1.11 0.975)
          radii=(0.03 0.085 0.03)
    Body ulna_r: mass=0.6075 mass_center=(0 -0.1286604 0) inertia=(0.003332243 0.000618 0.003332243 0 0 0)
        meshes=ulna_r.obj
      Station olecranon_r: .. (-0.03 -0.0010675 0)
    Body ulna_l: mass=0.6075 mass_center=(0 -0.1286604 0) inertia=(0.003332243 0.000618 0.003332243 0 0 0)
        meshes=ulna_l.obj
      Station olecranon_l: .. (-0.03 -0.0010675 0)
    Body radius_r: mass=0.6075 mass_center=(0 -0.1286604 0) inertia=(0.003332243 0.000618 0.003332243 0 0 0)
        meshes=radius_r.obj
      Station radiale_r: .. (0 -0.00427 0.006)
      Station stylion_r: .. (0 -0.245525 0.03)
    Body radius_l: mass=0.6075 mass_center=(0 -0.1286604 0) inertia=(0.003332243 0.000618 0.003332243 0 0 0)
        meshes=radius_l.obj
      Station radiale_l: .. (0 -0.00427 -0.006)
      Station stylion_l: .. (0 -0.245525 -0.03)
    Body hand_r: mass=0.4575 mass_center=(0 -0.068095 0) inertia=(0.000892 0.000547 0.00134 0 0 0)
        meshes=(pisiform_r.obj lunate_r.obj scaphoid_r.obj triquetrum_r.obj hamate_r.obj capitate_r.obj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)
    Body hand_l: mass=0.4575 mass_center=(0 -0.068095 0) inertia=(0.000892 0.000547 0.00134 0 0 0)
        meshes=(pisiform_l.obj lunate_l.obj scaphoid_l.obj triquetrum_l.obj hamate_l.obj capitate_l.obj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)
  JointSet:
    CustomJoint ground_pelvis: socket_parent_frame=ground_offset socket_child_frame=pelvis_offset
      Coordinate pelvis_tilt: default_value=0 range=(-1.570796 1.570796) clamped=true
      Coordinate pelvis_list: default_value=0 range=(-1.570796 1.570796) clamped=true
      Coordinate pelvis_rotation: default_value=0 range=(-1.570796 1.570796) clamped=true
      Coordinate pelvis_tx: default_value=0 range=(-5 25) clamped=true
      Coordinate pelvis_ty: default_value=0 range=(-1 2) clamped=true
      Coordinate pelvis_tz: default_value=0 range=(-3 3) clamped=true
      PhysicalOffsetFrame ground_offset: socket_parent=/ground translation=(0 0 0) [meters]
      PhysicalOffsetFrame pelvis_offset: socket_parent=/bodyset/pelvis translation=(0 0 0)
      SpatialTransform:
        TransformAxis rotation1: coordinates=pelvis_tilt axis=(0 0 1) LinearFunction(coefficients=1 0)
        TransformAxis rotation2: coordinates=pelvis_list axis=(1 0 0) LinearFunction(coefficients=1 0)
        TransformAxis rotation3: coordinates=pelvis_rotation axis=(0 1 0) LinearFunction(coefficients=1 0)
        TransformAxis translation1: coordinates=pelvis_tx axis=(1 0 0) LinearFunction(coefficients=1 0)
        TransformAxis translation2: coordinates=pelvis_ty axis=(0 1 0) LinearFunction(coefficients=1 0)
        TransformAxis translation3: coordinates=pelvis_tz axis=(0 0 1) LinearFunction(coefficients=1 0)
    CustomJoint hip_r: socket_parent_frame=pelvis_offset socket_child_frame=femur_r_offset
      Coordinate hip_flexion_r: default_value=0 range=(-2.094395 2.094395) clamped=true
      Coordinate hip_adduction_r: default_value=0 range=(-2.094395 2.094395) clamped=true
      Coordinate hip_rotation_r: default_value=0 range=(-2.094395 2.094395) clamped=true
      PhysicalOffsetFrame pelvis_offset: socket_parent=/bodyset/pelvis translation=(-0.0623853 -0.0583263 0.0728399)
      PhysicalOffsetFrame femur_r_offset: socket_parent=/bodyset/femur_r translation=(0 0 0)
      SpatialTransform: axes_held_at_zero=(translation1 translation2 translation3)
        TransformAxis rotation1: coordinates=hip_flexion_r axis=(0 0 1) LinearFunction(coefficients=1 0)
        TransformAxis rotation2: coordinates=hip_adduction_r axis=(1 0 0) LinearFunction(coefficients=1 0)
        TransformAxis rotation3: coordinates=hip_rotation_r axis=(0 1 0) LinearFunction(coefficients=1 0)
    CustomJoint knee_r: socket_parent_frame=femur_r_offset socket_child_frame=tibia_r_offset
      Coordinate knee_angle_r: default_value=0 range=(-2.5307 0.1745329) clamped=true
      PhysicalOffsetFrame femur_r_offset: socket_parent=/bodyset/femur_r translation=(0.0041 -0.41 0)
      PhysicalOffsetFrame tibia_r_offset: socket_parent=/bodyset/tibia_r translation=(0 0 0)
      SpatialTransform: axes_held_at_zero=(rotation2 rotation3 translation3)
        TransformAxis rotation1: coordinates=knee_angle_r axis=(0 0 1) LinearFunction(coefficients=1 0)
        TransformAxis translation1: coordinates=knee_angle_r axis=(1 0 0) Constant(value=0)
        TransformAxis translation2: coordinates=knee_angle_r axis=(0 1 0) Constant(value=0)
    CustomJoint ankle_r: socket_parent_frame=tibia_r_offset socket_child_frame=talus_r_offset
      Coordinate ankle_angle_r: default_value=0 range=(-1.570796 1.570796) clamped=true
      PhysicalOffsetFrame tibia_r_offset: socket_parent=/bodyset/tibia_r translation=(0 -0.481118 0)
      PhysicalOffsetFrame talus_r_offset: socket_parent=/bodyset/talus_r translation=(0 0 0)
      SpatialTransform: axes_held_at_zero=(rotation2 rotation3 translation1 translation2 translation3)
        TransformAxis rotation1: coordinates=ankle_angle_r axis=(-0.1050135 -0.1740224 0.9791263)
            LinearFunction(coefficients=1 0)
    CustomJoint subtalar_r: socket_parent_frame=talus_r_offset socket_child_frame=calcn_r_offset
      Coordinate subtalar_angle_r: default_value=0 range=(-1.570796 1.570796) clamped=true
      PhysicalOffsetFrame talus_r_offset: socket_parent=/bodyset/talus_r translation=(-0.0406989 -0.0368078 0.00694917)
      PhysicalOffsetFrame calcn_r_offset: socket_parent=/bodyset/calcn_r translation=(0 0 0)
      SpatialTransform: axes_held_at_zero=(rotation2 rotation3 translation1 translation2 translation3)
        TransformAxis rotation1: coordinates=subtalar_angle_r axis=(0.7871796 0.6047475 -0.1209495)
            LinearFunction(coefficients=1 0)
    CustomJoint mtp_r: socket_parent_frame=calcn_r_offset socket_child_frame=toes_r_offset
      Coordinate mtp_angle_r: default_value=0 range=(-1.570796 1.570796) clamped=true
      PhysicalOffsetFrame calcn_r_offset: socket_parent=/bodyset/calcn_r translation=(0.14921 -0.00175484 0.000947614)
      PhysicalOffsetFrame toes_r_offset: socket_parent=/bodyset/toes_r translation=(0 0 0)
      SpatialTransform: axes_held_at_zero=(rotation2 rotation3 translation1 translation2 translation3)
        TransformAxis rotation1: coordinates=mtp_angle_r axis=(-0.5809544 0 0.8139361) LinearFunction(coefficients=1 0)
    CustomJoint hip_l: socket_parent_frame=pelvis_offset socket_child_frame=femur_l_offset
      Coordinate hip_flexion_l: default_value=0 range=(-2.094395 2.094395) clamped=true
      Coordinate hip_adduction_l: default_value=0 range=(-2.094395 2.094395) clamped=true
      Coordinate hip_rotation_l: default_value=0 range=(-2.094395 2.094395) clamped=true
      PhysicalOffsetFrame pelvis_offset: socket_parent=/bodyset/pelvis translation=(-0.0623853 -0.0583263 -0.0728399)
      PhysicalOffsetFrame femur_l_offset: socket_parent=/bodyset/femur_l translation=(0 0 0)
      SpatialTransform: axes_held_at_zero=(translation1 translation2 translation3)
        TransformAxis rotation1: coordinates=hip_flexion_l axis=(0 0 1) LinearFunction(coefficients=1 0)
        TransformAxis rotation2: coordinates=hip_adduction_l axis=(-1 0 0) LinearFunction(coefficients=1 0)
        TransformAxis rotation3: coordinates=hip_rotation_l axis=(0 -1 0) LinearFunction(coefficients=1 0)
    CustomJoint knee_l: socket_parent_frame=femur_l_offset socket_child_frame=tibia_l_offset
      Coordinate knee_angle_l: default_value=0 range=(-2.5307 0.1745329) clamped=true
      PhysicalOffsetFrame femur_l_offset: socket_parent=/bodyset/femur_l translation=(0.0041 -0.41 0)
      PhysicalOffsetFrame tibia_l_offset: socket_parent=/bodyset/tibia_l translation=(0 0 0)
      SpatialTransform: axes_held_at_zero=(rotation2 rotation3 translation3)
        TransformAxis rotation1: coordinates=knee_angle_l axis=(0 0 1) LinearFunction(coefficients=1 0)
        TransformAxis translation1: coordinates=knee_angle_l axis=(1 0 0) Constant(value=0)
        TransformAxis translation2: coordinates=knee_angle_l axis=(0 1 0) Constant(value=0)
    CustomJoint ankle_l: socket_parent_frame=tibia_l_offset socket_child_frame=talus_l_offset
      Coordinate ankle_angle_l: default_value=0 range=(-1.570796 1.570796) clamped=true
      PhysicalOffsetFrame tibia_l_offset: socket_parent=/bodyset/tibia_l translation=(0 -0.481118 0)
      PhysicalOffsetFrame talus_l_offset: socket_parent=/bodyset/talus_l translation=(0 0 0)
      SpatialTransform: axes_held_at_zero=(rotation2 rotation3 translation1 translation2 translation3)
        TransformAxis rotation1: coordinates=ankle_angle_l axis=(0.1050135 0.1740224 0.9791263)
            LinearFunction(coefficients=1 0)
    CustomJoint subtalar_l: socket_parent_frame=talus_l_offset socket_child_frame=calcn_l_offset
      Coordinate subtalar_angle_l: default_value=0 range=(-1.570796 1.570796) clamped=true
      PhysicalOffsetFrame talus_l_offset: socket_parent=/bodyset/talus_l
          translation=(-0.0406989 -0.0368078 -0.00694917)
      PhysicalOffsetFrame calcn_l_offset: socket_parent=/bodyset/calcn_l translation=(0 0 0)
      SpatialTransform: axes_held_at_zero=(rotation2 rotation3 translation1 translation2 translation3)
        TransformAxis rotation1: coordinates=subtalar_angle_l axis=(-0.7871796 -0.6047475 -0.1209495)
            LinearFunction(coefficients=1 0)
    CustomJoint mtp_l: socket_parent_frame=calcn_l_offset socket_child_frame=toes_l_offset
      Coordinate mtp_angle_l: default_value=0 range=(-1.570796 1.570796) clamped=true
      PhysicalOffsetFrame calcn_l_offset: socket_parent=/bodyset/calcn_l translation=(0.14921 -0.00175484 -0.000947614)
      PhysicalOffsetFrame toes_l_offset: socket_parent=/bodyset/toes_l translation=(0 0 0)
      SpatialTransform: axes_held_at_zero=(rotation2 rotation3 translation1 translation2 translation3)
        TransformAxis rotation1: coordinates=mtp_angle_l axis=(0.5809544 0 0.8139361) LinearFunction(coefficients=1 0)
    CantileverFreeBeamJoint lumbar: socket_parent_frame=lumbar_spine_parent_frame
        socket_child_frame=lumbar_spine_child_frame beam_length=0.175
      Coordinate lumbar_bending: default_value=0 range=(-0.5235988 0.5235988) clamped=true
      Coordinate lumbar_extension: default_value=-0.6414085 range=(-1.182461 0.4930555) clamped=true
      Coordinate lumbar_rotation: default_value=0 range=(-0.2617994 0.2617994) clamped=true
      PhysicalOffsetFrame lumbar_spine_parent_frame: socket_parent=/bodyset/pelvis translation=(-0.09 0.07236 0)
          orientation=(-1.570796 0.25 0) [radians]
      PhysicalOffsetFrame lumbar_spine_child_frame: socket_parent=/bodyset/lumbar_spine translation=(0 0 0)
          orientation=(-1.570796 0 0)
    CantileverFreeBeamJoint thorax: socket_parent_frame=thoracic_spine_parent_frame
        socket_child_frame=thoracic_spine_child_frame beam_length=0.275
      Coordinate thorax_bending: default_value=0 range=(-0.5235988 0.5235988) clamped=true
      Coordinate thorax_extension: default_value=0.6326819 range=(0.2487094 1.086467) clamped=true
      Coordinate thorax_rotation: default_value=0 range=(-0.8203047 0.8203047) clamped=true
      PhysicalOffsetFrame thoracic_spine_parent_frame: socket_parent=/bodyset/lumbar_spine translation=(0 0 0)
          orientation=(-1.570796 0 0)
      PhysicalOffsetFrame thoracic_spine_child_frame: socket_parent=/bodyset/thorax translation=(-0.0275 0.0567777 0)
          orientation=(-1.570796 0.25 0)
    CantileverFreeBeamJoint cervical: socket_parent_frame=cervical_spine_parent_frame
        socket_child_frame=cervical_spine_child_frame beam_length=0.075
      Coordinate cervical_bending: default_value=0 range=(-0.8552113 0.8552113) clamped=true
      Coordinate cervical_extension: default_value=-0.2487094 range=(-1.348267 0.8683013) clamped=true
      Coordinate cervical_rotation: default_value=0 range=(-1.48353 1.48353) clamped=true
      PhysicalOffsetFrame cervical_spine_parent_frame: socket_parent=/bodyset/thorax translation=(-0.0275 0.0567777 0)
          orientation=(-1.570796 0.25 0)
      PhysicalOffsetFrame cervical_spine_child_frame: socket_parent=/bodyset/head translation=(0 0 0)
          orientation=(-1.570796 0 0)
    WeldJoint sternoclavicular_r: socket_parent_frame=sternoclavicular_r_parent_frame
        socket_child_frame=sternoclavicular_r_child_frame
      PhysicalOffsetFrame sternoclavicular_r_parent_frame: socket_parent=/bodyset/thorax
          translation=(0.00632 0.006902973 0.02739975)
      PhysicalOffsetFrame sternoclavicular_r_child_frame: socket_parent=/bodyset/clavicle_r translation=(0 0 0)
    WeldJoint sternoclavicular_l: socket_parent_frame=sternoclavicular_l_parent_frame
        socket_child_frame=sternoclavicular_l_child_frame
      PhysicalOffsetFrame sternoclavicular_l_parent_frame: socket_parent=/bodyset/thorax
          translation=(0.00632 0.006902973 -0.02739975)
      PhysicalOffsetFrame sternoclavicular_l_child_frame: socket_parent=/bodyset/clavicle_l translation=(0 0 0)
    WeldJoint scapulothoracic_r: socket_parent_frame=/bodyset/thorax socket_child_frame=scapulothoracic_r_weld_frame
      PhysicalOffsetFrame scapulothoracic_r_weld_frame: socket_parent=/bodyset/scapula_r
          translation=(0.0654452 -0.05979021 -0.1569855) orientation=(-0.291944 -0.284971 -0.12239)
    WeldJoint scapulothoracic_l: socket_parent_frame=/bodyset/thorax socket_child_frame=scapulothoracic_l_weld_frame
      PhysicalOffsetFrame scapulothoracic_l_weld_frame: socket_parent=/bodyset/scapula_l
          translation=(0.0654452 -0.05979021 0.1569855) orientation=(0.291944 0.284971 -0.12239)
    CustomJoint glenohumeral_r: socket_parent_frame=glenohumeral_r_parent_frame socket_child_frame=/bodyset/humerus_r
      Coordinate shoulder_flexion_r: default_value=0 range=(-2 2) clamped=true
      Coordinate shoulder_abduction_r: default_value=0 range=(-0.5235988 2.513274) clamped=true
      Coordinate shoulder_rotation_r: default_value=0 range=(-0.5235988 0.5235988) clamped=true
      PhysicalOffsetFrame glenohumeral_r_parent_frame: socket_parent=/bodyset/scapula_r
          translation=(-0.00955 -0.0338674 0.0096705) orientation=(-0.25 0 -0.125)
      SpatialTransform: axes_held_at_zero=(translation1 translation2 translation3)
        TransformAxis rotation1: coordinates=shoulder_flexion_r axis=(0 0 1) LinearFunction(coefficients=1 0)
        TransformAxis rotation2: coordinates=shoulder_abduction_r axis=(1 0 0) LinearFunction(coefficients=-1 0)
        TransformAxis rotation3: coordinates=shoulder_rotation_r axis=(0 1 0) LinearFunction(coefficients=1 0)
    CustomJoint glenohumeral_l: socket_parent_frame=glenohumeral_l_parent_frame socket_child_frame=/bodyset/humerus_l
      Coordinate shoulder_flexion_l: default_value=0 range=(-2 2) clamped=true
      Coordinate shoulder_abduction_l: default_value=0 range=(-0.5235988 2.513274) clamped=true
      Coordinate shoulder_rotation_l: default_value=0 range=(-0.5235988 0.5235988) clamped=true
      PhysicalOffsetFrame glenohumeral_l_parent_frame: socket_parent=/bodyset/scapula_l
          translation=(-0.00955 -0.0338674 -0.0096705) orientation=(0.25 0 -0.125)
      SpatialTransform: axes_held_at_zero=(translation1 translation2 translation3)
        TransformAxis rotation1: coordinates=shoulder_flexion_l axis=(0 0 1) LinearFunction(coefficients=1 0)
        TransformAxis rotation2: coordinates=shoulder_abduction_l axis=(1 0 0) LinearFunction(coefficients=1 0)
        TransformAxis rotation3: coordinates=shoulder_rotation_l axis=(0 1 0) LinearFunction(coefficients=-1 0)
    PinJoint elbow_r: socket_parent_frame=elbow_r_parent_frame socket_child_frame=elbow_r_child_frame
      Coordinate elbow_flex_r: default_value=0 range=(0 2.617994) clamped=true
      PhysicalOffsetFrame elbow_r_parent_frame: socket_parent=/bodyset/humerus_r
          translation=(0.013144 -0.3421821 -0.009595) orientation=(-0.0228627 0.228018 0.0051689)
      PhysicalOffsetFrame elbow_r_child_frame: socket_parent=/bodyset/ulna_r translation=(0 0 0)
          orientation=(-0.0228627 0.228018 0.0051689)
    PinJoint elbow_l: socket_parent_frame=elbow_l_parent_frame socket_child_frame=elbow_l_child_frame
      Coordinate elbow_flex_l: default_value=0 range=(0 2.617994) clamped=true
      PhysicalOffsetFrame elbow_l_parent_frame: socket_parent=/bodyset/humerus_l
          translation=(0.013144 -0.3421821 0.009595) orientation=(0.0228627 -0.228018 0.0051689)
      PhysicalOffsetFrame elbow_l_child_frame: socket_parent=/bodyset/ulna_l translation=(0 0 0)
          orientation=(0.0228627 -0.228018 0.0051689)
    PinJoint radioulnar_r: socket_parent_frame=radioulnar_r_parent_frame socket_child_frame=radioulnar_r_child_frame
      Coordinate pro_sup_r: default_value=0 range=(0 1.570796) clamped=true
      PhysicalOffsetFrame radioulnar_r_parent_frame: socket_parent=/bodyset/ulna_r
          translation=(-0.006727 -0.01388497 0.026083) orientation=(-1.56884 0.056428 1.53614)
      PhysicalOffsetFrame radioulnar_r_child_frame: socket_parent=/bodyset/radius_r translation=(0 0 0)
          orientation=(-1.56884 0.056428 1.53614)
    PinJoint radioulnar_l: socket_parent_frame=radioulnar_l_parent_frame socket_child_frame=radioulnar_l_child_frame
      Coordinate pro_sup_l: default_value=0 range=(0 1.570796) clamped=true
      PhysicalOffsetFrame radioulnar_l_parent_frame: socket_parent=/bodyset/ulna_l
          translation=(-0.006727 -0.01388497 -0.026083) orientation=(1.56884 -0.056428 1.53614)
      PhysicalOffsetFrame radioulnar_l_child_frame: socket_parent=/bodyset/radius_l translation=(0 0 0)
          orientation=(1.56884 -0.056428 1.53614)
    WeldJoint radius_hand_r: socket_parent_frame=radius_hand_r_parent_frame
        socket_child_frame=radius_hand_r_child_frame
      PhysicalOffsetFrame radius_hand_r_parent_frame: socket_parent=/bodyset/radius_r
          translation=(-0.008797 -0.2517603 0.01361) orientation=(-1.5708 0 -1.5708)
      PhysicalOffsetFrame radius_hand_r_child_frame: socket_parent=/bodyset/hand_r translation=(0 0 0)
          orientation=(-1.5708 0 -1.5708)
    WeldJoint radius_hand_l: socket_parent_frame=radius_hand_l_parent_frame
        socket_child_frame=radius_hand_l_child_frame
      PhysicalOffsetFrame radius_hand_l_parent_frame: socket_parent=/bodyset/radius_l
          translation=(-0.008797 -0.2517603 -0.01361) orientation=(1.5708 0 1.5708)
      PhysicalOffsetFrame radius_hand_l_child_frame: socket_parent=/bodyset/hand_l translation=(0 0 0)
          orientation=(1.5708 0 1.5708)
  ForceSet:
    Millard2012EquilibriumMuscle [values shared by the 96 below unless stated]: min_control=0.01 max_control=1
        fiber_damping=0.1
      ActiveForceLengthCurve: minimum_value=0
      ForceVelocityCurve: concentric_slope_at_vmax=0 concentric_slope_near_vmax=0.25 isometric_slope=5
          eccentric_slope_at_vmax=0 eccentric_slope_near_vmax=0.15 max_eccentric_velocity_force_multiplier=1.4
      FiberForceLengthCurve: strain_at_zero_force=0 strain_at_one_norm_force=0.7 stiffness_at_low_force=0.2
          stiffness_at_one_norm_force=2.857143 curviness=0.75
      TendonForceLengthCurve
    Millard2012EquilibriumMuscle trapezius_clav_r: max_isometric_force=201.6 optimal_fiber_length=0.1176415
        tendon_slack_length=0.02818386 pennation_angle_at_optimal=0 [radians] ignore_tendon_compliance=true
      Scholz2015GeometryPath path: algorithm=minimum_length
        path_elements:
          Scholz2015GeometryPathPoint path_point_0:
            PathPoint: head (-0.0372 -0.01075788 0.002632525)
          Scholz2015GeometryPathPoint path_point_1:
            PathPoint: clavicle_r (-0.0301 0.0249 0.0977795)
    Millard2012EquilibriumMuscle levator_scapulae_r: max_isometric_force=280 optimal_fiber_length=0.1579889
        tendon_slack_length=0.01902275 pennation_angle_at_optimal=0 ignore_tendon_compliance=true
      Scholz2015GeometryPath path: algorithm=minimum_length
        path_elements:
          Scholz2015GeometryPathPoint path_point_0:
            PathPoint: head (-0.00967 -0.01016022 0.03341695)
          Scholz2015GeometryPathObstacle obstacle_0: socket_contact_geometry=/bodyset/thorax/thorax_r_obstacle
              contact_hint=(-0.035 0.225 0.04)
          Scholz2015GeometryPathPoint path_point_1:
            PathPoint: scapula_r (-0.078 -0.00806841 -0.1105661)
    Millard2012EquilibriumMuscle coracobrachialis_r: max_isometric_force=648.2 optimal_fiber_length=0.08121961
        tendon_slack_length=0.1236726 pennation_angle_at_optimal=0
      Scholz2015GeometryPath path: algorithm=minimum_length
        path_elements:
          Scholz2015GeometryPathPoint path_point_0:
            PathPoint: scapula_r (0.0083 -0.04223464 -0.03019345)
          Scholz2015GeometryPathPoint path_point_1:
            PathPoint: humerus_r (-0.00231 -0.1733185 -0.00933)
    Millard2012EquilibriumMuscle deltoideus_ant_r: max_isometric_force=707.7 optimal_fiber_length=0.10544
        tendon_slack_length=0.1132699 pennation_angle_at_optimal=0.08726646
      Scholz2015GeometryPath path: algorithm=minimum_length
        path_elements:
          Scholz2015GeometryPathPoint path_point_0:
            PathPoint: clavicle_r (-0.0228 0.0195 0.09036545)
          Scholz2015GeometryPathPoint path_point_1:
            PathPoint: scapula_r (0.0196 -0.00657426 0.0111748)
          Scholz2015GeometryPathPoint path_point_2:
            PathPoint: humerus_r (0.00664 -0.1312439 0.00115)
    Millard2012EquilibriumMuscle deltoideus_med_r: max_isometric_force=2597.8 optimal_fiber_length=0.0849428
        tendon_slack_length=0.07267833 pennation_angle_at_optimal=0.08726646 ignore_tendon_compliance=true
      Scholz2015GeometryPath path: algorithm=minimum_length
        path_elements:
          Scholz2015GeometryPathPoint path_point_0:
            PathPoint: scapula_r (-0.016 0.002022083 0.0083811)
          Scholz2015GeometryPathPoint path_point_1:
            PathPoint: scapula_r (-0.0051 -0.00667387 0.0333095)
          Scholz2015GeometryPathPoint path_point_2:
            PathPoint: humerus_r (-0.0043 -0.1201277 0.00385)
    Millard2012EquilibriumMuscle deltoideus_post_r: max_isometric_force=1324.4 optimal_fiber_length=0.107105
        tendon_slack_length=0.08577426 pennation_angle_at_optimal=0.08726646 ignore_tendon_compliance=true
      Scholz2015GeometryPath path: algorithm=minimum_length
        path_elements:
          Scholz2015GeometryPathPoint path_point_0:
            PathPoint: scapula_r (-0.0577 -0.00687309 -0.0292264)
          Scholz2015GeometryPathPoint path_point_1:
            PathPoint: scapula_r (-0.055 -0.03227364 0.007897575)
          Scholz2015GeometryPathPoint path_point_2:
            PathPoint: humerus_r (-0.0048 -0.1030349 0.00624)
    Millard2012EquilibriumMuscle latissimus_sup_r: max_isometric_force=201.6 optimal_fiber_length=0.2184284
        tendon_slack_length=0.08389143 pennation_angle_at_optimal=0 ignore_tendon_compliance=true
      Scholz2015GeometryPath path: algorithm=minimum_length
        path_elements:
          Scholz2015GeometryPathPoint path_point_0:
            PathPoint: thorax (-0.10088 -0.1161453 0.001837395)
          Scholz2015GeometryPathObstacle obstacle_0: socket_contact_geometry=/bodyset/thorax/thorax_r_obstacle
              contact_hint=(-0.05 0.055 0.0785)
          Scholz2015GeometryPathPoint path_point_1:
            PathPoint: humerus_r (0.01 -0.0298825 -0.003)
    Millard2012EquilibriumMuscle latissimus_med_r: max_isometric_force=315 optimal_fiber_length=0.2646889
        tendon_slack_length=0.09417582 pennation_angle_at_optimal=0 ignore_tendon_compliance=true
      Scholz2015GeometryPath path: algorithm=minimum_length
        path_elements:
          Scholz2015GeometryPathPoint path_point_0:
            PathPoint: lumbar_spine (-0.045 -0.0069727 0.017192)
          Scholz2015GeometryPathObstacle obstacle_0: socket_contact_geometry=/bodyset/thorax/thorax_r_obstacle
              contact_hint=(-0.042 0.009 0.085)
          Scholz2015GeometryPathPoint path_point_1:
            PathPoint: humerus_r (0.001 -0.0394449 -0.002)
    Millard2012EquilibriumMuscle latissimus_inf_r: max_isometric_force=270.2 optimal_fiber_length=0.3036902
        tendon_slack_length=0.06159098 pennation_angle_at_optimal=0 ignore_tendon_compliance=true
      Scholz2015GeometryPath path: algorithm=minimum_length
        path_elements:
          Scholz2015GeometryPathPoint path_point_0:
            PathPoint: pelvis (-0.115 0.074772 0.0591825)
          Scholz2015GeometryPathPoint path_point_1:
            PathPoint: thorax (-0.0627 -0.2538063 0.0973497)
          Scholz2015GeometryPathObstacle obstacle_0: socket_contact_geometry=/bodyset/thorax/thorax_r_obstacle
              contact_hint=(-0.025 -0.03 0.095)
          Scholz2015GeometryPathPoint path_point_2:
            PathPoint: humerus_r (0.003 -0.0286872 -0.003)
    Millard2012EquilibriumMuscle pectoralis_major_sup_r: max_isometric_force=408.8 optimal_fiber_length=0.1162699
        tendon_slack_length=0.01492006 pennation_angle_at_optimal=0 ignore_tendon_compliance=true
      Scholz2015GeometryPath path: algorithm=minimum_length
        path_elements:
          Scholz2015GeometryPathPoint path_point_0:
            PathPoint: clavicle_r (0.0025 0.005 0.053725)
          Scholz2015GeometryPathObstacle obstacle_0: socket_contact_geometry=/bodyset/thorax/pectoralis_r_obstacle
              contact_hint=(0.065 0.107 0.074)
          Scholz2015GeometryPathPoint path_point_1:
            PathPoint: humerus_r (0.023 -0.0179295 0.0025)
    Millard2012EquilibriumMuscle pectoralis_major_med_r: max_isometric_force=683.2 optimal_fiber_length=0.1588777
        tendon_slack_length=0.02753881 pennation_angle_at_optimal=0 ignore_tendon_compliance=true
      Scholz2015GeometryPath path: algorithm=minimum_length
        path_elements:
          Scholz2015GeometryPathPoint path_point_0:
            PathPoint: thorax (0.0195 -0.0378518 0.0139685)
          Scholz2015GeometryPathObstacle obstacle_0: socket_contact_geometry=/bodyset/thorax/pectoralis_r_obstacle
              contact_hint=(0.08 0.1 0.037)
          Scholz2015GeometryPathPoint path_point_1:
            PathPoint: humerus_r (0.02 -0.03131686 0.0018)
    Millard2012EquilibriumMuscle pectoralis_major_inf_r: max_isometric_force=571.2 optimal_fiber_length=0.1860371
        tendon_slack_length=0.04371364 pennation_angle_at_optimal=0 ignore_tendon_compliance=true
      Scholz2015GeometryPath path: algorithm=minimum_length
        path_elements:
          Scholz2015GeometryPathPoint path_point_0:
            PathPoint: thorax (0.0532 -0.1152488 0.02654015)
          Scholz2015GeometryPathObstacle obstacle_0: socket_contact_geometry=/bodyset/thorax/pectoralis_r_obstacle
              contact_hint=(0.082 0.05 0.039)
          Scholz2015GeometryPathPoint path_point_1:
            PathPoint: humerus_r (0.02 -0.035859 0.005)
    Millard2012EquilibriumMuscle teres_major_r: max_isometric_force=851.2 optimal_fiber_length=0.1434685
        tendon_slack_length=0.006105043 pennation_angle_at_optimal=0 ignore_tendon_compliance=true
      Scholz2015GeometryPath path: algorithm=minimum_length
        path_elements:
          Scholz2015GeometryPathPoint path_point_0:
            PathPoint: scapula_r (-0.1044 -0.1169421 -0.07747145)
          Scholz2015GeometryPathPoint path_point_1:
            PathPoint: humerus_r (0.0043 -0.0466167 -0.0017)
    Millard2012EquilibriumMuscle teres_minor_r: max_isometric_force=695.8 optimal_fiber_length=0.05644411
        tendon_slack_length=0.05233909 pennation_angle_at_optimal=0 ignore_tendon_compliance=true
      Scholz2015GeometryPath path: algorithm=minimum_length
        path_elements:
          Scholz2015GeometryPathPoint path_point_0:
            PathPoint: scapula_r (-0.0844 -0.06584221 -0.04545135)
          Scholz2015GeometryPathPoint path_point_1:
            PathPoint: humerus_r (-0.0159 -0.01123582 0.0109)
    Millard2012EquilibriumMuscle infraspinatus_inf_r: max_isometric_force=1037.4 optimal_fiber_length=0.07053755
        tendon_slack_length=0.08752075 pennation_angle_at_optimal=0
      Scholz2015GeometryPath path: algorithm=minimum_length
        path_elements:
          Scholz2015GeometryPathPoint path_point_0:
            PathPoint: scapula_r (-0.0991 -0.08058449 -0.08735685)
          Scholz2015GeometryPathPoint path_point_1:
            PathPoint: scapula_r (-0.064 -0.049805 -0.034384)
          Scholz2015GeometryPathPoint path_point_2:
            PathPoint: humerus_r (-0.025 0.011953 0.005)
          Scholz2015GeometryPathPoint path_point_3:
            PathPoint: humerus_r (-0.0135 0.0047812 0.0125)
    Millard2012EquilibriumMuscle infraspinatus_sup_r: max_isometric_force=967.4 optimal_fiber_length=0.07355552
        tendon_slack_length=0.0526902 pennation_angle_at_optimal=0 ignore_tendon_compliance=true
      Scholz2015GeometryPath path: algorithm=minimum_length
        path_elements:
          Scholz2015GeometryPathPoint path_point_0:
            PathPoint: scapula_r (-0.0834 -0.03217403 -0.09337405)
          Scholz2015GeometryPathPoint path_point_1:
            PathPoint: scapula_r (-0.054 -0.0348635 -0.0483525)
          Scholz2015GeometryPathPoint path_point_2:
            PathPoint: humerus_r (-0.025 0.011953 0.005)
          Scholz2015GeometryPathPoint path_point_3:
            PathPoint: humerus_r (-0.0135 0.0047812 0.0125)
    Millard2012EquilibriumMuscle subscapularis_sup_r: max_isometric_force=540.4 optimal_fiber_length=0.07464067
        tendon_slack_length=0.06514496 pennation_angle_at_optimal=0.08726646 ignore_tendon_compliance=true
      Scholz2015GeometryPath path: algorithm=minimum_length
        path_elements:
          Scholz2015GeometryPathPoint path_point_0:
            PathPoint: scapula_r (-0.0788 -0.03117793 -0.09702735)
          Scholz2015GeometryPathPoint path_point_1:
            PathPoint: scapula_r (-0.035 -0.0368557 -0.045129)
          Scholz2015GeometryPathPoint path_point_2:
            PathPoint: humerus_r (0.0074 0.0059765 -0.022)
          Scholz2015GeometryPathPoint path_point_3:
            PathPoint: humerus_r (0.0225 -0.0095624 -0.01)
    Millard2012EquilibriumMuscle subscapularis_med_r: max_isometric_force=609 optimal_fiber_length=0.0770044
        tendon_slack_length=0.0569253 pennation_angle_at_optimal=0.08726646 ignore_tendon_compliance=true
      Scholz2015GeometryPath path: algorithm=minimum_length
        path_elements:
          Scholz2015GeometryPathPoint path_point_0:
            PathPoint: scapula_r (-0.0836 -0.05468589 -0.08026515)
          Scholz2015GeometryPathPoint path_point_1:
            PathPoint: scapula_r (-0.035 -0.0438284 -0.0397565)
          Scholz2015GeometryPathPoint path_point_2:
            PathPoint: humerus_r (0.0074 0.0059765 -0.032)
          Scholz2015GeometryPathPoint path_point_3:
            PathPoint: humerus_r (0.0225 -0.0095624 -0.01)
    Millard2012EquilibriumMuscle subscapularis_inf_r: max_isometric_force=854 optimal_fiber_length=0.09082225
        tendon_slack_length=0.07432057 pennation_angle_at_optimal=0 ignore_tendon_compliance=true
      Scholz2015GeometryPath path: algorithm=minimum_length
        path_elements:
          Scholz2015GeometryPathPoint path_point_0:
            PathPoint: scapula_r (-0.0951 -0.09731897 -0.0917623)
          Scholz2015GeometryPathPoint path_point_1:
            PathPoint: scapula_r (-0.035 -0.0448245 -0.0483525)
          Scholz2015GeometryPathPoint path_point_2:
            PathPoint: humerus_r (0.0074 0.0059765 -0.035)
          Scholz2015GeometryPathPoint path_point_3:
            PathPoint: humerus_r (0.0225 -0.0095624 -0.01)
    Millard2012EquilibriumMuscle supraspinatus_post_r: max_isometric_force=326.2 optimal_fiber_length=0.06158489
        tendon_slack_length=0.02605114 pennation_angle_at_optimal=0 ignore_tendon_compliance=true
      Scholz2015GeometryPath path: algorithm=minimum_length
        path_elements:
          Scholz2015GeometryPathPoint path_point_0:
            PathPoint: scapula_r (-0.0605 -0.00139454 -0.05318775)
          Scholz2015GeometryPathPoint path_point_1:
            PathPoint: humerus_r (0 0.0370543 0.006)
          Scholz2015GeometryPathPoint path_point_2:
            PathPoint: humerus_r (0.014 0.0203201 0.021)
    Millard2012EquilibriumMuscle supraspinatus_ant_r: max_isometric_force=543.2 optimal_fiber_length=0.05840915
        tendon_slack_length=0.03268382 pennation_angle_at_optimal=0 ignore_tendon_compliance=true
      Scholz2015GeometryPath path: algorithm=minimum_length
        path_elements:
          Scholz2015GeometryPathPoint path_point_0:
            PathPoint: scapula_r (-0.049 0.00139454 -0.0743554)
          Scholz2015GeometryPathPoint path_point_1:
            PathPoint: humerus_r (0.007 0.0394449 -0.004)
          Scholz2015GeometryPathPoint path_point_2:
            PathPoint: humerus_r (0.0178 0.02103728 0.0096)
    Millard2012EquilibriumMuscle triceps_long_r: max_isometric_force=1580.6 optimal_fiber_length=0.1170103
        tendon_slack_length=0.2912579 pennation_angle_at_optimal=0.174533
      Scholz2015GeometryPath path: algorithm=minimum_length
        path_elements:
          Scholz2015GeometryPathPoint path_point_0:
            PathPoint: scapula_r (-0.0421 -0.05169759 -0.01386105)
          Scholz2015GeometryPathObstacle obstacle_0: socket_contact_geometry=/bodyset/humerus_r/triceps_r_obstacle
              contact_hint=(-0.01 0.003 -0.055)
          Scholz2015GeometryPathPoint path_point_1:
            PathPoint: ulna_r (-0.031 0.0053375 0.001)
    Millard2012EquilibriumMuscle biceps_long_r: max_isometric_force=485.8 optimal_fiber_length=0.1633802
        tendon_slack_length=0.2952571 pennation_angle_at_optimal=0
      Scholz2015GeometryPath path: algorithm=minimum_length
        path_elements:
          Scholz2015GeometryPathPoint path_point_0:
            PathPoint: scapula_r (-0.0226 -0.01623643 -0.01944845)
          Scholz2015GeometryPathPoint path_point_1:
            PathPoint: humerus_r (0.012 0.0107577 0.0135)
          Scholz2015GeometryPathObstacle obstacle_0: socket_contact_geometry=/bodyset/humerus_r/biceps_r_obstacle
              contact_hint=(0.014 0.007 0.043)
          Scholz2015GeometryPathPoint path_point_2:
            PathPoint: radius_r (-0.0009 -0.04697 -0.0095)
    Millard2012EquilibriumMuscle biceps_brevis_r: max_isometric_force=693 optimal_fiber_length=0.1469053
        tendon_slack_length=0.2463918 pennation_angle_at_optimal=0
      Scholz2015GeometryPath path: algorithm=minimum_length
        path_elements:
          Scholz2015GeometryPathPoint path_point_0:
            PathPoint: scapula_r (0.0095 -0.03805102 -0.0260029)
          Scholz2015GeometryPathObstacle obstacle_0: socket_contact_geometry=/bodyset/humerus_r/biceps_r_obstacle
              contact_hint=(0.014 -0.018 0.043)
          Scholz2015GeometryPathPoint path_point_1:
            PathPoint: radius_r (-0.0002 -0.04729025 -0.0099)
    Millard2012EquilibriumMuscle rectus_abdominis_r: max_isometric_force=705.9 optimal_fiber_length=0.2993743
        tendon_slack_length=0.08142743 pennation_angle_at_optimal=0 ignore_tendon_compliance=true
      Scholz2015GeometryPath path: algorithm=minimum_length
        path_elements:
          Scholz2015GeometryPathPoint path_point_0:
            PathPoint: pelvis (-0.0275 -0.07236 0.01138125)
          Scholz2015GeometryPathPoint path_point_1:
            PathPoint: pelvis (-0.002 0.067536 0.0318675)
          Scholz2015GeometryPathPoint path_point_2:
            PathPoint: lumbar_spine (0.082 -0.109571 0.0376075)
          Scholz2015GeometryPathPoint path_point_3:
            PathPoint: thorax (0.083 -0.2241225 0.0376075)
          Scholz2015GeometryPathPoint path_point_4:
            PathPoint: thorax (0.072 -0.169337 0.0376075)
    Millard2012EquilibriumMuscle trapezius_clav_l: max_isometric_force=201.6 optimal_fiber_length=0.1176415
        tendon_slack_length=0.02818386 pennation_angle_at_optimal=0 ignore_tendon_compliance=true
      Scholz2015GeometryPath path: algorithm=minimum_length
        path_elements:
          Scholz2015GeometryPathPoint path_point_0:
            PathPoint: head (-0.0372 -0.01075788 -0.002632525)
          Scholz2015GeometryPathPoint path_point_1:
            PathPoint: clavicle_l (-0.0301 0.0249 -0.0977795)
    Millard2012EquilibriumMuscle levator_scapulae_l: max_isometric_force=280 optimal_fiber_length=0.1579889
        tendon_slack_length=0.01902275 pennation_angle_at_optimal=0 ignore_tendon_compliance=true
      Scholz2015GeometryPath path: algorithm=minimum_length
        path_elements:
          Scholz2015GeometryPathPoint path_point_0:
            PathPoint: head (-0.00967 -0.01016022 -0.03341695)
          Scholz2015GeometryPathObstacle obstacle_0: socket_contact_geometry=/bodyset/thorax/thorax_l_obstacle
              contact_hint=(-0.035 0.225 -0.04)
          Scholz2015GeometryPathPoint path_point_1:
            PathPoint: scapula_l (-0.078 -0.00806841 0.1105661)
    Millard2012EquilibriumMuscle coracobrachialis_l: max_isometric_force=648.2 optimal_fiber_length=0.08121961
        tendon_slack_length=0.1236726 pennation_angle_at_optimal=0
      Scholz2015GeometryPath path: algorithm=minimum_length
        path_elements:
          Scholz2015GeometryPathPoint path_point_0:
            PathPoint: scapula_l (0.0083 -0.04223464 0.03019345)
          Scholz2015GeometryPathPoint path_point_1:
            PathPoint: humerus_l (-0.00231 -0.1733185 0.00933)
    Millard2012EquilibriumMuscle deltoideus_ant_l: max_isometric_force=707.7 optimal_fiber_length=0.10544
        tendon_slack_length=0.1132699 pennation_angle_at_optimal=0.08726646
      Scholz2015GeometryPath path: algorithm=minimum_length
        path_elements:
          Scholz2015GeometryPathPoint path_point_0:
            PathPoint: clavicle_l (-0.0228 0.0195 -0.09036545)
          Scholz2015GeometryPathPoint path_point_1:
            PathPoint: scapula_l (0.0196 -0.00657426 -0.0111748)
          Scholz2015GeometryPathPoint path_point_2:
            PathPoint: humerus_l (0.00664 -0.1312439 -0.00115)
    Millard2012EquilibriumMuscle deltoideus_med_l: max_isometric_force=2597.8 optimal_fiber_length=0.0849428
        tendon_slack_length=0.07267833 pennation_angle_at_optimal=0.08726646 ignore_tendon_compliance=true
      Scholz2015GeometryPath path: algorithm=minimum_length
        path_elements:
          Scholz2015GeometryPathPoint path_point_0:
            PathPoint: scapula_l (-0.016 0.002022083 -0.0083811)
          Scholz2015GeometryPathPoint path_point_1:
            PathPoint: scapula_l (-0.0051 -0.00667387 -0.0333095)
          Scholz2015GeometryPathPoint path_point_2:
            PathPoint: humerus_l (-0.0043 -0.1201277 -0.00385)
    Millard2012EquilibriumMuscle deltoideus_post_l: max_isometric_force=1324.4 optimal_fiber_length=0.107105
        tendon_slack_length=0.08577426 pennation_angle_at_optimal=0.08726646 ignore_tendon_compliance=true
      Scholz2015GeometryPath path: algorithm=minimum_length
        path_elements:
          Scholz2015GeometryPathPoint path_point_0:
            PathPoint: scapula_l (-0.0577 -0.00687309 0.0292264)
          Scholz2015GeometryPathPoint path_point_1:
            PathPoint: scapula_l (-0.055 -0.03227364 -0.007897575)
          Scholz2015GeometryPathPoint path_point_2:
            PathPoint: humerus_l (-0.0048 -0.1030349 -0.00624)
    Millard2012EquilibriumMuscle latissimus_sup_l: max_isometric_force=201.6 optimal_fiber_length=0.2184284
        tendon_slack_length=0.08389143 pennation_angle_at_optimal=0 ignore_tendon_compliance=true
      Scholz2015GeometryPath path: algorithm=minimum_length
        path_elements:
          Scholz2015GeometryPathPoint path_point_0:
            PathPoint: thorax (-0.10088 -0.1161453 -0.001837395)
          Scholz2015GeometryPathObstacle obstacle_0: socket_contact_geometry=/bodyset/thorax/thorax_l_obstacle
              contact_hint=(-0.05 0.055 -0.0785)
          Scholz2015GeometryPathPoint path_point_1:
            PathPoint: humerus_l (0.01 -0.0298825 0.003)
    Millard2012EquilibriumMuscle latissimus_med_l: max_isometric_force=315 optimal_fiber_length=0.2646889
        tendon_slack_length=0.09417582 pennation_angle_at_optimal=0 ignore_tendon_compliance=true
      Scholz2015GeometryPath path: algorithm=minimum_length
        path_elements:
          Scholz2015GeometryPathPoint path_point_0:
            PathPoint: lumbar_spine (-0.045 -0.0069727 -0.017192)
          Scholz2015GeometryPathObstacle obstacle_0: socket_contact_geometry=/bodyset/thorax/thorax_l_obstacle
              contact_hint=(-0.042 0.009 -0.085)
          Scholz2015GeometryPathPoint path_point_1:
            PathPoint: humerus_l (0.001 -0.0394449 0.002)
    Millard2012EquilibriumMuscle latissimus_inf_l: max_isometric_force=270.2 optimal_fiber_length=0.3036902
        tendon_slack_length=0.06159098 pennation_angle_at_optimal=0 ignore_tendon_compliance=true
      Scholz2015GeometryPath path: algorithm=minimum_length
        path_elements:
          Scholz2015GeometryPathPoint path_point_0:
            PathPoint: pelvis (-0.115 0.074772 -0.0591825)
          Scholz2015GeometryPathPoint path_point_1:
            PathPoint: thorax (-0.0627 -0.2538063 -0.0973497)
          Scholz2015GeometryPathObstacle obstacle_0: socket_contact_geometry=/bodyset/thorax/thorax_l_obstacle
              contact_hint=(-0.025 -0.03 -0.095)
          Scholz2015GeometryPathPoint path_point_2:
            PathPoint: humerus_l (0.003 -0.0286872 0.003)
    Millard2012EquilibriumMuscle pectoralis_major_sup_l: max_isometric_force=408.8 optimal_fiber_length=0.1165395
        tendon_slack_length=0.01495465 pennation_angle_at_optimal=0 ignore_tendon_compliance=true
      Scholz2015GeometryPath path: algorithm=minimum_length
        path_elements:
          Scholz2015GeometryPathPoint path_point_0:
            PathPoint: clavicle_l (0.0025 0.005 -0.053725)
          Scholz2015GeometryPathObstacle obstacle_0: socket_contact_geometry=/bodyset/thorax/pectoralis_l_obstacle
              contact_hint=(0.065 0.107 -0.074)
          Scholz2015GeometryPathPoint path_point_1:
            PathPoint: humerus_l (0.023 -0.0179295 0.0025)
    Millard2012EquilibriumMuscle pectoralis_major_med_l: max_isometric_force=683.2 optimal_fiber_length=0.1588777
        tendon_slack_length=0.02753881 pennation_angle_at_optimal=0 ignore_tendon_compliance=true
      Scholz2015GeometryPath path: algorithm=minimum_length
        path_elements:
          Scholz2015GeometryPathPoint path_point_0:
            PathPoint: thorax (0.0195 -0.0378518 -0.0139685)
          Scholz2015GeometryPathObstacle obstacle_0: socket_contact_geometry=/bodyset/thorax/pectoralis_l_obstacle
              contact_hint=(0.08 0.1 -0.037)
          Scholz2015GeometryPathPoint path_point_1:
            PathPoint: humerus_l (0.02 -0.03131686 -0.0018)
    Millard2012EquilibriumMuscle pectoralis_major_inf_l: max_isometric_force=571.2 optimal_fiber_length=0.1860371
        tendon_slack_length=0.04371364 pennation_angle_at_optimal=0 ignore_tendon_compliance=true
      Scholz2015GeometryPath path: algorithm=minimum_length
        path_elements:
          Scholz2015GeometryPathPoint path_point_0:
            PathPoint: thorax (0.0532 -0.1152488 -0.02654015)
          Scholz2015GeometryPathObstacle obstacle_0: socket_contact_geometry=/bodyset/thorax/pectoralis_l_obstacle
              contact_hint=(0.082 0.05 -0.039)
          Scholz2015GeometryPathPoint path_point_1:
            PathPoint: humerus_l (0.02 -0.035859 -0.005)
    Millard2012EquilibriumMuscle teres_major_l: max_isometric_force=851.2 optimal_fiber_length=0.1434685
        tendon_slack_length=0.006105043 pennation_angle_at_optimal=0 ignore_tendon_compliance=true
      Scholz2015GeometryPath path: algorithm=minimum_length
        path_elements:
          Scholz2015GeometryPathPoint path_point_0:
            PathPoint: scapula_l (-0.1044 -0.1169421 0.07747145)
          Scholz2015GeometryPathPoint path_point_1:
            PathPoint: humerus_l (0.0043 -0.0466167 0.0017)
    Millard2012EquilibriumMuscle teres_minor_l: max_isometric_force=695.8 optimal_fiber_length=0.05644411
        tendon_slack_length=0.05233909 pennation_angle_at_optimal=0 ignore_tendon_compliance=true
      Scholz2015GeometryPath path: algorithm=minimum_length
        path_elements:
          Scholz2015GeometryPathPoint path_point_0:
            PathPoint: scapula_l (-0.0844 -0.06584221 0.04545135)
          Scholz2015GeometryPathPoint path_point_1:
            PathPoint: humerus_l (-0.0159 -0.01123582 -0.0109)
    Millard2012EquilibriumMuscle infraspinatus_inf_l: max_isometric_force=1037.4 optimal_fiber_length=0.07053755
        tendon_slack_length=0.08752075 pennation_angle_at_optimal=0
      Scholz2015GeometryPath path: algorithm=minimum_length
        path_elements:
          Scholz2015GeometryPathPoint path_point_0:
            PathPoint: scapula_l (-0.0991 -0.08058449 0.08735685)
          Scholz2015GeometryPathPoint path_point_1:
            PathPoint: scapula_l (-0.064 -0.049805 0.034384)
          Scholz2015GeometryPathPoint path_point_2:
            PathPoint: humerus_l (-0.025 0.011953 -0.005)
          Scholz2015GeometryPathPoint path_point_3:
            PathPoint: humerus_l (-0.0135 0.0047812 -0.0125)
    Millard2012EquilibriumMuscle infraspinatus_sup_l: max_isometric_force=967.4 optimal_fiber_length=0.07355552
        tendon_slack_length=0.0526902 pennation_angle_at_optimal=0 ignore_tendon_compliance=true
      Scholz2015GeometryPath path: algorithm=minimum_length
        path_elements:
          Scholz2015GeometryPathPoint path_point_0:
            PathPoint: scapula_l (-0.0834 -0.03217403 0.09337405)
          Scholz2015GeometryPathPoint path_point_1:
            PathPoint: scapula_l (-0.054 -0.0348635 0.0483525)
          Scholz2015GeometryPathPoint path_point_2:
            PathPoint: humerus_l (-0.025 0.011953 -0.005)
          Scholz2015GeometryPathPoint path_point_3:
            PathPoint: humerus_l (-0.0135 0.0047812 -0.0125)
    Millard2012EquilibriumMuscle subscapularis_sup_l: max_isometric_force=540.4 optimal_fiber_length=0.07464067
        tendon_slack_length=0.06514496 pennation_angle_at_optimal=0.08726646 ignore_tendon_compliance=true
      Scholz2015GeometryPath path: algorithm=minimum_length
        path_elements:
          Scholz2015GeometryPathPoint path_point_0:
            PathPoint: scapula_l (-0.0788 -0.03117793 0.09702735)
          Scholz2015GeometryPathPoint path_point_1:
            PathPoint: scapula_l (-0.035 -0.0368557 0.045129)
          Scholz2015GeometryPathPoint path_point_2:
            PathPoint: humerus_l (0.0074 0.0059765 0.022)
          Scholz2015GeometryPathPoint path_point_3:
            PathPoint: humerus_l (0.0225 -0.0095624 0.01)
    Millard2012EquilibriumMuscle subscapularis_med_l: max_isometric_force=609 optimal_fiber_length=0.0770044
        tendon_slack_length=0.0569253 pennation_angle_at_optimal=0.08726646 ignore_tendon_compliance=true
      Scholz2015GeometryPath path: algorithm=minimum_length
        path_elements:
          Scholz2015GeometryPathPoint path_point_0:
            PathPoint: scapula_l (-0.0836 -0.05468589 0.08026515)
          Scholz2015GeometryPathPoint path_point_1:
            PathPoint: scapula_l (-0.035 -0.0438284 0.0397565)
          Scholz2015GeometryPathPoint path_point_2:
            PathPoint: humerus_l (0.0074 0.0059765 0.032)
          Scholz2015GeometryPathPoint path_point_3:
            PathPoint: humerus_l (0.0225 -0.0095624 0.01)
    Millard2012EquilibriumMuscle subscapularis_inf_l: max_isometric_force=854 optimal_fiber_length=0.09082225
        tendon_slack_length=0.07432057 pennation_angle_at_optimal=0 ignore_tendon_compliance=true
      Scholz2015GeometryPath path: algorithm=minimum_length
        path_elements:
          Scholz2015GeometryPathPoint path_point_0:
            PathPoint: scapula_l (-0.0951 -0.09731897 0.0917623)
          Scholz2015GeometryPathPoint path_point_1:
            PathPoint: scapula_l (-0.035 -0.0448245 0.0483525)
          Scholz2015GeometryPathPoint path_point_2:
            PathPoint: humerus_l (0.0074 0.0059765 0.035)
          Scholz2015GeometryPathPoint path_point_3:
            PathPoint: humerus_l (0.0225 -0.0095624 0.01)
    Millard2012EquilibriumMuscle supraspinatus_post_l: max_isometric_force=326.2 optimal_fiber_length=0.06158489
        tendon_slack_length=0.02605114 pennation_angle_at_optimal=0 ignore_tendon_compliance=true
      Scholz2015GeometryPath path: algorithm=minimum_length
        path_elements:
          Scholz2015GeometryPathPoint path_point_0:
            PathPoint: scapula_l (-0.0605 -0.00139454 0.05318775)
          Scholz2015GeometryPathPoint path_point_1:
            PathPoint: humerus_l (0 0.0370543 -0.006)
          Scholz2015GeometryPathPoint path_point_2:
            PathPoint: humerus_l (0.014 0.0203201 -0.021)
    Millard2012EquilibriumMuscle supraspinatus_ant_l: max_isometric_force=543.2 optimal_fiber_length=0.05840915
        tendon_slack_length=0.03268382 pennation_angle_at_optimal=0 ignore_tendon_compliance=true
      Scholz2015GeometryPath path: algorithm=minimum_length
        path_elements:
          Scholz2015GeometryPathPoint path_point_0:
            PathPoint: scapula_l (-0.049 0.00139454 0.0743554)
          Scholz2015GeometryPathPoint path_point_1:
            PathPoint: humerus_l (0.007 0.0394449 0.004)
          Scholz2015GeometryPathPoint path_point_2:
            PathPoint: humerus_l (0.0178 0.02103728 -0.0096)
    Millard2012EquilibriumMuscle triceps_long_l: max_isometric_force=1580.6 optimal_fiber_length=0.1170103
        tendon_slack_length=0.2912579 pennation_angle_at_optimal=0.174533
      Scholz2015GeometryPath path: algorithm=minimum_length
        path_elements:
          Scholz2015GeometryPathPoint path_point_0:
            PathPoint: scapula_l (-0.0421 -0.05169759 0.01386105)
          Scholz2015GeometryPathObstacle obstacle_0: socket_contact_geometry=/bodyset/humerus_l/triceps_l_obstacle
              contact_hint=(-0.01 0.003 0.055)
          Scholz2015GeometryPathPoint path_point_1:
            PathPoint: ulna_l (-0.031 0.0053375 -0.001)
    Millard2012EquilibriumMuscle biceps_long_l: max_isometric_force=485.8 optimal_fiber_length=0.1633802
        tendon_slack_length=0.2952571 pennation_angle_at_optimal=0
      Scholz2015GeometryPath path: algorithm=minimum_length
        path_elements:
          Scholz2015GeometryPathPoint path_point_0:
            PathPoint: scapula_l (-0.0226 -0.01623643 0.01944845)
          Scholz2015GeometryPathPoint path_point_1:
            PathPoint: humerus_l (0.012 0.0107577 -0.0135)
          Scholz2015GeometryPathObstacle obstacle_0: socket_contact_geometry=/bodyset/humerus_l/biceps_l_obstacle
              contact_hint=(0.014 0.007 -0.043)
          Scholz2015GeometryPathPoint path_point_2:
            PathPoint: radius_l (-0.0009 -0.04697 0.0095)
    Millard2012EquilibriumMuscle biceps_brevis_l: max_isometric_force=693 optimal_fiber_length=0.1469053
        tendon_slack_length=0.2463918 pennation_angle_at_optimal=0
      Scholz2015GeometryPath path: algorithm=minimum_length
        path_elements:
          Scholz2015GeometryPathPoint path_point_0:
            PathPoint: scapula_l (0.0095 -0.03805102 0.0260029)
          Scholz2015GeometryPathObstacle obstacle_0: socket_contact_geometry=/bodyset/humerus_l/biceps_l_obstacle
              contact_hint=(0.014 -0.018 -0.043)
          Scholz2015GeometryPathPoint path_point_1:
            PathPoint: radius_l (-0.0002 -0.04729025 0.0099)
    Millard2012EquilibriumMuscle rectus_abdominis_l: max_isometric_force=705.9 optimal_fiber_length=0.2993743
        tendon_slack_length=0.08142743 pennation_angle_at_optimal=0 ignore_tendon_compliance=true
      Scholz2015GeometryPath path: algorithm=minimum_length
        path_elements:
          Scholz2015GeometryPathPoint path_point_0:
            PathPoint: pelvis (-0.0275 -0.07236 -0.01138125)
          Scholz2015GeometryPathPoint path_point_1:
            PathPoint: pelvis (-0.002 0.067536 -0.0318675)
          Scholz2015GeometryPathPoint path_point_2:
            PathPoint: lumbar_spine (0.082 -0.109571 -0.0376075)
          Scholz2015GeometryPathPoint path_point_3:
            PathPoint: thorax (0.083 -0.2241225 -0.0376075)
          Scholz2015GeometryPathPoint path_point_4:
            PathPoint: thorax (0.072 -0.169337 -0.0376075)
    Millard2012EquilibriumMuscle extobl1_r: max_isometric_force=820.0712 optimal_fiber_length=0.04618498
        tendon_slack_length=0.06020997 pennation_angle_at_optimal=0
      Scholz2015GeometryPath path: algorithm=minimum_length
        path_elements:
          Scholz2015GeometryPathPoint path_point_0:
            PathPoint: lumbar_spine (0.083 -0.1035944 0.053725)
          Scholz2015GeometryPathPoint path_point_1:
            PathPoint: thorax (0.083 -0.2241225 0.0827365)
          Scholz2015GeometryPathPoint path_point_2:
            PathPoint: thorax (0.075 -0.1942395 0.101003)
      FiberForceLengthCurve: strain_at_zero_force=0 strain_at_one_norm_force=3 stiffness_at_low_force=0.2
          stiffness_at_one_norm_force=2.857143 curviness=0.75
    Millard2012EquilibriumMuscle extobl2_r: max_isometric_force=1464.327 optimal_fiber_length=0.07576442
        tendon_slack_length=0.09217014 pennation_angle_at_optimal=0
      Scholz2015GeometryPath path: algorithm=minimum_length
        path_elements:
          Scholz2015GeometryPathPoint path_point_0:
            PathPoint: lumbar_spine (0.057 -0.1743175 0.053725)
          Scholz2015GeometryPathPoint path_point_1:
            PathPoint: thorax (0.059 -0.2410562 0.1343125)
          Scholz2015GeometryPathPoint path_point_2:
            PathPoint: thorax (0.048 -0.219142 0.1429085)
      FiberForceLengthCurve: strain_at_zero_force=0 strain_at_one_norm_force=3 stiffness_at_low_force=0.2
          stiffness_at_one_norm_force=2.857143 curviness=0.75
    Millard2012EquilibriumMuscle extobl3_r: max_isometric_force=125.5796 optimal_fiber_length=0.09693302
        tendon_slack_length=0.09285316 pennation_angle_at_optimal=0 ignore_tendon_compliance=true
      Scholz2015GeometryPath path: algorithm=minimum_length
        path_elements:
          Scholz2015GeometryPathPoint path_point_0:
            PathPoint: pelvis (-0.035 0.04824 0.116544)
          Scholz2015GeometryPathPoint path_point_1:
            PathPoint: thorax (-0.027 -0.2330874 0.1278655)
      FiberForceLengthCurve: strain_at_zero_force=0 strain_at_one_norm_force=3 stiffness_at_low_force=0.2
          stiffness_at_one_norm_force=2.857143 curviness=0.75
    Millard2012EquilibriumMuscle extobl4_r: max_isometric_force=149.8368 optimal_fiber_length=0.08940599
        tendon_slack_length=0.04714947 pennation_angle_at_optimal=0 ignore_tendon_compliance=true
      Scholz2015GeometryPath path: algorithm=minimum_length
        path_elements:
          Scholz2015GeometryPathPoint path_point_0:
            PathPoint: pelvis (-0.1 0.08442 0.069198)
          Scholz2015GeometryPathPoint path_point_1:
            PathPoint: thorax (-0.06 -0.249025 0.077364)
      FiberForceLengthCurve: strain_at_zero_force=0 strain_at_one_norm_force=3 stiffness_at_low_force=0.2
          stiffness_at_one_norm_force=2.857143 curviness=0.75
    Millard2012EquilibriumMuscle intobl1_r: max_isometric_force=911.3819 optimal_fiber_length=0.05172974
        tendon_slack_length=0.05899083 pennation_angle_at_optimal=0
      Scholz2015GeometryPath path: algorithm=minimum_length
        path_elements:
          Scholz2015GeometryPathPoint path_point_0:
            PathPoint: pelvis (-0.023 0.0414864 0.1174545)
          Scholz2015GeometryPathPoint path_point_1:
            PathPoint: lumbar_spine (0.055 -0.1414462 0.06447)
      FiberForceLengthCurve: strain_at_zero_force=0 strain_at_one_norm_force=1.2 stiffness_at_low_force=0.2
          stiffness_at_one_norm_force=2.857143 curviness=0.75
    Millard2012EquilibriumMuscle intobl2_r: max_isometric_force=122.0465 optimal_fiber_length=0.042514
        tendon_slack_length=0.05140111 pennation_angle_at_optimal=0
      Scholz2015GeometryPath path: algorithm=minimum_length
        path_elements:
          Scholz2015GeometryPathPoint path_point_0:
            PathPoint: pelvis (-0.044 0.0656064 0.10926)
          Scholz2015GeometryPathPoint path_point_1:
            PathPoint: lumbar_spine (0.042 -0.1155476 0.07037975)
      FiberForceLengthCurve: strain_at_zero_force=0 strain_at_one_norm_force=1.2 stiffness_at_low_force=0.2
          stiffness_at_one_norm_force=2.857143 curviness=0.75
    Millard2012EquilibriumMuscle intobl3_r: max_isometric_force=426.7694 optimal_fiber_length=0.1015294
        tendon_slack_length=0.0427731 pennation_angle_at_optimal=0 ignore_tendon_compliance=true
      Scholz2015GeometryPath path: algorithm=minimum_length
        path_elements:
          Scholz2015GeometryPathPoint path_point_0:
            PathPoint: pelvis (-0.063 0.0849024 0.0919605)
          Scholz2015GeometryPathPoint path_point_1:
            PathPoint: thorax (0.032 -0.2649626 0.120344)
      FiberForceLengthCurve: strain_at_zero_force=0 strain_at_one_norm_force=1.2 stiffness_at_low_force=0.2
          stiffness_at_one_norm_force=2.857143 curviness=0.75
    Millard2012EquilibriumMuscle intobl4_r: max_isometric_force=652.5784 optimal_fiber_length=0.09492555
        tendon_slack_length=0.04048093 pennation_angle_at_optimal=0 ignore_tendon_compliance=true
      Scholz2015GeometryPath path: algorithm=minimum_length
        path_elements:
          Scholz2015GeometryPathPoint path_point_0:
            PathPoint: pelvis (-0.085 0.0877968 0.0755715)
          Scholz2015GeometryPathPoint path_point_1:
            PathPoint: thorax (-0.001 -0.2639665 0.1128225)
      FiberForceLengthCurve: strain_at_zero_force=0 strain_at_one_norm_force=1.2 stiffness_at_low_force=0.2
          stiffness_at_one_norm_force=2.857143 curviness=0.75
    Millard2012EquilibriumMuscle qlpost1_r: max_isometric_force=81.71412 optimal_fiber_length=0.07727648
        tendon_slack_length=0.06493135 pennation_angle_at_optimal=0.12915 ignore_tendon_compliance=true
      Scholz2015GeometryPath path: algorithm=minimum_length
        path_elements:
          Scholz2015GeometryPathPoint path_point_0:
            PathPoint: pelvis (-0.103 0.0858672 0.063735)
          Scholz2015GeometryPathPoint path_point_1:
            PathPoint: lumbar_spine (-0.001 -0.0318752 0.027937)
    Millard2012EquilibriumMuscle qlpost2_r: max_isometric_force=87.71271 optimal_fiber_length=0.05500402
        tendon_slack_length=0.04621698 pennation_angle_at_optimal=0.12915 ignore_tendon_compliance=true
      Scholz2015GeometryPath path: algorithm=minimum_length
        path_elements:
          Scholz2015GeometryPathPoint path_point_0:
            PathPoint: pelvis (-0.111 0.0791136 0.0591825)
          Scholz2015GeometryPathPoint path_point_1:
            PathPoint: lumbar_spine (-0.013 -0.0757036 0.0290115)
    Millard2012EquilibriumMuscle qlpost3_r: max_isometric_force=199.5611 optimal_fiber_length=0.03802031
        tendon_slack_length=0.03194647 pennation_angle_at_optimal=0.12915 ignore_tendon_compliance=true
      Scholz2015GeometryPath path: algorithm=minimum_length
        path_elements:
          Scholz2015GeometryPathPoint path_point_0:
            PathPoint: pelvis (-0.119 0.0742896 0.056451)
          Scholz2015GeometryPathPoint path_point_1:
            PathPoint: lumbar_spine (-0.029 -0.1105671 0.036533)
    Millard2012EquilibriumMuscle qlmid1_r: max_isometric_force=327.7053 optimal_fiber_length=0.04387451
        tendon_slack_length=0.02278221 pennation_angle_at_optimal=0.12915 ignore_tendon_compliance=true
      Scholz2015GeometryPath path: algorithm=minimum_length
        path_elements:
          Scholz2015GeometryPathPoint path_point_0:
            PathPoint: lumbar_spine (0.003 -0.0458206 0.019341)
          Scholz2015GeometryPathPoint path_point_1:
            PathPoint: thorax (-0.066 -0.2141615 0.027937)
    Millard2012EquilibriumMuscle qlmid2_r: max_isometric_force=175.9307 optimal_fiber_length=0.06443317
        tendon_slack_length=0.03345747 pennation_angle_at_optimal=0.12915 ignore_tendon_compliance=true
      Scholz2015GeometryPath path: algorithm=minimum_length
        path_elements:
          Scholz2015GeometryPathPoint path_point_0:
            PathPoint: lumbar_spine (0.004 -0.0717192 0.0225645)
          Scholz2015GeometryPathPoint path_point_1:
            PathPoint: thorax (-0.071 -0.2300991 0.053725)
    Millard2012EquilibriumMuscle qlmid3_r: max_isometric_force=51.06528 optimal_fiber_length=0.077603
        tendon_slack_length=0.04029602 pennation_angle_at_optimal=0.12915 ignore_tendon_compliance=true
      Scholz2015GeometryPath path: algorithm=minimum_length
        path_elements:
          Scholz2015GeometryPathPoint path_point_0:
            PathPoint: lumbar_spine (0.005 -0.1025983 0.025788)
          Scholz2015GeometryPathPoint path_point_1:
            PathPoint: thorax (-0.058 -0.249025 0.0762895)
    Millard2012EquilibriumMuscle qlant1_r: max_isometric_force=134.8054 optimal_fiber_length=0.1173134
        tendon_slack_length=0.06091599 pennation_angle_at_optimal=0.12915 ignore_tendon_compliance=true
      Scholz2015GeometryPath path: algorithm=minimum_length
        path_elements:
          Scholz2015GeometryPathPoint path_point_0:
            PathPoint: pelvis (-0.1 0.082008 0.0591825)
          Scholz2015GeometryPathPoint path_point_1:
            PathPoint: thorax (-0.046 -0.2131654 0.027937)
    Millard2012EquilibriumMuscle qlant2_r: max_isometric_force=167.3588 optimal_fiber_length=0.09943138
        tendon_slack_length=0.05163059 pennation_angle_at_optimal=0.12915 ignore_tendon_compliance=true
      Scholz2015GeometryPath path: algorithm=minimum_length
        path_elements:
          Scholz2015GeometryPathPoint path_point_0:
            PathPoint: pelvis (-0.1 0.082008 0.0591825)
          Scholz2015GeometryPathPoint path_point_1:
            PathPoint: thorax (-0.067 -0.229103 0.053725)
    Millard2012EquilibriumMuscle scm1_r: max_isometric_force=197 optimal_fiber_length=0.1082851
        tendon_slack_length=0.05627117 pennation_angle_at_optimal=0.2618 ignore_tendon_compliance=true
      Scholz2015GeometryPath path: algorithm=minimum_length
        path_elements:
          Scholz2015GeometryPathPoint path_point_0:
            PathPoint: thorax (0 0 0.02149)
          Scholz2015GeometryPathPoint path_point_1:
            PathPoint: head (0.002 0.0069727 0.058023)
    Millard2012EquilibriumMuscle scm2_r: max_isometric_force=98.5 optimal_fiber_length=0.1078422
        tendon_slack_length=0.03514656 pennation_angle_at_optimal=0.2618 ignore_tendon_compliance=true
      Scholz2015GeometryPath path: algorithm=minimum_length
        path_elements:
          Scholz2015GeometryPathPoint path_point_0:
            PathPoint: clavicle_r (0.00388 0.00542 0.0378224)
          Scholz2015GeometryPathPoint path_point_1:
            PathPoint: head (0.002 0.0069727 0.058023)
    Millard2012EquilibriumMuscle scm3_r: max_isometric_force=98.5 optimal_fiber_length=0.107833
        tendon_slack_length=0.06935957 pennation_angle_at_optimal=0.2618 ignore_tendon_compliance=true
      Scholz2015GeometryPath path: algorithm=minimum_length
        path_elements:
          Scholz2015GeometryPathPoint path_point_0:
            PathPoint: clavicle_r (0.00388 0.00542 0.0378224)
          Scholz2015GeometryPathPoint path_point_1:
            PathPoint: head (-0.026 0.0189259 0.0590975)
    Millard2012EquilibriumMuscle scalenus_ant_r: max_isometric_force=147 optimal_fiber_length=0.04231225
        tendon_slack_length=0.05381816 pennation_angle_at_optimal=0.17453
      Scholz2015GeometryPath path: algorithm=minimum_length
        path_elements:
          Scholz2015GeometryPathPoint path_point_0:
            PathPoint: thorax (-0.005 0 0.058023)
          Scholz2015GeometryPathPoint path_point_1:
            PathPoint: head (0.005 -0.0338674 0.02149)
    Millard2012EquilibriumMuscle scalenus_med_r: max_isometric_force=206 optimal_fiber_length=0.05080543
        tendon_slack_length=0.06249881 pennation_angle_at_optimal=0.17453
      Scholz2015GeometryPath path: algorithm=minimum_length
        path_elements:
          Scholz2015GeometryPathPoint path_point_0:
            PathPoint: thorax (-0.028 0.0169337 0.075215)
          Scholz2015GeometryPathPoint path_point_1:
            PathPoint: head (-0.005 -0.019922 0.02149)
    Millard2012EquilibriumMuscle scalenus_post_r: max_isometric_force=157 optimal_fiber_length=0.06369067
        tendon_slack_length=0.0748314 pennation_angle_at_optimal=0.17453
      Scholz2015GeometryPath path: algorithm=minimum_length
        path_elements:
          Scholz2015GeometryPathPoint path_point_0:
            PathPoint: thorax (-0.035 -0.0079688 0.094556)
          Scholz2015GeometryPathPoint path_point_1:
            PathPoint: head (-0.007 -0.0508011 0.0225645)
    Millard2012EquilibriumMuscle ercspn_r: max_isometric_force=2500 optimal_fiber_length=0.1370716
        tendon_slack_length=0.03426741 pennation_angle_at_optimal=0 ignore_tendon_compliance=true
      Scholz2015GeometryPath path: algorithm=minimum_length
        path_elements:
          Scholz2015GeometryPathPoint path_point_0:
            PathPoint: pelvis (-0.14 0.0463104 0.0500775)
          Scholz2015GeometryPathPoint path_point_1:
            PathPoint: thorax (-0.075 -0.2440445 0.030086)
      FiberForceLengthCurve: strain_at_zero_force=0 strain_at_one_norm_force=0.9 stiffness_at_low_force=0.2
          stiffness_at_one_norm_force=2.857143 curviness=0.75
    Millard2012EquilibriumMuscle extobl1_l: max_isometric_force=820.0712 optimal_fiber_length=0.04618498
        tendon_slack_length=0.06020997 pennation_angle_at_optimal=0
      Scholz2015GeometryPath path: algorithm=minimum_length
        path_elements:
          Scholz2015GeometryPathPoint path_point_0:
            PathPoint: lumbar_spine (0.083 -0.1035944 -0.053725)
          Scholz2015GeometryPathPoint path_point_1:
            PathPoint: thorax (0.083 -0.2241225 -0.0827365)
          Scholz2015GeometryPathPoint path_point_2:
            PathPoint: thorax (0.075 -0.1942395 -0.101003)
      FiberForceLengthCurve: strain_at_zero_force=0 strain_at_one_norm_force=3 stiffness_at_low_force=0.2
          stiffness_at_one_norm_force=2.857143 curviness=0.75
    Millard2012EquilibriumMuscle extobl2_l: max_isometric_force=1464.327 optimal_fiber_length=0.07576442
        tendon_slack_length=0.09217014 pennation_angle_at_optimal=0
      Scholz2015GeometryPath path: algorithm=minimum_length
        path_elements:
          Scholz2015GeometryPathPoint path_point_0:
            PathPoint: lumbar_spine (0.057 -0.1743175 -0.053725)
          Scholz2015GeometryPathPoint path_point_1:
            PathPoint: thorax (0.059 -0.2410562 -0.1343125)
          Scholz2015GeometryPathPoint path_point_2:
            PathPoint: thorax (0.048 -0.219142 -0.1429085)
      FiberForceLengthCurve: strain_at_zero_force=0 strain_at_one_norm_force=3 stiffness_at_low_force=0.2
          stiffness_at_one_norm_force=2.857143 curviness=0.75
    Millard2012EquilibriumMuscle extobl3_l: max_isometric_force=125.5796 optimal_fiber_length=0.09693302
        tendon_slack_length=0.09285316 pennation_angle_at_optimal=0 ignore_tendon_compliance=true
      Scholz2015GeometryPath path: algorithm=minimum_length
        path_elements:
          Scholz2015GeometryPathPoint path_point_0:
            PathPoint: pelvis (-0.035 0.04824 -0.116544)
          Scholz2015GeometryPathPoint path_point_1:
            PathPoint: thorax (-0.027 -0.2330874 -0.1278655)
      FiberForceLengthCurve: strain_at_zero_force=0 strain_at_one_norm_force=3 stiffness_at_low_force=0.2
          stiffness_at_one_norm_force=2.857143 curviness=0.75
    Millard2012EquilibriumMuscle extobl4_l: max_isometric_force=149.8368 optimal_fiber_length=0.08940599
        tendon_slack_length=0.04714947 pennation_angle_at_optimal=0 ignore_tendon_compliance=true
      Scholz2015GeometryPath path: algorithm=minimum_length
        path_elements:
          Scholz2015GeometryPathPoint path_point_0:
            PathPoint: pelvis (-0.1 0.08442 -0.069198)
          Scholz2015GeometryPathPoint path_point_1:
            PathPoint: thorax (-0.06 -0.249025 -0.077364)
      FiberForceLengthCurve: strain_at_zero_force=0 strain_at_one_norm_force=3 stiffness_at_low_force=0.2
          stiffness_at_one_norm_force=2.857143 curviness=0.75
    Millard2012EquilibriumMuscle intobl1_l: max_isometric_force=911.3819 optimal_fiber_length=0.05172974
        tendon_slack_length=0.05899083 pennation_angle_at_optimal=0
      Scholz2015GeometryPath path: algorithm=minimum_length
        path_elements:
          Scholz2015GeometryPathPoint path_point_0:
            PathPoint: pelvis (-0.023 0.0414864 -0.1174545)
          Scholz2015GeometryPathPoint path_point_1:
            PathPoint: lumbar_spine (0.055 -0.1414462 -0.06447)
      FiberForceLengthCurve: strain_at_zero_force=0 strain_at_one_norm_force=1.2 stiffness_at_low_force=0.2
          stiffness_at_one_norm_force=2.857143 curviness=0.75
    Millard2012EquilibriumMuscle intobl2_l: max_isometric_force=122.0465 optimal_fiber_length=0.042514
        tendon_slack_length=0.05140111 pennation_angle_at_optimal=0
      Scholz2015GeometryPath path: algorithm=minimum_length
        path_elements:
          Scholz2015GeometryPathPoint path_point_0:
            PathPoint: pelvis (-0.044 0.0656064 -0.10926)
          Scholz2015GeometryPathPoint path_point_1:
            PathPoint: lumbar_spine (0.042 -0.1155476 -0.07037975)
      FiberForceLengthCurve: strain_at_zero_force=0 strain_at_one_norm_force=1.2 stiffness_at_low_force=0.2
          stiffness_at_one_norm_force=2.857143 curviness=0.75
    Millard2012EquilibriumMuscle intobl3_l: max_isometric_force=426.7694 optimal_fiber_length=0.1015294
        tendon_slack_length=0.0427731 pennation_angle_at_optimal=0 ignore_tendon_compliance=true
      Scholz2015GeometryPath path: algorithm=minimum_length
        path_elements:
          Scholz2015GeometryPathPoint path_point_0:
            PathPoint: pelvis (-0.063 0.0849024 -0.0919605)
          Scholz2015GeometryPathPoint path_point_1:
            PathPoint: thorax (0.032 -0.2649626 -0.120344)
      FiberForceLengthCurve: strain_at_zero_force=0 strain_at_one_norm_force=1.2 stiffness_at_low_force=0.2
          stiffness_at_one_norm_force=2.857143 curviness=0.75
    Millard2012EquilibriumMuscle intobl4_l: max_isometric_force=652.5784 optimal_fiber_length=0.09492555
        tendon_slack_length=0.04048093 pennation_angle_at_optimal=0 ignore_tendon_compliance=true
      Scholz2015GeometryPath path: algorithm=minimum_length
        path_elements:
          Scholz2015GeometryPathPoint path_point_0:
            PathPoint: pelvis (-0.085 0.0877968 -0.0755715)
          Scholz2015GeometryPathPoint path_point_1:
            PathPoint: thorax (-0.001 -0.2639665 -0.1128225)
      FiberForceLengthCurve: strain_at_zero_force=0 strain_at_one_norm_force=1.2 stiffness_at_low_force=0.2
          stiffness_at_one_norm_force=2.857143 curviness=0.75
    Millard2012EquilibriumMuscle qlpost1_l: max_isometric_force=81.71412 optimal_fiber_length=0.07727648
        tendon_slack_length=0.06493135 pennation_angle_at_optimal=0.12915 ignore_tendon_compliance=true
      Scholz2015GeometryPath path: algorithm=minimum_length
        path_elements:
          Scholz2015GeometryPathPoint path_point_0:
            PathPoint: pelvis (-0.103 0.0858672 -0.063735)
          Scholz2015GeometryPathPoint path_point_1:
            PathPoint: lumbar_spine (-0.001 -0.0318752 -0.027937)
    Millard2012EquilibriumMuscle qlpost2_l: max_isometric_force=87.71271 optimal_fiber_length=0.05500402
        tendon_slack_length=0.04621698 pennation_angle_at_optimal=0.12915 ignore_tendon_compliance=true
      Scholz2015GeometryPath path: algorithm=minimum_length
        path_elements:
          Scholz2015GeometryPathPoint path_point_0:
            PathPoint: pelvis (-0.111 0.0791136 -0.0591825)
          Scholz2015GeometryPathPoint path_point_1:
            PathPoint: lumbar_spine (-0.013 -0.0757036 -0.0290115)
    Millard2012EquilibriumMuscle qlpost3_l: max_isometric_force=199.5611 optimal_fiber_length=0.03802031
        tendon_slack_length=0.03194647 pennation_angle_at_optimal=0.12915 ignore_tendon_compliance=true
      Scholz2015GeometryPath path: algorithm=minimum_length
        path_elements:
          Scholz2015GeometryPathPoint path_point_0:
            PathPoint: pelvis (-0.119 0.0742896 -0.056451)
          Scholz2015GeometryPathPoint path_point_1:
            PathPoint: lumbar_spine (-0.029 -0.1105671 -0.036533)
    Millard2012EquilibriumMuscle qlmid1_l: max_isometric_force=327.7053 optimal_fiber_length=0.04387451
        tendon_slack_length=0.02278221 pennation_angle_at_optimal=0.12915 ignore_tendon_compliance=true
      Scholz2015GeometryPath path: algorithm=minimum_length
        path_elements:
          Scholz2015GeometryPathPoint path_point_0:
            PathPoint: lumbar_spine (0.003 -0.0458206 -0.019341)
          Scholz2015GeometryPathPoint path_point_1:
            PathPoint: thorax (-0.066 -0.2141615 -0.027937)
    Millard2012EquilibriumMuscle qlmid2_l: max_isometric_force=175.9307 optimal_fiber_length=0.06443317
        tendon_slack_length=0.03345747 pennation_angle_at_optimal=0.12915 ignore_tendon_compliance=true
      Scholz2015GeometryPath path: algorithm=minimum_length
        path_elements:
          Scholz2015GeometryPathPoint path_point_0:
            PathPoint: lumbar_spine (0.004 -0.0717192 -0.0225645)
          Scholz2015GeometryPathPoint path_point_1:
            PathPoint: thorax (-0.071 -0.2300991 -0.053725)
    Millard2012EquilibriumMuscle qlmid3_l: max_isometric_force=51.06528 optimal_fiber_length=0.077603
        tendon_slack_length=0.04029602 pennation_angle_at_optimal=0.12915 ignore_tendon_compliance=true
      Scholz2015GeometryPath path: algorithm=minimum_length
        path_elements:
          Scholz2015GeometryPathPoint path_point_0:
            PathPoint: lumbar_spine (0.005 -0.1025983 -0.025788)
          Scholz2015GeometryPathPoint path_point_1:
            PathPoint: thorax (-0.058 -0.249025 -0.0762895)
    Millard2012EquilibriumMuscle qlant1_l: max_isometric_force=134.8054 optimal_fiber_length=0.1173134
        tendon_slack_length=0.06091599 pennation_angle_at_optimal=0.12915 ignore_tendon_compliance=true
      Scholz2015GeometryPath path: algorithm=minimum_length
        path_elements:
          Scholz2015GeometryPathPoint path_point_0:
            PathPoint: pelvis (-0.1 0.082008 -0.0591825)
          Scholz2015GeometryPathPoint path_point_1:
            PathPoint: thorax (-0.046 -0.2131654 -0.027937)
    Millard2012EquilibriumMuscle qlant2_l: max_isometric_force=167.3588 optimal_fiber_length=0.09943138
        tendon_slack_length=0.05163059 pennation_angle_at_optimal=0.12915 ignore_tendon_compliance=true
      Scholz2015GeometryPath path: algorithm=minimum_length
        path_elements:
          Scholz2015GeometryPathPoint path_point_0:
            PathPoint: pelvis (-0.1 0.082008 -0.0591825)
          Scholz2015GeometryPathPoint path_point_1:
            PathPoint: thorax (-0.067 -0.229103 -0.053725)
    Millard2012EquilibriumMuscle scm1_l: max_isometric_force=197 optimal_fiber_length=0.1082851
        tendon_slack_length=0.05627117 pennation_angle_at_optimal=0.2618 ignore_tendon_compliance=true
      Scholz2015GeometryPath path: algorithm=minimum_length
        path_elements:
          Scholz2015GeometryPathPoint path_point_0:
            PathPoint: thorax (0 0 -0.02149)
          Scholz2015GeometryPathPoint path_point_1:
            PathPoint: head (0.002 0.0069727 -0.058023)
    Millard2012EquilibriumMuscle scm2_l: max_isometric_force=98.5 optimal_fiber_length=0.1078422
        tendon_slack_length=0.03514656 pennation_angle_at_optimal=0.2618 ignore_tendon_compliance=true
      Scholz2015GeometryPath path: algorithm=minimum_length
        path_elements:
          Scholz2015GeometryPathPoint path_point_0:
            PathPoint: clavicle_l (0.00388 0.00542 -0.0378224)
          Scholz2015GeometryPathPoint path_point_1:
            PathPoint: head (0.002 0.0069727 -0.058023)
    Millard2012EquilibriumMuscle scm3_l: max_isometric_force=98.5 optimal_fiber_length=0.107833
        tendon_slack_length=0.06935957 pennation_angle_at_optimal=0.2618 ignore_tendon_compliance=true
      Scholz2015GeometryPath path: algorithm=minimum_length
        path_elements:
          Scholz2015GeometryPathPoint path_point_0:
            PathPoint: clavicle_l (0.00388 0.00542 -0.0378224)
          Scholz2015GeometryPathPoint path_point_1:
            PathPoint: head (-0.026 0.0189259 -0.0590975)
    Millard2012EquilibriumMuscle scalenus_ant_l: max_isometric_force=147 optimal_fiber_length=0.04231225
        tendon_slack_length=0.05381816 pennation_angle_at_optimal=0.17453
      Scholz2015GeometryPath path: algorithm=minimum_length
        path_elements:
          Scholz2015GeometryPathPoint path_point_0:
            PathPoint: thorax (-0.005 0 -0.058023)
          Scholz2015GeometryPathPoint path_point_1:
            PathPoint: head (0.005 -0.0338674 -0.02149)
    Millard2012EquilibriumMuscle scalenus_med_l: max_isometric_force=206 optimal_fiber_length=0.05080543
        tendon_slack_length=0.06249881 pennation_angle_at_optimal=0.17453
      Scholz2015GeometryPath path: algorithm=minimum_length
        path_elements:
          Scholz2015GeometryPathPoint path_point_0:
            PathPoint: thorax (-0.028 0.0169337 -0.075215)
          Scholz2015GeometryPathPoint path_point_1:
            PathPoint: head (-0.005 -0.019922 -0.02149)
    Millard2012EquilibriumMuscle scalenus_post_l: max_isometric_force=157 optimal_fiber_length=0.06369067
        tendon_slack_length=0.0748314 pennation_angle_at_optimal=0.17453
      Scholz2015GeometryPath path: algorithm=minimum_length
        path_elements:
          Scholz2015GeometryPathPoint path_point_0:
            PathPoint: thorax (-0.035 -0.0079688 -0.094556)
          Scholz2015GeometryPathPoint path_point_1:
            PathPoint: head (-0.007 -0.0508011 -0.0225645)
    Millard2012EquilibriumMuscle ercspn_l: max_isometric_force=2500 optimal_fiber_length=0.1370716
        tendon_slack_length=0.03426741 pennation_angle_at_optimal=0 ignore_tendon_compliance=true
      Scholz2015GeometryPath path: algorithm=minimum_length
        path_elements:
          Scholz2015GeometryPathPoint path_point_0:
            PathPoint: pelvis (-0.14 0.0463104 -0.0500775)
          Scholz2015GeometryPathPoint path_point_1:
            PathPoint: thorax (-0.075 -0.2440445 -0.030086)
      FiberForceLengthCurve: strain_at_zero_force=0 strain_at_one_norm_force=0.9 stiffness_at_low_force=0.2
          stiffness_at_one_norm_force=2.857143 curviness=0.75
    Thelen2003Muscle [values shared by the 86 below unless stated]: FmaxTendonStrain=0.033 FmaxMuscleStrain=0.6
        KshapeActive=0.5 KshapePassive=4 Af=0.3 Flen=1.8 activation_time_constant=0.01 [seconds]
        deactivation_time_constant=0.04 [seconds]
    Thelen2003Muscle glut_med1_r: max_isometric_force=819 optimal_fiber_length=0.04790465
        tendon_slack_length=0.06984229 pennation_angle_at_optimal=0.1396263 [radians]
      PathPoint P1: pelvis (-0.0360017 0.0268248 0.105465)
      PathPoint P2: femur_r (-0.0187011 -0.0124962 0.0476106)
    Thelen2003Muscle glut_med2_r: max_isometric_force=573 optimal_fiber_length=0.0747538 tendon_slack_length=0.046887
        pennation_angle_at_optimal=0
      PathPoint P1: pelvis (-0.0754447 0.0392665 0.0668208)
      PathPoint P2: femur_r (-0.0221325 -0.00619469 0.0452086)
    Thelen2003Muscle glut_med3_r: max_isometric_force=653 optimal_fiber_length=0.05692571
        tendon_slack_length=0.04670376 pennation_angle_at_optimal=0.3316126
      PathPoint P1: pelvis (-0.107917 0.00926514 0.0565272)
      PathPoint P2: femur_r (-0.0265075 -0.00501984 0.0444366)
    Thelen2003Muscle glut_min1_r: max_isometric_force=270 optimal_fiber_length=0.06089982
        tendon_slack_length=0.01432937 pennation_angle_at_optimal=0.1745329
      PathPoint P1: pelvis (-0.0412078 -0.00705915 0.0921185)
      PathPoint P2: femur_r (-0.00617651 -0.0111077 0.0480395)
    Thelen2003Muscle glut_min2_r: max_isometric_force=285 optimal_fiber_length=0.05010659
        tendon_slack_length=0.02326378 pennation_angle_at_optimal=0
      PathPoint P1: pelvis (-0.0558556 -0.00573556 0.0864483)
      PathPoint P2: femur_r (-0.00823535 -0.0111077 0.0480395)
    Thelen2003Muscle glut_min3_r: max_isometric_force=323 optimal_fiber_length=0.03371841
        tendon_slack_length=0.04525366 pennation_angle_at_optimal=0.01745329
      PathPoint P1: pelvis (-0.0735917 -0.00555908 0.0746718)
      PathPoint P2: femur_r (-0.011581 -0.00886482 0.0471817)
    Thelen2003Muscle semimem_r: max_isometric_force=1288 optimal_fiber_length=0.08684036 tendon_slack_length=0.3896961
        pennation_angle_at_optimal=0.2617994
      PathPoint P1: pelvis (-0.105181 -0.086007 0.0623806)
      PathPoint P2: tibia_r (-0.0286422 -0.0393734 -0.0155639) range=(-0.558505 0.174533)
      PathPoint P3: tibia_r (-0.0222224 -0.0533817 -0.0161071)
    Thelen2003Muscle semiten_r: max_isometric_force=410 optimal_fiber_length=0.2174664 tendon_slack_length=0.2764312
        pennation_angle_at_optimal=0.08726646
      PathPoint P1: pelvis (-0.111491 -0.0969575 0.0526803)
      PathPoint P2: tibia_r (-0.0345929 -0.0319888 -0.0187409) range=(-0.331613 0.174533)
      PathPoint P3: tibia_r (-0.0273418 -0.0590992 -0.0188314)
      PathPoint P4: tibia_r (-0.00930049 -0.0834684 -0.0201648)
      PathPoint P5: tibia_r (0.00222224 -0.106965 -0.0158849)
    Thelen2003Muscle bifemlh_r: max_isometric_force=896 optimal_fiber_length=0.1184379 tendon_slack_length=0.3542272
        pennation_angle_at_optimal=0
      PathPoint P1: pelvis (-0.111146 -0.0905072 0.0605749)
      PathPoint P2: tibia_r (-0.0247739 -0.0402797 0.0242224)
      PathPoint P3: tibia_r (-0.0192594 -0.0629929 0.0282307)
    Thelen2003Muscle bifemsh_r: max_isometric_force=804 optimal_fiber_length=0.1851823 tendon_slack_length=0.09526722
        pennation_angle_at_optimal=0.4014257
      PathPoint P1: femur_r (0.00428924 -0.225465 0.0200737)
      PathPoint P2: tibia_r (-0.0247739 -0.0402797 0.0242224)
      PathPoint P3: tibia_r (-0.0192594 -0.0629929 0.0282307)
    Thelen2003Muscle sar_r: max_isometric_force=156 optimal_fiber_length=0.5397349 tendon_slack_length=0.1037952
        pennation_angle_at_optimal=0
      PathPoint P1: pelvis (-0.0135006 -0.00114711 0.108344)
      PathPoint P2: femur_r (-0.00257355 -0.38108 -0.0361154)
      PathPoint P3: tibia_r (-0.00460909 -0.046881 -0.0328398)
      PathPoint P4: tibia_r (0.00493831 -0.065902 -0.0315229)
      PathPoint P5: tibia_r (0.0200002 -0.0939859 -0.0207409)
    Thelen2003Muscle add_long_r: max_isometric_force=627 optimal_fiber_length=0.1443343 tendon_slack_length=0.1150491
        pennation_angle_at_optimal=0.1047198
      PathPoint P1: pelvis (-0.0278837 -0.0737682 0.0147424)
      PathPoint P2: femur_r (0.00428924 -0.225465 0.0200737)
    Thelen2003Muscle add_brev_r: max_isometric_force=429 optimal_fiber_length=0.1326204 tendon_slack_length=0.01994291
        pennation_angle_at_optimal=0
      PathPoint P1: pelvis (-0.0517965 -0.0807391 0.0143063)
      PathPoint P2: femur_r (0.000772064 -0.127739 0.0252207)
    Thelen2003Muscle add_mag1_r: max_isometric_force=381 optimal_fiber_length=0.08731901 tendon_slack_length=0.06022001
        pennation_angle_at_optimal=0.08726646
      PathPoint P1: pelvis (-0.0645913 -0.103593 0.0222445)
      PathPoint P2: femur_r (-0.00386032 -0.129341 0.0290811)
    Thelen2003Muscle add_mag2_r: max_isometric_force=343 optimal_fiber_length=0.131479 tendon_slack_length=0.1303924
        pennation_angle_at_optimal=0.05235988
      PathPoint P1: pelvis (-0.073327 -0.105181 0.0268679)
      PathPoint P2: femur_r (0.00463238 -0.24405 0.0194732)
    Thelen2003Muscle add_mag3_r: max_isometric_force=488 optimal_fiber_length=0.1428841 tendon_slack_length=0.271589
        pennation_angle_at_optimal=0.08726646
      PathPoint P1: pelvis (-0.0980163 -0.100708 0.0425873)
      PathPoint P2: femur_r (0.00600494 -0.409811 -0.0228188)
    Thelen2003Muscle tfl_r: max_isometric_force=233 optimal_fiber_length=0.09880501 tendon_slack_length=0.4420224
        pennation_angle_at_optimal=0.05235988
      PathPoint P1: pelvis (-0.0274425 0.0188832 0.108257)
      PathPoint P2: femur_r (0.0252207 -0.106271 0.0512136)
      PathPoint P3: femur_r (0.00463238 -0.432454 0.0306252)
      PathPoint P4: tibia_r (0.00493831 -0.0544894 0.0244446)
    Thelen2003Muscle pect_r: max_isometric_force=266 optimal_fiber_length=0.09833403 tendon_slack_length=0.03245023
        pennation_angle_at_optimal=0
      PathPoint P1: pelvis (-0.0380312 -0.0677679 0.0393423)
      PathPoint P2: femur_r (-0.0104658 -0.0877937 0.0217036)
    Thelen2003Muscle grac_r: max_isometric_force=162 optimal_fiber_length=0.3825507 tendon_slack_length=0.1369358
        pennation_angle_at_optimal=0.05235988
      PathPoint P1: pelvis (-0.065306 -0.10474 0.024373)
      PathPoint P2: tibia_r (-0.0218685 -0.0356922 -0.031062) range=(-0.436332 0.174533)
      PathPoint P3: tibia_r (-0.0159919 -0.0576558 -0.0294653)
      PathPoint P4: tibia_r (0.00493831 -0.0935383 -0.0187656)
    Thelen2003Muscle glut_max1_r: max_isometric_force=573 optimal_fiber_length=0.1317114 tendon_slack_length=0.1159431
        pennation_angle_at_optimal=0.08726646
      PathPoint P1: pelvis (-0.105446 0.0540025 0.0610634)
      PathPoint P2: pelvis (-0.113917 0.00105887 0.0772888)
      PathPoint P3: femur_r (-0.0392037 -0.0264877 0.0336277)
      PathPoint P4: femur_r (-0.0237624 -0.0604517 0.0403189)
    Thelen2003Muscle glut_max2_r: max_isometric_force=819 optimal_fiber_length=0.1413112 tendon_slack_length=0.1220852
        pennation_angle_at_optimal=0
      PathPoint P1: pelvis (-0.119035 0.0155301 0.0491124)
      PathPoint P2: pelvis (-0.121417 -0.0458845 0.0797313)
      PathPoint P3: femur_r (-0.0365444 -0.0566067 0.025135)
      PathPoint P4: femur_r (-0.0133824 -0.108514 0.0359439)
    Thelen2003Muscle glut_max3_r: max_isometric_force=552 optimal_fiber_length=0.1381372 tendon_slack_length=0.1390964
        pennation_angle_at_optimal=0.08726646
      PathPoint P1: pelvis (-0.137301 -0.0277072 0.00505954)
      PathPoint P2: pelvis (-0.134918 -0.0928279 0.0351551)
      PathPoint P3: femur_r (-0.0256497 -0.111184 0.011581)
      PathPoint P4: femur_r (-0.00514709 -0.151556 0.0352576)
    Thelen2003Muscle iliacus_r: max_isometric_force=1073 optimal_fiber_length=0.09187246 tendon_slack_length=0.09187246
        pennation_angle_at_optimal=0.1221731
      PathPoint P1: pelvis (-0.0594734 0.0322074 0.0744973)
      PathPoint P2: pelvis (-0.0227658 -0.0485317 0.0707463)
      PathPoint P3: pelvis (-0.025413 -0.0710327 0.0711825) range=(-1.5708 0.785398)
      PathPoint P4: femur_r (0.00145834 -0.0579951 0.00488974)
      PathPoint P5: femur_r (-0.0165565 -0.0663259 0.0110662)
    Thelen2003Muscle psoas_r: max_isometric_force=1113 optimal_fiber_length=0.09085087 tendon_slack_length=0.1453614
        pennation_angle_at_optimal=0.1396263
      PathPoint P1: pelvis (-0.0570909 0.0782684 0.0252105)
      PathPoint P2: pelvis (-0.021001 -0.0502965 0.0662102)
      PathPoint P3: pelvis (-0.025413 -0.0710327 0.0711825) range=(-1.5708 0.785398)
      PathPoint P4: femur_r (0.00137256 -0.0541502 0.00325982)
      PathPoint P5: femur_r (-0.0161276 -0.0637626 0.00892163)
    Thelen2003Muscle quad_fem_r: max_isometric_force=381 optimal_fiber_length=0.04607884 tendon_slack_length=0.02252743
        pennation_angle_at_optimal=0
      PathPoint P1: pelvis (-0.100858 -0.101564 0.0453614)
      PathPoint P2: femur_r (-0.032684 -0.038343 0.0313973)
    Thelen2003Muscle gem_r: max_isometric_force=164 optimal_fiber_length=0.02079838 tendon_slack_length=0.03379737
        pennation_angle_at_optimal=0
      PathPoint P1: pelvis (-0.0999753 -0.0723563 0.0622847)
      PathPoint P2: femur_r (-0.0121815 -0.00352457 0.0380027)
    Thelen2003Muscle peri_r: max_isometric_force=444 optimal_fiber_length=0.0227971 tendon_slack_length=0.1008333
        pennation_angle_at_optimal=0.1745329
      PathPoint P1: pelvis (-0.123182 0.000264718 0.0204999)
      PathPoint P2: pelvis (-0.10527 -0.0243541 0.0573123)
      PathPoint P3: femur_r (-0.0126962 -0.00384498 0.037488)
    Thelen2003Muscle rect_fem_r: max_isometric_force=1169 optimal_fiber_length=0.1195832 tendon_slack_length=0.3251824
        pennation_angle_at_optimal=0.08726646
      PathPoint P1: pelvis (-0.0260306 -0.0274425 0.0844419)
      PathPoint P2: femur_r (0.0286521 -0.430424 0.00162991) range=(-2.61799 -1.45997)
      PathPoint P3: tibia_r socket_x_coordinate=/jointset/knee_r/knee_angle_r
          socket_y_coordinate=/jointset/knee_r/knee_angle_r socket_z_coordinate=/jointset/knee_r/knee_angle_r
        x_location: MultiplierFunction: scale=0.8230521
          SimmSpline: x=(-2.0944 -1.99997 -1.5708 -1.45752 -1.39626 -1.0472 -0.698132 -0.526391 -0.349066 -0.174533 0 0.00017453 0.00034907 0.0279253 0.0872665 0.174533 2.0944)
              y=(0.0155805 0.0179938 0.0275081 0.0296564 0.0307615 0.0365695 0.0422074 0.0450902 0.048391 0.0534299 0.0617576 0.0617669 0.0617762 0.0633083 0.066994 0.0733035 0.0573481)
        y_location: MultiplierFunction: scale=1.118879
          SimmSpline: x=(-2.0944 -1.99997 -1.5708 -1.45752 -1.39626 -1.0472 -0.698132 -0.526391 -0.349066 -0.174533 0 0.00017453 0.00034907 0.0279253 0.0872665 0.174533 2.0944)
              y=(0.0234116 0.0237613 0.0251141 0.0252795 0.0253146 0.0249184 0.0242373 0.0238447 0.0234197 0.0227644 0.020984 0.0209814 0.0209788 0.0205225 0.0191754 0.0159554 -0.0673774)
        z_location: MultiplierFunction: scale=0.8230521
          SimmSpline: x=(-2.0944 0.1745) y=(0.0014 0.0014)
    Thelen2003Muscle vas_med_r: max_isometric_force=1294 optimal_fiber_length=0.09277826 tendon_slack_length=0.131349
        pennation_angle_at_optimal=0.08726646
      PathPoint P1: femur_r (0.0120099 -0.224184 0.0161276)
      PathPoint P2: femur_r (0.0305394 -0.295743 0.000772064)
      PathPoint P3: femur_r (0.0317404 -0.432347 -0.0107231) range=(-2.61799 -1.21004)
      PathPoint P4: femur_r (0.0235051 -0.454455 -0.0112378) range=(-2.61799 -1.78006)
      PathPoint P5: tibia_r socket_x_coordinate=/jointset/knee_r/knee_angle_r
          socket_y_coordinate=/jointset/knee_r/knee_angle_r socket_z_coordinate=/jointset/knee_r/knee_angle_r
        x_location: MultiplierFunction: scale=0.8230521
          SimmSpline: x=(-2.0944 -1.99997 -1.5708 -1.45752 -1.39626 -1.0472 -0.698132 -0.526391 -0.349066 -0.174533 0 0.00017453 0.00034907 0.0279253 0.0872665 0.174533 2.0944)
              y=(0.00981097 0.0122243 0.0217371 0.0238851 0.0249902 0.0307959 0.0364187 0.0392871 0.0425654 0.0475764 0.0559586 0.0559681 0.0559776 0.0575419 0.0613368 0.0679503 0.0629332)
        y_location: MultiplierFunction: scale=1.118879
          SimmSpline: x=(-2.0944 -1.99997 -1.5708 -1.45752 -1.39626 -1.0472 -0.698132 -0.526391 -0.349066 -0.174533 0 0.00017453 0.00034907 0.0279253 0.0872665 0.174533 2.0944)
              y=(0.0224154 0.0227651 0.0241265 0.0242933 0.0243287 0.0239462 0.0233593 0.0230677 0.0228342 0.0226362 0.0217917 0.0217903 0.0217889 0.0215365 0.0206842 0.0183269 -0.0656205)
        z_location: MultiplierFunction: scale=0.8230521
          SimmSpline: x=(-2.0944 2.0944) y=(-0.0146 -0.0146)
    Thelen2003Muscle vas_int_r: max_isometric_force=1365 optimal_fiber_length=0.09153945 tendon_slack_length=0.1430962
        pennation_angle_at_optimal=0.05235988
      PathPoint P1: femur_r (0.0248776 -0.205493 0.0265933)
      PathPoint P2: femur_r (0.0287379 -0.222582 0.0244487)
      PathPoint P3: femur_r (0.0294242 -0.430424 0.00471817) range=(-2.61799 -1.42)
      PathPoint P4: tibia_r socket_x_coordinate=/jointset/knee_r/knee_angle_r
          socket_y_coordinate=/jointset/knee_r/knee_angle_r socket_z_coordinate=/jointset/knee_r/knee_angle_r
        x_location: MultiplierFunction: scale=0.8230521
          SimmSpline: x=(-2.0944 -1.99997 -1.5708 -1.45752 -1.39626 -1.0472 -0.698132 -0.526391 -0.349066 -0.174533 0 0.00017453 0.00034907 0.0279253 0.0872665 0.174533 2.0944)
              y=(0.0082733 0.0106866 0.0202042 0.022353 0.0234583 0.0292715 0.0349465 0.037871 0.0412569 0.0465287 0.0554632 0.0554735 0.0554837 0.0571717 0.061272 0.0684368 0.0648818)
        y_location: MultiplierFunction: scale=1.118879
          SimmSpline: x=(-2.0944 -1.99997 -1.5708 -1.45752 -1.39626 -1.0472 -0.698132 -0.526391 -0.349066 -0.174533 0 0.00017453 0.00034907 0.0279253 0.0872665 0.174533 2.0944)
              y=(0.025599 0.0259487 0.0273124 0.0274796 0.0275151 0.0271363 0.0265737 0.0263073 0.0261187 0.0260129 0.0252923 0.0252911 0.0252898 0.0250526 0.0242191 0.0218288 -0.0685706)
        z_location: MultiplierFunction: scale=0.8230521
          SimmSpline: x=(-2.0944 2.0944) y=(0.0018 0.0018)
    Thelen2003Muscle vas_lat_r: max_isometric_force=1871 optimal_fiber_length=0.08772702 tendon_slack_length=0.163966
        pennation_angle_at_optimal=0.08726646
      PathPoint P1: femur_r (0.00411767 -0.198017 0.0299389)
      PathPoint P2: femur_r (0.0230761 -0.276732 0.035086)
      PathPoint P3: femur_r (0.0309683 -0.430424 0.0175859) range=(-2.61799 -1.21004)
      PathPoint P4: femur_r (0.0217036 -0.453174 0.0157844) range=(-2.61799 -1.92004)
      PathPoint P5: tibia_r socket_x_coordinate=/jointset/knee_r/knee_angle_r
          socket_y_coordinate=/jointset/knee_r/knee_angle_r socket_z_coordinate=/jointset/knee_r/knee_angle_r
        x_location: MultiplierFunction: scale=0.8230521
          SimmSpline: x=(-2.0944 -1.99997 -1.5708 -1.45752 -1.39626 -1.0472 -0.698132 -0.526391 -0.349066 -0.174533 0 0.00017453 0.00034907 0.0279253 0.0872665 0.174533 2.0944)
              y=(0.0142897 0.016703 0.0262145 0.0283623 0.0294674 0.0352709 0.0408785 0.0437291 0.0469704 0.0518742 0.0599557 0.0599647 0.0599738 0.0614577 0.0650351 0.0711867 0.0583766)
        y_location: MultiplierFunction: scale=1.118879
          SimmSpline: x=(-2.0944 -1.99997 -1.5708 -1.45752 -1.39626 -1.0472 -0.698132 -0.526391 -0.349066 -0.174533 0 0.00017453 0.00034907 0.0279253 0.0872665 0.174533 2.0944)
              y=(0.0215318 0.0218815 0.0232362 0.0234019 0.0234371 0.0230439 0.0223842 0.0220151 0.0216359 0.0210971 0.0195864 0.0195842 0.019582 0.01919 0.018008 0.0151073 -0.0653421)
        z_location: MultiplierFunction: scale=0.8230521
          SimmSpline: x=(-2.0944 2.0944) y=(0.0165 0.0165)
    Thelen2003Muscle med_gas_r: max_isometric_force=1558 optimal_fiber_length=0.06639381 tendon_slack_length=0.4315598
        pennation_angle_at_optimal=0.296706
      PathPoint P1: femur_r (-0.0162991 -0.419637 -0.0201594)
      PathPoint P2: femur_r (-0.0257355 -0.42957 -0.0221325) range=(-0.785398 0.174533)
      PathPoint P3: calcn_r (0 0.0272 -0.00465033)
    Thelen2003Muscle lat_gas_r: max_isometric_force=683 optimal_fiber_length=0.07093103 tendon_slack_length=0.421153
        pennation_angle_at_optimal=0.1396263
      PathPoint P1: femur_r (-0.0188727 -0.421453 0.0233335)
      PathPoint P2: femur_r (-0.0257355 -0.429143 0.0235051) range=(-0.785398 0.174533)
      PathPoint P3: calcn_r (0 0.0272 -0.00465033)
    Thelen2003Muscle soleus_r: max_isometric_force=3549 optimal_fiber_length=0.05517565 tendon_slack_length=0.2758783
        pennation_angle_at_optimal=0.4363323
      PathPoint P1: tibia_r (-0.00197533 -0.171524 0.00584367)
      PathPoint P2: calcn_r (0 0.0272 -0.00465033)
    Thelen2003Muscle tib_post_r: max_isometric_force=1588 optimal_fiber_length=0.03342404 tendon_slack_length=0.3342404
        pennation_angle_at_optimal=0.2094395
      PathPoint P1: tibia_r (-0.00773669 -0.150825 0.0015638)
      PathPoint P2: tibia_r (-0.011852 -0.453258 -0.0188479)
      PathPoint P3: calcn_r (0.0347989 0.0293059 -0.0250942)
      PathPoint P4: calcn_r (0.0644239 0.013951 -0.0246555)
    Thelen2003Muscle flex_dig_r: max_isometric_force=310 optimal_fiber_length=0.03350529 tendon_slack_length=0.3941799
        pennation_angle_at_optimal=0.1221731
      PathPoint P1: tibia_r (-0.00683133 -0.228923 -0.00148149)
      PathPoint P2: tibia_r (-0.012675 -0.453258 -0.0161318)
      PathPoint P3: calcn_r (0.0363845 0.0276388 -0.0245678)
      PathPoint P4: calcn_r (0.0590831 0.0154426 -0.0230762)
      PathPoint P5: calcn_r (0.138361 -0.00710711 0.0101781)
      PathPoint P6: toes_r (-0.00158556 -0.00684388 0.0128981)
      PathPoint P7: toes_r (0.0237834 -0.00622969 0.0188645)
      PathPoint P8: toes_r (0.0368017 -0.00526452 0.0212336)
    Thelen2003Muscle flex_hal_r: max_isometric_force=322 optimal_fiber_length=0.04158134 tendon_slack_length=0.367463
        pennation_angle_at_optimal=0.1745329
      PathPoint P1: tibia_r (-0.00650211 -0.261146 0.0200825)
      PathPoint P2: tibia_r (-0.0153088 -0.456391 -0.0143211)
      PathPoint P3: calcn_r (0.0312105 0.0242168 -0.0211458)
      PathPoint P4: calcn_r (0.0866218 0.00596646 -0.022462)
      PathPoint P5: calcn_r (0.144036 -0.00465033 -0.0236026)
      PathPoint P6: toes_r (0.0129348 -0.00561549 -0.0232516)
      PathPoint P7: toes_r (0.0468993 -0.00894969 -0.0158813)
    Thelen2003Muscle tib_ant_r: max_isometric_force=905 optimal_fiber_length=0.1061509 tendon_slack_length=0.2415475
        pennation_angle_at_optimal=0.08726646
      PathPoint P1: tibia_r (0.0147326 -0.181706 0.0094651)
      PathPoint P2: tibia_r (0.0270784 -0.442069 -0.014568)
      PathPoint P3: calcn_r (0.0973034 0.0156181 -0.0267613)
    Thelen2003Muscle per_brev_r: max_isometric_force=435 optimal_fiber_length=0.05299912 tendon_slack_length=0.1706572
        pennation_angle_at_optimal=0.08726646
      PathPoint P1: tibia_r (-0.00576137 -0.296055 0.0267492)
      PathPoint P2: tibia_r (-0.0162964 -0.468139 0.0232924)
      PathPoint P3: tibia_r (-0.011852 -0.480559 0.0237862)
      PathPoint P4: calcn_r (0.0393053 0.0236904 0.0204439)
      PathPoint P5: calcn_r (0.0564961 0.0192155 0.0300955)
    Thelen2003Muscle per_long_r: max_isometric_force=943 optimal_fiber_length=0.05076942 tendon_slack_length=0.3574582
        pennation_angle_at_optimal=0.1745329
      PathPoint P1: tibia_r (0.000411526 -0.17544 0.0297945)
      PathPoint P2: tibia_r (-0.0170372 -0.470489 0.0235393)
      PathPoint P3: tibia_r (-0.0133334 -0.483244 0.0237862)
      PathPoint P4: calcn_r (0.0365514 0.0201807 0.019391)
      PathPoint P5: calcn_r (0.0568299 0.00930066 0.0249187)
      PathPoint P6: calcn_r (0.0710999 0.0060542 0.0103536)
      PathPoint P7: calcn_r (0.100391 0.00745808 -0.0161445)
    Thelen2003Muscle per_tert_r: max_isometric_force=180 optimal_fiber_length=0.0848699 tendon_slack_length=0.1074303
        pennation_angle_at_optimal=0.2268928
      PathPoint P1: tibia_r (0.000823052 -0.313734 0.0190125)
      PathPoint P2: tibia_r (0.0188479 -0.455272 0.0130865)
      PathPoint P3: calcn_r (0.0715172 0.0200052 0.0262349)
    Thelen2003Muscle ext_dig_r: max_isometric_force=512 optimal_fiber_length=0.1043097 tendon_slack_length=0.3528123
        pennation_angle_at_optimal=0.1396263
      PathPoint P1: tibia_r (0.00263377 -0.154517 0.0227162)
      PathPoint P2: tibia_r (0.0237862 -0.448335 0.00592598)
      PathPoint P3: calcn_r (0.0769415 0.0340439 -8.77421e-5)
      PathPoint P4: calcn_r (0.134856 0.00482581 0.0114065)
      PathPoint P5: toes_r (0.000250352 0.00412388 0.0134245)
      PathPoint P6: toes_r (0.0369686 -0.000350968 0.0219355)
    Thelen2003Muscle ext_hal_r: max_isometric_force=162 optimal_fiber_length=0.1119414 tendon_slack_length=0.3075869
        pennation_angle_at_optimal=0.1047198
      PathPoint P1: tibia_r (0.000987663 -0.197706 0.0187656)
      PathPoint P2: tibia_r (0.0268315 -0.445873 -0.00699594)
      PathPoint P3: calcn_r (0.0809471 0.0341317 -0.0185136)
      PathPoint P4: calcn_r (0.107902 0.0271123 -0.0225497)
      PathPoint P5: calcn_r (0.144703 0.0121961 -0.0245678)
      PathPoint P6: toes_r (0.0248683 0.00359742 -0.0214968)
      PathPoint P7: toes_r (0.0469827 0.00298323 -0.01632)
    Thelen2003Muscle glut_med1_l: max_isometric_force=819 optimal_fiber_length=0.04790465
        tendon_slack_length=0.06984229 pennation_angle_at_optimal=0.1396263
      PathPoint P1: pelvis (-0.0360017 0.0268248 -0.105465)
      PathPoint P2: femur_l (-0.0187011 -0.0124962 -0.0476106)
    Thelen2003Muscle glut_med2_l: max_isometric_force=573 optimal_fiber_length=0.0747538 tendon_slack_length=0.046887
        pennation_angle_at_optimal=0
      PathPoint P1: pelvis (-0.0754447 0.0392665 -0.0668208)
      PathPoint P2: femur_l (-0.0221325 -0.00619469 -0.0452086)
    Thelen2003Muscle glut_med3_l: max_isometric_force=653 optimal_fiber_length=0.05692571
        tendon_slack_length=0.04670376 pennation_angle_at_optimal=0.3316126
      PathPoint P1: pelvis (-0.107917 0.00926514 -0.0565272)
      PathPoint P2: femur_l (-0.0265075 -0.00501984 -0.0444366)
    Thelen2003Muscle glut_min1_l: max_isometric_force=270 optimal_fiber_length=0.06089982
        tendon_slack_length=0.01432937 pennation_angle_at_optimal=0.1745329
      PathPoint P1: pelvis (-0.0412078 -0.00705915 -0.0921185)
      PathPoint P2: femur_l (-0.00617651 -0.0111077 -0.0480395)
    Thelen2003Muscle glut_min2_l: max_isometric_force=285 optimal_fiber_length=0.05010659
        tendon_slack_length=0.02326378 pennation_angle_at_optimal=0
      PathPoint P1: pelvis (-0.0558556 -0.00573556 -0.0864483)
      PathPoint P2: femur_l (-0.00823535 -0.0111077 -0.0480395)
    Thelen2003Muscle glut_min3_l: max_isometric_force=323 optimal_fiber_length=0.03371841
        tendon_slack_length=0.04525366 pennation_angle_at_optimal=0.01745329
      PathPoint P1: pelvis (-0.0735917 -0.00555908 -0.0746718)
      PathPoint P2: femur_l (-0.011581 -0.00886482 -0.0471817)
    Thelen2003Muscle semimem_l: max_isometric_force=1288 optimal_fiber_length=0.08684036 tendon_slack_length=0.3896961
        pennation_angle_at_optimal=0.2617994
      PathPoint P1: pelvis (-0.105181 -0.086007 -0.0623806)
      PathPoint P2: tibia_l (-0.0286422 -0.0393734 0.0155639) range=(-0.558505 0.174533)
      PathPoint P3: tibia_l (-0.0222224 -0.0533817 0.0161071)
    Thelen2003Muscle semiten_l: max_isometric_force=410 optimal_fiber_length=0.2174664 tendon_slack_length=0.2764312
        pennation_angle_at_optimal=0.08726646
      PathPoint P1: pelvis (-0.111491 -0.0969575 -0.0526803)
      PathPoint P2: tibia_l (-0.0345929 -0.0319888 0.0187409) range=(-0.331613 0.174533)
      PathPoint P3: tibia_l (-0.0273418 -0.0590992 0.0188314)
      PathPoint P4: tibia_l (-0.00930049 -0.0834684 0.0201648)
      PathPoint P5: tibia_l (0.00222224 -0.106965 0.0158849)
    Thelen2003Muscle bifemlh_l: max_isometric_force=896 optimal_fiber_length=0.1184379 tendon_slack_length=0.3542272
        pennation_angle_at_optimal=0
      PathPoint P1: pelvis (-0.111146 -0.0905072 -0.0605749)
      PathPoint P2: tibia_l (-0.0247739 -0.0402797 -0.0242224)
      PathPoint P3: tibia_l (-0.0192594 -0.0629929 -0.0282307)
    Thelen2003Muscle bifemsh_l: max_isometric_force=804 optimal_fiber_length=0.1851823 tendon_slack_length=0.09526722
        pennation_angle_at_optimal=0.4014257
      PathPoint P1: femur_l (0.00428924 -0.225465 -0.0200737)
      PathPoint P2: tibia_l (-0.0247739 -0.0402797 -0.0242224)
      PathPoint P3: tibia_l (-0.0192594 -0.0629929 -0.0282307)
    Thelen2003Muscle sar_l: max_isometric_force=156 optimal_fiber_length=0.5397349 tendon_slack_length=0.1037952
        pennation_angle_at_optimal=0
      PathPoint P1: pelvis (-0.0135006 -0.00114711 -0.108344)
      PathPoint P2: femur_l (-0.00257355 -0.38108 0.0361154)
      PathPoint P3: tibia_l (-0.00460909 -0.046881 0.0328398)
      PathPoint P4: tibia_l (0.00493831 -0.065902 0.0315229)
      PathPoint P5: tibia_l (0.0200002 -0.0939859 0.0207409)
    Thelen2003Muscle add_long_l: max_isometric_force=627 optimal_fiber_length=0.1443343 tendon_slack_length=0.1150491
        pennation_angle_at_optimal=0.1047198
      PathPoint P1: pelvis (-0.0278837 -0.0737682 -0.0147424)
      PathPoint P2: femur_l (0.00428924 -0.225465 -0.0200737)
    Thelen2003Muscle add_brev_l: max_isometric_force=429 optimal_fiber_length=0.1326204 tendon_slack_length=0.01994291
        pennation_angle_at_optimal=0
      PathPoint P1: pelvis (-0.0517965 -0.0807391 -0.0143063)
      PathPoint P2: femur_l (0.000772064 -0.127739 -0.0252207)
    Thelen2003Muscle add_mag1_l: max_isometric_force=381 optimal_fiber_length=0.08731901 tendon_slack_length=0.06022001
        pennation_angle_at_optimal=0.08726646
      PathPoint P1: pelvis (-0.0645913 -0.103593 -0.0222445)
      PathPoint P2: femur_l (-0.00386032 -0.129341 -0.0290811)
    Thelen2003Muscle add_mag2_l: max_isometric_force=343 optimal_fiber_length=0.131479 tendon_slack_length=0.1303924
        pennation_angle_at_optimal=0.05235988
      PathPoint P1: pelvis (-0.073327 -0.105181 -0.0268679)
      PathPoint P2: femur_l (0.00463238 -0.24405 -0.0194732)
    Thelen2003Muscle add_mag3_l: max_isometric_force=488 optimal_fiber_length=0.1428841 tendon_slack_length=0.271589
        pennation_angle_at_optimal=0.08726646
      PathPoint P1: pelvis (-0.0980163 -0.100708 -0.0425873)
      PathPoint P2: femur_l (0.00600494 -0.409811 0.0228188)
    Thelen2003Muscle tfl_l: max_isometric_force=233 optimal_fiber_length=0.09880501 tendon_slack_length=0.4420224
        pennation_angle_at_optimal=0.05235988
      PathPoint P1: pelvis (-0.0274425 0.0188832 -0.108257)
      PathPoint P2: femur_l (0.0252207 -0.106271 -0.0512136)
      PathPoint P3: femur_l (0.00463238 -0.432454 -0.0306252)
      PathPoint P4: tibia_l (0.00493831 -0.0544894 -0.0244446)
    Thelen2003Muscle pect_l: max_isometric_force=266 optimal_fiber_length=0.09833403 tendon_slack_length=0.03245023
        pennation_angle_at_optimal=0
      PathPoint P1: pelvis (-0.0380312 -0.0677679 -0.0393423)
      PathPoint P2: femur_l (-0.0104658 -0.0877937 -0.0217036)
    Thelen2003Muscle grac_l: max_isometric_force=162 optimal_fiber_length=0.3825507 tendon_slack_length=0.1369358
        pennation_angle_at_optimal=0.05235988
      PathPoint P1: pelvis (-0.065306 -0.10474 -0.024373)
      PathPoint P2: tibia_l (-0.0218685 -0.0356922 0.031062) range=(-0.436332 0.174533)
      PathPoint P3: tibia_l (-0.0159919 -0.0576558 0.0294653)
      PathPoint P4: tibia_l (0.00493831 -0.0935383 0.0187656)
    Thelen2003Muscle glut_max1_l: max_isometric_force=573 optimal_fiber_length=0.1317114 tendon_slack_length=0.1159431
        pennation_angle_at_optimal=0.08726646
      PathPoint P1: pelvis (-0.105446 0.0540025 -0.0610634)
      PathPoint P2: pelvis (-0.113917 0.00105887 -0.0772888)
      PathPoint P3: femur_l (-0.0392037 -0.0264877 -0.0336277)
      PathPoint P4: femur_l (-0.0237624 -0.0604517 -0.0403189)
    Thelen2003Muscle glut_max2_l: max_isometric_force=819 optimal_fiber_length=0.1413112 tendon_slack_length=0.1220852
        pennation_angle_at_optimal=0
      PathPoint P1: pelvis (-0.119035 0.0155301 -0.0491124)
      PathPoint P2: pelvis (-0.121417 -0.0458845 -0.0797313)
      PathPoint P3: femur_l (-0.0365444 -0.0566067 -0.025135)
      PathPoint P4: femur_l (-0.0133824 -0.108514 -0.0359439)
    Thelen2003Muscle glut_max3_l: max_isometric_force=552 optimal_fiber_length=0.1381372 tendon_slack_length=0.1390964
        pennation_angle_at_optimal=0.08726646
      PathPoint P1: pelvis (-0.137301 -0.0277072 -0.00505954)
      PathPoint P2: pelvis (-0.134918 -0.0928279 -0.0351551)
      PathPoint P3: femur_l (-0.0256497 -0.111184 -0.011581)
      PathPoint P4: femur_l (-0.00514709 -0.151556 -0.0352576)
    Thelen2003Muscle iliacus_l: max_isometric_force=1073 optimal_fiber_length=0.09187246 tendon_slack_length=0.09187246
        pennation_angle_at_optimal=0.1221731
      PathPoint P1: pelvis (-0.0594734 0.0322074 -0.0744973)
      PathPoint P2: pelvis (-0.0227658 -0.0485317 -0.0707463)
      PathPoint P3: pelvis (-0.025413 -0.0710327 -0.0711825) range=(-1.5708 0.785398)
      PathPoint P4: femur_l (0.00145834 -0.0579951 -0.00488974)
      PathPoint P5: femur_l (-0.0165565 -0.0663259 -0.0110662)
    Thelen2003Muscle psoas_l: max_isometric_force=1113 optimal_fiber_length=0.09085087 tendon_slack_length=0.1453614
        pennation_angle_at_optimal=0.1396263
      PathPoint P1: pelvis (-0.0570909 0.0782684 -0.0252105)
      PathPoint P2: pelvis (-0.021001 -0.0502965 -0.0662102)
      PathPoint P3: pelvis (-0.025413 -0.0710327 -0.0711825) range=(-1.5708 0.785398)
      PathPoint P4: femur_l (0.00137256 -0.0541502 -0.00325982)
      PathPoint P5: femur_l (-0.0161276 -0.0637626 -0.00892163)
    Thelen2003Muscle quad_fem_l: max_isometric_force=381 optimal_fiber_length=0.04607884 tendon_slack_length=0.02252743
        pennation_angle_at_optimal=0
      PathPoint P1: pelvis (-0.100858 -0.101564 -0.0453614)
      PathPoint P2: femur_l (-0.032684 -0.038343 -0.0313973)
    Thelen2003Muscle gem_l: max_isometric_force=164 optimal_fiber_length=0.02079838 tendon_slack_length=0.03379737
        pennation_angle_at_optimal=0
      PathPoint P1: pelvis (-0.0999753 -0.0723563 -0.0622847)
      PathPoint P2: femur_l (-0.0121815 -0.00352457 -0.0380027)
    Thelen2003Muscle peri_l: max_isometric_force=444 optimal_fiber_length=0.0227971 tendon_slack_length=0.1008333
        pennation_angle_at_optimal=0.1745329
      PathPoint P1: pelvis (-0.123182 0.000264718 -0.0204999)
      PathPoint P2: pelvis (-0.10527 -0.0243541 -0.0573123)
      PathPoint P3: femur_l (-0.0126962 -0.00384498 -0.037488)
    Thelen2003Muscle rect_fem_l: max_isometric_force=1169 optimal_fiber_length=0.1195832 tendon_slack_length=0.3251824
        pennation_angle_at_optimal=0.08726646
      PathPoint P1: pelvis (-0.0260306 -0.0274425 -0.0844419)
      PathPoint P2: femur_l (0.0286521 -0.430424 -0.00162991) range=(-2.61799 -1.45997)
      PathPoint P3: tibia_l socket_x_coordinate=/jointset/knee_l/knee_angle_l
          socket_y_coordinate=/jointset/knee_l/knee_angle_l socket_z_coordinate=/jointset/knee_l/knee_angle_l
        x_location: MultiplierFunction: scale=0.8230521
          SimmSpline: x=(-2.0944 -1.99997 -1.5708 -1.45752 -1.39626 -1.0472 -0.698132 -0.526391 -0.349066 -0.174533 0 0.00017453 0.00034907 0.0279253 0.0872665 0.174533 2.0944)
              y=(0.0155805 0.0179938 0.0275081 0.0296564 0.0307615 0.0365695 0.0422074 0.0450902 0.048391 0.0534299 0.0617576 0.0617669 0.0617762 0.0633083 0.066994 0.0733035 0.0573481)
        y_location: MultiplierFunction: scale=1.118879
          SimmSpline: x=(-2.0944 -1.99997 -1.5708 -1.45752 -1.39626 -1.0472 -0.698132 -0.526391 -0.349066 -0.174533 0 0.00017453 0.00034907 0.0279253 0.0872665 0.174533 2.0944)
              y=(0.0234116 0.0237613 0.0251141 0.0252795 0.0253146 0.0249184 0.0242373 0.0238447 0.0234197 0.0227644 0.020984 0.0209814 0.0209788 0.0205225 0.0191754 0.0159554 -0.0673774)
        z_location: MultiplierFunction: scale=0.8230521
          SimmSpline: x=(-2.0944 0.1745) y=(-0.0014 -0.0014)
    Thelen2003Muscle vas_med_l: max_isometric_force=1294 optimal_fiber_length=0.09277826 tendon_slack_length=0.131349
        pennation_angle_at_optimal=0.08726646
      PathPoint P1: femur_l (0.0120099 -0.224184 -0.0161276)
      PathPoint P2: femur_l (0.0305394 -0.295743 -0.000772064)
      PathPoint P3: femur_l (0.0317404 -0.432347 0.0107231) range=(-2.61799 -1.21004)
      PathPoint P4: femur_l (0.0235051 -0.454455 0.0112378) range=(-2.61799 -1.78006)
      PathPoint P5: tibia_l socket_x_coordinate=/jointset/knee_l/knee_angle_l
          socket_y_coordinate=/jointset/knee_l/knee_angle_l socket_z_coordinate=/jointset/knee_l/knee_angle_l
        x_location: MultiplierFunction: scale=0.8230521
          SimmSpline: x=(-2.0944 -1.99997 -1.5708 -1.45752 -1.39626 -1.0472 -0.698132 -0.526391 -0.349066 -0.174533 0 0.00017453 0.00034907 0.0279253 0.0872665 0.174533 2.0944)
              y=(0.00981097 0.0122243 0.0217371 0.0238851 0.0249902 0.0307959 0.0364187 0.0392871 0.0425654 0.0475764 0.0559586 0.0559681 0.0559776 0.0575419 0.0613368 0.0679503 0.0629332)
        y_location: MultiplierFunction: scale=1.118879
          SimmSpline: x=(-2.0944 -1.99997 -1.5708 -1.45752 -1.39626 -1.0472 -0.698132 -0.526391 -0.349066 -0.174533 0 0.00017453 0.00034907 0.0279253 0.0872665 0.174533 2.0944)
              y=(0.0224154 0.0227651 0.0241265 0.0242933 0.0243287 0.0239462 0.0233593 0.0230677 0.0228342 0.0226362 0.0217917 0.0217903 0.0217889 0.0215365 0.0206842 0.0183269 -0.0656205)
        z_location: MultiplierFunction: scale=0.8230521
          SimmSpline: x=(-2.0944 2.0944) y=(0.0146 0.0146)
    Thelen2003Muscle vas_int_l: max_isometric_force=1365 optimal_fiber_length=0.09151221 tendon_slack_length=0.1430536
        pennation_angle_at_optimal=0.05235988
      PathPoint P1: femur_l (0.0248776 -0.205493 -0.0265933)
      PathPoint P2: femur_l (0.0287379 -0.222582 -0.0244487)
      PathPoint P3: femur_l (0.0294242 -0.430424 -0.00471817) range=(-2.61799 -1.42)
      PathPoint P4: tibia_l socket_x_coordinate=/jointset/knee_l/knee_angle_l
          socket_y_coordinate=/jointset/knee_l/knee_angle_l socket_z_coordinate=/jointset/knee_l/knee_angle_l
        x_location: MultiplierFunction: scale=0.8230521
          SimmSpline: x=(-2.0944 -1.99997 -1.5708 -1.45752 -1.39626 -1.0472 -0.698132 -0.526391 -0.349066 -0.174533 0 0.00017453 0.00034907 0.0279253 0.0872665 0.174533 2.0944)
              y=(0.0155805 0.0179938 0.0275081 0.0296564 0.0307615 0.0365695 0.0422074 0.0450902 0.048391 0.0534299 0.0617576 0.0617669 0.0617762 0.0633083 0.066994 0.0733035 0.0573481)
        y_location: MultiplierFunction: scale=1.118879
          SimmSpline: x=(-2.0944 -1.99997 -1.5708 -1.45752 -1.39626 -1.0472 -0.698132 -0.526391 -0.349066 -0.174533 0 0.00017453 0.00034907 0.0279253 0.0872665 0.174533 2.0944)
              y=(0.0234116 0.0237613 0.0251141 0.0252795 0.0253146 0.0249184 0.0242373 0.0238447 0.0234197 0.0227644 0.020984 0.0209814 0.0209788 0.0205225 0.0191754 0.0159554 -0.0673774)
        z_location: MultiplierFunction: scale=0.8230521
          SimmSpline: x=(-2.0944 0.1745) y=(-0.0014 -0.0014)
    Thelen2003Muscle vas_lat_l: max_isometric_force=1871 optimal_fiber_length=0.08772702 tendon_slack_length=0.163966
        pennation_angle_at_optimal=0.08726646
      PathPoint P1: femur_l (0.00411767 -0.198017 -0.0299389)
      PathPoint P2: femur_l (0.0230761 -0.276732 -0.035086)
      PathPoint P3: femur_l (0.0309683 -0.430424 -0.0175859) range=(-2.61799 -1.21004)
      PathPoint P4: femur_l (0.0217036 -0.453174 -0.0157844) range=(-2.61799 -1.92004)
      PathPoint P5: tibia_l socket_x_coordinate=/jointset/knee_l/knee_angle_l
          socket_y_coordinate=/jointset/knee_l/knee_angle_l socket_z_coordinate=/jointset/knee_l/knee_angle_l
        x_location: MultiplierFunction: scale=0.8230521
          SimmSpline: x=(-2.0944 -1.99997 -1.5708 -1.45752 -1.39626 -1.0472 -0.698132 -0.526391 -0.349066 -0.174533 0 0.00017453 0.00034907 0.0279253 0.0872665 0.174533 2.0944)
              y=(0.0142897 0.016703 0.0262145 0.0283623 0.0294674 0.0352709 0.0408785 0.0437291 0.0469704 0.0518742 0.0599557 0.0599647 0.0599738 0.0614577 0.0650351 0.0711867 0.0583766)
        y_location: MultiplierFunction: scale=1.118879
          SimmSpline: x=(-2.0944 -1.99997 -1.5708 -1.45752 -1.39626 -1.0472 -0.698132 -0.526391 -0.349066 -0.174533 0 0.00017453 0.00034907 0.0279253 0.0872665 0.174533 2.0944)
              y=(0.0215318 0.0218815 0.0232362 0.0234019 0.0234371 0.0230439 0.0223842 0.0220151 0.0216359 0.0210971 0.0195864 0.0195842 0.019582 0.01919 0.018008 0.0151073 -0.0653421)
        z_location: MultiplierFunction: scale=0.8230521
          SimmSpline: x=(-2.0944 2.0944) y=(-0.0165 -0.0165)
    Thelen2003Muscle med_gas_l: max_isometric_force=1558 optimal_fiber_length=0.06639381 tendon_slack_length=0.4315598
        pennation_angle_at_optimal=0.296706
      PathPoint P1: femur_l (-0.0162991 -0.419637 0.0201594)
      PathPoint P2: femur_l (-0.0257355 -0.42957 0.0221325) range=(-0.785398 0.174533)
      PathPoint P3: calcn_l (0 0.0272 0.00465033)
    Thelen2003Muscle lat_gas_l: max_isometric_force=683 optimal_fiber_length=0.07093103 tendon_slack_length=0.421153
        pennation_angle_at_optimal=0.1396263
      PathPoint P1: femur_l (-0.0188727 -0.421453 -0.0233335)
      PathPoint P2: femur_l (-0.0257355 -0.429143 -0.0235051) range=(-0.785398 0.174533)
      PathPoint P3: calcn_l (0 0.0272 0.00465033)
    Thelen2003Muscle soleus_l: max_isometric_force=3549 optimal_fiber_length=0.05517565 tendon_slack_length=0.2758783
        pennation_angle_at_optimal=0.4363323
      PathPoint P1: tibia_l (-0.00197533 -0.171524 -0.00584367)
      PathPoint P2: calcn_l (0 0.0272 0.00465033)
    Thelen2003Muscle tib_post_l: max_isometric_force=1588 optimal_fiber_length=0.03342404 tendon_slack_length=0.3342404
        pennation_angle_at_optimal=0.2094395
      PathPoint P1: tibia_l (-0.00773669 -0.150825 -0.0015638)
      PathPoint P2: tibia_l (-0.011852 -0.453258 0.0188479)
      PathPoint P3: calcn_l (0.0347989 0.0293059 0.0250942)
      PathPoint P4: calcn_l (0.0644239 0.013951 0.0246555)
    Thelen2003Muscle flex_dig_l: max_isometric_force=310 optimal_fiber_length=0.03350529 tendon_slack_length=0.3941799
        pennation_angle_at_optimal=0.1221731
      PathPoint P1: tibia_l (-0.00683133 -0.228923 0.00148149)
      PathPoint P2: tibia_l (-0.012675 -0.453258 0.0161318)
      PathPoint P3: calcn_l (0.0363845 0.0276388 0.0245678)
      PathPoint P4: calcn_l (0.0590831 0.0154426 0.0230762)
      PathPoint P5: calcn_l (0.138361 -0.00710711 -0.0101781)
      PathPoint P6: toes_l (-0.00158556 -0.00684388 -0.0128981)
      PathPoint P7: toes_l (0.0237834 -0.00622969 -0.0188645)
      PathPoint P8: toes_l (0.0368017 -0.00526452 -0.0212336)
    Thelen2003Muscle flex_hal_l: max_isometric_force=322 optimal_fiber_length=0.04158134 tendon_slack_length=0.367463
        pennation_angle_at_optimal=0.1745329
      PathPoint P1: tibia_l (-0.00650211 -0.261146 -0.0200825)
      PathPoint P2: tibia_l (-0.0153088 -0.456391 0.0143211)
      PathPoint P3: calcn_l (0.0312105 0.0242168 0.0211458)
      PathPoint P4: calcn_l (0.0866218 0.00596646 0.022462)
      PathPoint P5: calcn_l (0.144036 -0.00465033 0.0236026)
      PathPoint P6: toes_l (0.0129348 -0.00561549 0.0232516)
      PathPoint P7: toes_l (0.0468993 -0.00894969 0.0158813)
    Thelen2003Muscle tib_ant_l: max_isometric_force=905 optimal_fiber_length=0.1061509 tendon_slack_length=0.2415475
        pennation_angle_at_optimal=0.08726646
      PathPoint P1: tibia_l (0.0147326 -0.181706 -0.0094651)
      PathPoint P2: tibia_l (0.0270784 -0.442069 0.014568)
      PathPoint P3: calcn_l (0.0973034 0.0156181 0.0267613)
    Thelen2003Muscle per_brev_l: max_isometric_force=435 optimal_fiber_length=0.05299912 tendon_slack_length=0.1706572
        pennation_angle_at_optimal=0.08726646
      PathPoint P1: tibia_l (-0.00576137 -0.296055 -0.0267492)
      PathPoint P2: tibia_l (-0.0162964 -0.468139 -0.0232924)
      PathPoint P3: tibia_l (-0.011852 -0.480559 -0.0237862)
      PathPoint P4: calcn_l (0.0393053 0.0236904 -0.0204439)
      PathPoint P5: calcn_l (0.0564961 0.0192155 -0.0300955)
    Thelen2003Muscle per_long_l: max_isometric_force=943 optimal_fiber_length=0.05076942 tendon_slack_length=0.3574582
        pennation_angle_at_optimal=0.1745329
      PathPoint P1: tibia_l (0.000411526 -0.17544 -0.0297945)
      PathPoint P2: tibia_l (-0.0170372 -0.470489 -0.0235393)
      PathPoint P3: tibia_l (-0.0133334 -0.483244 -0.0237862)
      PathPoint P4: calcn_l (0.0365514 0.0201807 -0.019391)
      PathPoint P5: calcn_l (0.0568299 0.00930066 -0.0249187)
      PathPoint P6: calcn_l (0.0710999 0.0060542 -0.0103536)
      PathPoint P7: calcn_l (0.100391 0.00745808 0.0161445)
    Thelen2003Muscle per_tert_l: max_isometric_force=180 optimal_fiber_length=0.0848699 tendon_slack_length=0.1074303
        pennation_angle_at_optimal=0.2268928
      PathPoint P1: tibia_l (0.000823052 -0.313734 -0.0190125)
      PathPoint P2: tibia_l (0.0188479 -0.455272 -0.0130865)
      PathPoint P3: calcn_l (0.0715172 0.0200052 -0.0262349)
    Thelen2003Muscle ext_dig_l: max_isometric_force=512 optimal_fiber_length=0.1043097 tendon_slack_length=0.3528123
        pennation_angle_at_optimal=0.1396263
      PathPoint P1: tibia_l (0.00263377 -0.154517 -0.0227162)
      PathPoint P2: tibia_l (0.0237862 -0.448335 -0.00592598)
      PathPoint P3: calcn_l (0.0769415 0.0340439 8.77421e-5)
      PathPoint P4: calcn_l (0.134856 0.00482581 -0.0114065)
      PathPoint P5: toes_l (0.000250352 0.00412388 -0.0134245)
      PathPoint P6: toes_l (0.0369686 -0.000350968 -0.0219355)
    Thelen2003Muscle ext_hal_l: max_isometric_force=162 optimal_fiber_length=0.1119414 tendon_slack_length=0.3075869
        pennation_angle_at_optimal=0.1047198
      PathPoint P1: tibia_l (0.000987663 -0.197706 -0.0187656)
      PathPoint P2: tibia_l (0.0268315 -0.445873 0.00699594)
      PathPoint P3: calcn_l (0.0809471 0.0341317 0.0185136)
      PathPoint P4: calcn_l (0.107902 0.0271123 0.0225497)
      PathPoint P5: calcn_l (0.144703 0.0121961 0.0245678)
      PathPoint P6: toes_l (0.0248683 0.00359742 0.0214968)
      PathPoint P7: toes_l (0.0469827 0.00298323 0.01632)
    CoordinateLimitForce [values shared by the 33 below unless stated]: damping=0.01745329 transition=1
        compute_dissipation_energy=false
    CoordinateLimitForce hip_flexion_r_limit_force: coordinate=hip_flexion_r upper_stiffness=8.726646
        upper_limit=86.50309 lower_stiffness=8.726646 lower_limit=-22.31005
    SpringGeneralizedForce hip_flexion_r_spring_force: coordinate=hip_flexion_r stiffness=0 viscosity=0.1
    CoordinateLimitForce hip_adduction_r_limit_force: coordinate=hip_adduction_r upper_stiffness=8.726646
        upper_limit=10.28941 lower_stiffness=8.726646 lower_limit=-23.10085
    SpringGeneralizedForce hip_adduction_r_spring_force: coordinate=hip_adduction_r stiffness=0 viscosity=0.1
    CoordinateLimitForce hip_rotation_r_limit_force: coordinate=hip_rotation_r upper_stiffness=8.726646
        upper_limit=9.339925 lower_stiffness=8.726646 lower_limit=-22.34988
    SpringGeneralizedForce hip_rotation_r_spring_force: coordinate=hip_rotation_r stiffness=0 viscosity=0.1
    CoordinateLimitForce knee_angle_r_limit_force: coordinate=knee_angle_r upper_stiffness=8.726646 upper_limit=0
        lower_stiffness=8.726646 lower_limit=-142.4429
    SpringGeneralizedForce knee_angle_r_spring_force: coordinate=knee_angle_r stiffness=0 viscosity=0.1
    CoordinateLimitForce ankle_angle_r_limit_force: coordinate=ankle_angle_r upper_stiffness=8.726646
        upper_limit=26.27021 lower_stiffness=8.726646 lower_limit=-43.94265
    SpringGeneralizedForce ankle_angle_r_spring_force: coordinate=ankle_angle_r stiffness=0 viscosity=0.1
    CoordinateLimitForce subtalar_angle_r_limit_force: coordinate=subtalar_angle_r upper_stiffness=8.726646
        upper_limit=12.46985 lower_stiffness=8.726646 lower_limit=-19.43431
    SpringGeneralizedForce subtalar_angle_r_spring_force: coordinate=subtalar_angle_r stiffness=0 viscosity=0.1
    CoordinateLimitForce mtp_angle_r_limit_force: coordinate=mtp_angle_r upper_stiffness=8.726646 upper_limit=65
        lower_stiffness=8.726646 lower_limit=-45.00006
    SpringGeneralizedForce mtp_angle_r_spring_force: coordinate=mtp_angle_r stiffness=65 viscosity=0.4
    CoordinateLimitForce hip_flexion_l_limit_force: coordinate=hip_flexion_l upper_stiffness=8.726646
        upper_limit=86.50309 lower_stiffness=8.726646 lower_limit=-22.31005
    SpringGeneralizedForce hip_flexion_l_spring_force: coordinate=hip_flexion_l stiffness=0 viscosity=0.1
    CoordinateLimitForce hip_adduction_l_limit_force: coordinate=hip_adduction_l upper_stiffness=8.726646
        upper_limit=10.28941 lower_stiffness=8.726646 lower_limit=-23.10085
    SpringGeneralizedForce hip_adduction_l_spring_force: coordinate=hip_adduction_l stiffness=0 viscosity=0.1
    CoordinateLimitForce hip_rotation_l_limit_force: coordinate=hip_rotation_l upper_stiffness=8.726646
        upper_limit=9.339925 lower_stiffness=8.726646 lower_limit=-22.34988
    SpringGeneralizedForce hip_rotation_l_spring_force: coordinate=hip_rotation_l stiffness=0 viscosity=0.1
    CoordinateLimitForce knee_angle_l_limit_force: coordinate=knee_angle_l upper_stiffness=8.726646 upper_limit=0
        lower_stiffness=8.726646 lower_limit=-142.4429
    SpringGeneralizedForce knee_angle_l_spring_force: coordinate=knee_angle_l stiffness=0 viscosity=0.1
    CoordinateLimitForce ankle_angle_l_limit_force: coordinate=ankle_angle_l upper_stiffness=8.726646
        upper_limit=26.27021 lower_stiffness=8.726646 lower_limit=-43.94265
    SpringGeneralizedForce ankle_angle_l_spring_force: coordinate=ankle_angle_l stiffness=0 viscosity=0.1
    CoordinateLimitForce subtalar_angle_l_limit_force: coordinate=subtalar_angle_l upper_stiffness=8.726646
        upper_limit=12.46985 lower_stiffness=8.726646 lower_limit=-19.43431
    SpringGeneralizedForce subtalar_angle_l_spring_force: coordinate=subtalar_angle_l stiffness=0 viscosity=0.1
    CoordinateLimitForce mtp_angle_l_limit_force: coordinate=mtp_angle_l upper_stiffness=8.726646 upper_limit=65
        lower_stiffness=8.726646 lower_limit=-45.00006
    SpringGeneralizedForce mtp_angle_l_spring_force: coordinate=mtp_angle_l stiffness=65 viscosity=0.4
    SpringGeneralizedForce lumbar_bending_spring_force: coordinate=lumbar_bending stiffness=10 viscosity=1
    CoordinateLimitForce lumbar_bending_limit_force: coordinate=lumbar_bending upper_stiffness=8.726646 upper_limit=30
        lower_stiffness=8.726646 lower_limit=-30
    SpringGeneralizedForce lumbar_extension_spring_force: coordinate=lumbar_extension stiffness=10 viscosity=1
    CoordinateLimitForce lumbar_extension_limit_force: coordinate=lumbar_extension upper_stiffness=8.726646
        upper_limit=28.25 lower_stiffness=8.726646 lower_limit=-67.75
    SpringGeneralizedForce lumbar_rotation_spring_force: coordinate=lumbar_rotation stiffness=10 viscosity=1
    CoordinateLimitForce lumbar_rotation_limit_force: coordinate=lumbar_rotation upper_stiffness=8.726646
        upper_limit=15 lower_stiffness=8.726646 lower_limit=-15
    SpringGeneralizedForce thorax_bending_spring_force: coordinate=thorax_bending stiffness=5000 viscosity=10
    CoordinateLimitForce thorax_bending_limit_force: coordinate=thorax_bending upper_stiffness=8.726646 upper_limit=30
        lower_stiffness=8.726646 lower_limit=-30
    SpringGeneralizedForce thorax_extension_spring_force: coordinate=thorax_extension stiffness=5000 viscosity=10
    CoordinateLimitForce thorax_extension_limit_force: coordinate=thorax_extension upper_stiffness=8.726646
        upper_limit=62.25 lower_stiffness=8.726646 lower_limit=14.25
    SpringGeneralizedForce thorax_rotation_spring_force: coordinate=thorax_rotation stiffness=5000 viscosity=10
    CoordinateLimitForce thorax_rotation_limit_force: coordinate=thorax_rotation upper_stiffness=8.726646
        upper_limit=47 lower_stiffness=8.726646 lower_limit=-47
    SpringGeneralizedForce cervical_bending_spring_force: coordinate=cervical_bending stiffness=1000 viscosity=10
    CoordinateLimitForce cervical_bending_limit_force: coordinate=cervical_bending upper_stiffness=8.726646
        upper_limit=49 lower_stiffness=8.726646 lower_limit=-49
    SpringGeneralizedForce cervical_extension_spring_force: coordinate=cervical_extension stiffness=1000 viscosity=10
    CoordinateLimitForce cervical_extension_limit_force: coordinate=cervical_extension upper_stiffness=8.726646
        upper_limit=49.75 lower_stiffness=8.726646 lower_limit=-77.25
    SpringGeneralizedForce cervical_rotation_spring_force: coordinate=cervical_rotation stiffness=1000 viscosity=10
    CoordinateLimitForce cervical_rotation_limit_force: coordinate=cervical_rotation upper_stiffness=8.726646
        upper_limit=85 lower_stiffness=8.726646 lower_limit=-85
    SpringGeneralizedForce shoulder_flexion_r_spring_force: coordinate=shoulder_flexion_r stiffness=0.01 viscosity=0.1
    CoordinateLimitForce shoulder_flexion_r_limit_force: coordinate=shoulder_flexion_r upper_stiffness=3.49066
        upper_limit=180 lower_stiffness=3.49066 lower_limit=-75
    SpringGeneralizedForce shoulder_abduction_r_spring_force: coordinate=shoulder_abduction_r stiffness=0.01
        viscosity=0.1
    CoordinateLimitForce shoulder_abduction_r_limit_force: coordinate=shoulder_abduction_r upper_stiffness=3.49066
        upper_limit=25 lower_stiffness=3.49066 lower_limit=-15
    SpringGeneralizedForce shoulder_rotation_r_spring_force: coordinate=shoulder_rotation_r stiffness=0.01
        viscosity=0.1
    CoordinateLimitForce shoulder_rotation_r_limit_force: coordinate=shoulder_rotation_r upper_stiffness=3.49066
        upper_limit=15 lower_stiffness=3.49066 lower_limit=-15
    SpringGeneralizedForce shoulder_flexion_l_spring_force: coordinate=shoulder_flexion_l stiffness=0.01 viscosity=0.1
    CoordinateLimitForce shoulder_flexion_l_limit_force: coordinate=shoulder_flexion_l upper_stiffness=3.49066
        upper_limit=180 lower_stiffness=3.49066 lower_limit=-75
    SpringGeneralizedForce shoulder_abduction_l_spring_force: coordinate=shoulder_abduction_l stiffness=0.01
        viscosity=0.1
    CoordinateLimitForce shoulder_abduction_l_limit_force: coordinate=shoulder_abduction_l upper_stiffness=3.49066
        upper_limit=25 lower_stiffness=3.49066 lower_limit=-15
    SpringGeneralizedForce shoulder_rotation_l_spring_force: coordinate=shoulder_rotation_l stiffness=0.01
        viscosity=0.1
    CoordinateLimitForce shoulder_rotation_l_limit_force: coordinate=shoulder_rotation_l upper_stiffness=3.49066
        upper_limit=15 lower_stiffness=3.49066 lower_limit=-15
    SpringGeneralizedForce elbow_flex_r_spring_force: coordinate=elbow_flex_r stiffness=0.01 viscosity=0.1
    CoordinateLimitForce elbow_flex_r_limit_force: coordinate=elbow_flex_r upper_stiffness=3.49066 upper_limit=150
        lower_stiffness=3.49066 lower_limit=0
    SpringGeneralizedForce elbow_flex_l_spring_force: coordinate=elbow_flex_l stiffness=0.01 viscosity=0.1
    CoordinateLimitForce elbow_flex_l_limit_force: coordinate=elbow_flex_l upper_stiffness=3.49066 upper_limit=150
        lower_stiffness=3.49066 lower_limit=0
    SpringGeneralizedForce pro_sup_r_spring_force: coordinate=pro_sup_r stiffness=0.01 viscosity=0.1
    CoordinateLimitForce pro_sup_r_limit_force: coordinate=pro_sup_r upper_stiffness=3.49066 upper_limit=90
        lower_stiffness=3.49066 lower_limit=0
    SpringGeneralizedForce pro_sup_l_spring_force: coordinate=pro_sup_l stiffness=0.01 viscosity=0.1
    CoordinateLimitForce pro_sup_l_limit_force: coordinate=pro_sup_l upper_stiffness=3.49066 upper_limit=90
        lower_stiffness=3.49066 lower_limit=0
    ActivationCoordinateActuator mtp_angle_r_motor: coordinate=mtp_angle_r optimal_force=-40
        activation_time_constant=0.035 default_activation=0.5
    ActivationCoordinateActuator mtp_angle_l_motor: coordinate=mtp_angle_l optimal_force=-40
        activation_time_constant=0.035 default_activation=0.5
  ContactGeometrySet:
    ContactSphere right_foot_1: socket_frame=/bodyset/toes_r location=(0.0699 -0.0299 -0.0286) radius=0.02
    ContactSphere right_foot_2: socket_frame=/bodyset/toes_r location=(0.0294 -0.0299 1.521175e-8) radius=0.02
    ContactSphere right_foot_3: socket_frame=/bodyset/calcn_r location=(0.1499 -0.0282 6.884226e-8) radius=0.02
    ContactSphere right_foot_4: socket_frame=/bodyset/calcn_r location=(0.1499 -0.0282 -0.02272616) radius=0.02
    ContactSphere right_foot_5: socket_frame=/bodyset/calcn_r location=(0.07 -0.0282 0.0449) radius=0.02
    ContactSphere right_foot_6: socket_frame=/bodyset/calcn_r location=(0.119 -0.0282 -6.092648e-8) radius=0.02
    ContactSphere right_foot_7: socket_frame=/bodyset/calcn_r location=(0 -0.0282 0) radius=0.02
    ContactSphere left_foot_1: socket_frame=/bodyset/toes_l location=(0.0699 -0.0299 0.0286) radius=0.02
    ContactSphere left_foot_2: socket_frame=/bodyset/toes_l location=(0.0294 -0.0299 -1.521175e-8) radius=0.02
    ContactSphere left_foot_3: socket_frame=/bodyset/calcn_l location=(0.1499 -0.0282 -6.884226e-8) radius=0.02
    ContactSphere left_foot_4: socket_frame=/bodyset/calcn_l location=(0.1499 -0.0282 0.02272616) radius=0.02
    ContactSphere left_foot_5: socket_frame=/bodyset/calcn_l location=(0.07 -0.0282 -0.0449) radius=0.02
    ContactSphere left_foot_6: socket_frame=/bodyset/calcn_l location=(0.119 -0.0282 6.092648e-8) radius=0.02
    ContactSphere left_foot_7: socket_frame=/bodyset/calcn_l location=(0 -0.0282 0) radius=0.02
    ContactEllipsoid femur_r_capsule: socket_frame=/bodyset/femur_r location=(0 -0.225 0.01) orientation=(1.5707 0.1 0)
        radii=(0.06 0.16 0.06)
    ContactEllipsoid femur_l_capsule: socket_frame=/bodyset/femur_l location=(0 -0.225 0) orientation=(1.5707 0.1 0)
        radii=(0.06 0.16 0.06)
    ContactEllipsoid tibia_r_capsule: socket_frame=/bodyset/tibia_r location=(0 -0.245 0) orientation=(1.5707 0 0)
        radii=(0.05 0.18 0.05)
    ContactEllipsoid tibia_l_capsule: socket_frame=/bodyset/tibia_l location=(0 -0.245 0) orientation=(1.5707 0 0)
        radii=(0.05 0.18 0.05)
    ContactEllipsoid pelvis_capsule: socket_frame=/bodyset/pelvis location=(-0.08 0 0) radii=(0.1 0.03 0.1)
    ContactEllipsoid lumbar_spine_capsule1: socket_frame=/bodyset/lumbar_spine location=(0 -0.1 -0.03)
        orientation=(1.5707 -0.3 0) radii=(0.1 0.03 0.1)
    ContactEllipsoid lumbar_spine_capsule2: socket_frame=/bodyset/lumbar_spine location=(0 -0.1 0.03)
        orientation=(1.5707 -0.3 0) radii=(0.1 0.03 0.1)
    ContactEllipsoid thorax_capsule1: socket_frame=/bodyset/thorax location=(-0.03 -0.12 -0.025)
        orientation=(1.5707 0 0) radii=(0.11 0.06 0.11)
    ContactEllipsoid thorax_capsule2: socket_frame=/bodyset/thorax location=(-0.03 -0.12 0.025)
        orientation=(1.5707 0 0) radii=(0.11 0.06 0.11)
    ContactSphere head: socket_frame=/bodyset/head location=(0.01 0.04 0) radius=0.11
    ContactEllipsoid humerus_r_capsule: socket_frame=/bodyset/humerus_r location=(0 -0.17 0) orientation=(1.5707 0 0)
        radii=(0.03 0.17 0.03)
    ContactEllipsoid humerus_l_capsule: socket_frame=/bodyset/humerus_l location=(0 -0.17 0) orientation=(1.5707 0 0)
        radii=(0.03 0.17 0.03)
    ContactEllipsoid ulna_r_capsule: socket_frame=/bodyset/ulna_r location=(-0.015 -0.13 0.03) orientation=(1.45 0 0)
        radii=(0.023 0.12 0.023)
    ContactEllipsoid ulna_l_capsule: socket_frame=/bodyset/ulna_l location=(-0.015 -0.13 -0.03)
        orientation=(1.6914 0 0) radii=(0.023 0.12 0.023)
    ContactSphere hand_r: socket_frame=/bodyset/hand_r location=(0.01 -0.05 0) orientation=(0 0 0.3) radius=0.04
    ContactSphere hand_l: socket_frame=/bodyset/hand_l location=(0.01 -0.05 0) orientation=(0 0 0.3) radius=0.04
