# OpenSim document version 40000
Model RajagopalLaiUhlrich2023:
  gravity: 0 -9.80665 0
  length_units: meters
  force_units: N
  credits:
    Rajagopal et al. (2016), Lai et al. (2017), Uhlrich et al. (2022)
    Notes: P. van den Bos changed the fiber-damping from 0.01 to default of 0.1 as suggested in M. Millard (2013) "Flexing Computational Muscle: Modeling and Simulation of Musculotendon Dynamics".
  publications:
    Rajagopal, A., Dembia, C.L., DeMers, M.S., Delp, D.D., Hicks, J.L., Delp, S.L. (2016) Full-body musculoskeletal model for muscle-driven simulation of human gait. IEEE Transactions on Biomedical Engineering.
  publications:
    Lai, A.K.M., Arnold, A.S., Wakeling, J.M. (2017) Why are antagonist muscles co-activated in my simulation? A musculoskeletal model for analysing human locomotor tasks. Annals of Biomedical Engineering.
  publications:
    Uhlrich, S.D., Jackson, R.W., Seth, A., Kolesar, J.A., Delp, S.L. (2022) Muscle coordination retraining inspired by musculoskeletal simulations reduces knee contact force. Scientific Reports.
  Ground
  BodySet:
    Body pelvis: mass=11.777 [kg] mass_center=(-0.0707 0 0) inertia=(0.1028 0.0871 0.0579 0 0 0)
        meshes=(r_pelvis.vtp l_pelvis.vtp sacrum.vtp)
      WrapCylinder Gmax1_at_pelvis_r: xyz_body_rotation=(-0.6 0.45 0) translation=(-0.077 -0.099 0.061) quadrant=-x
          radius=0.04 length=0.15
      WrapCylinder Gmax2_at_pelvis_r: xyz_body_rotation=(-0.75 0.39 0) translation=(-0.08 -0.083 0.068) quadrant=all
          radius=0.04 length=0.1
      WrapCylinder Gmax3_at_pelvis_r: xyz_body_rotation=(-0.1 0 0) translation=(-0.083 -0.088 0.068) quadrant=all
          radius=0.04 length=0.1
      WrapCylinder Gmax1_at_pelvis_l: xyz_body_rotation=(0.6 -0.45 0) translation=(-0.077 -0.099 -0.061) quadrant=-x
          radius=0.04 length=0.15
      WrapCylinder Gmax2_at_pelvis_l: xyz_body_rotation=(0.75 -0.39 0) translation=(-0.08 -0.083 -0.068) quadrant=all
          radius=0.04 length=0.1
      WrapCylinder Gmax3_at_pelvis_l: xyz_body_rotation=(0.1 0 0) translation=(-0.083 -0.088 -0.068) quadrant=all
          radius=0.04 length=0.1
      WrapCylinder PS_at_brim_r: xyz_body_rotation=(-0.25 -0.27 0.1) translation=(-0.074 -0.06 0.0656) quadrant=-y
          radius=0.05 length=0.1
      WrapCylinder PS_at_brim_l: xyz_body_rotation=(0.25 0.27 0.1) translation=(-0.074 -0.06 -0.0656) quadrant=-y
          radius=0.05 length=0.1
      WrapCylinder IL_at_brim_r: xyz_body_rotation=(-0.32 -0.24 0.9) translation=(-0.071 -0.065 0.0756) quadrant=-y
          radius=0.0549 length=0.1
      WrapCylinder IL_at_brim_l: xyz_body_rotation=(0.32 0.24 0.9) translation=(-0.071 -0.065 -0.0756) quadrant=-y
          radius=0.0549 length=0.1
    Body femur_r: mass=9.3014 mass_center=(0 -0.17 0) inertia=(0.1339 0.0351 0.1412 0 0 0) meshes=r_femur.vtp
      WrapCylinder GasLat_at_condyles_r: translation=(0.005 -0.41 0) quadrant=all radius=0.026 length=0.1
      WrapCylinder GasMed_at_condyles_r: translation=(0.005 -0.41 0) quadrant=all radius=0.025 length=0.1
      WrapCylinder KnExt_at_fem_r: xyz_body_rotation=(-0.0623366 0.0507601 0)
          translation=(0.00358828 -0.402732 0.00209111) quadrant=all radius=0.025 length=0.1
      WrapCylinder KnExtVL_at_fem_r: xyz_body_rotation=(-0.0623366 0.0507601 0)
          translation=(0.00188828 -0.402732 0.00209111) quadrant=all radius=0.025 length=0.1
      WrapCylinder AB_at_femshaft_r: xyz_body_rotation=(1.66157 0.186644 0) translation=(0.0146434 -0.112595 0.023365)
          quadrant=all radius=0.0165 length=0.07
      WrapCylinder AL_at_femshaft_r: xyz_body_rotation=(1.77711 0.136489 0) translation=(0.0307327 -0.231909 0.0151137)
          quadrant=all radius=0.0201 length=0.1
      WrapCylinder AMprox_at_femshaft_r: xyz_body_rotation=(1.61126 0.18656 0)
          translation=(0.00518299 -0.0728948 0.025403) quadrant=all radius=0.0211 length=0.07
      WrapCylinder AMmid_at_femshaft_r: xyz_body_rotation=(1.61139 0.13656 0)
          translation=(0.0230125 -0.160711 0.0205842) quadrant=all radius=0.0214 length=0.12
      WrapCylinder AMdist_at_femshaft_r: xyz_body_rotation=(1.71188 0.186636 0)
          translation=(0.0316065 -0.260736 0.0093646) quadrant=all radius=0.0218 length=0.2
      WrapCylinder AMisch_at_condyles_r: xyz_body_rotation=(1.71115 -0.463363 0)
          translation=(-0.0226511 -0.376831 -0.00315437) quadrant=all radius=0.04 length=0.24
      WrapCylinder PECT_at_femshaft_r: xyz_body_rotation=(1.81295 0.276344 0)
          translation=(0.00608573 -0.0845029 0.0304405) quadrant=all radius=0.015 length=0.05
    Body tibia_r: mass=3.7075 mass_center=(0 -0.1867 0) inertia=(0.0504 0.0051 0.0511 0 0 0)
        meshes=(r_tibia.vtp r_fibula.vtp)
      WrapCylinder GasLat_at_shank_r: xyz_body_rotation=(2.96723 -0.279725 -1.47812)
          translation=(-0.0074 -0.074 -0.0033) quadrant=-y radius=0.055 length=0.1
      WrapCylinder GasMed_at_shank_r: xyz_body_rotation=(2.96723 0.0279725 -1.47812)
          translation=(-0.0074 -0.074 -0.0033) quadrant=-y radius=0.059 length=0.1
      WrapCylinder GR_at_condyles_r: xyz_body_rotation=(0 -0.4 0) translation=(-0.003 -0.02 0) quadrant=all
          radius=0.036 length=0.1
      WrapCylinder SM_at_condyles_r: xyz_body_rotation=(0 -0.1 0) translation=(-0.001 -0.02 0) quadrant=all
          radius=0.0345 length=0.1
      WrapCylinder ST_at_condyles_r: xyz_body_rotation=(0 -0.2 0) translation=(-0.002 -0.0205 0) quadrant=all
          radius=0.0425 length=0.1
      WrapCylinder BF_at_gastroc_r: translation=(-0.039 -0.06 0) quadrant=y radius=0.029 length=0.15
    Body patella_r: mass=0.0862 mass_center=(0.0018 0.0264 0) inertia=(2.87e-6 1.311e-5 1.311e-5 0 0 0)
        meshes=r_patella.vtp
    Body talus_r: mass=0.1 mass_center=(0 0 0) inertia=(0.001 0.001 0.001 0 0 0) meshes=r_talus.vtp
    Body calcn_r: mass=1.25 mass_center=(0.1 0.03 0) inertia=(0.0014 0.0039 0.0041 0 0 0) meshes=r_foot.vtp
    Body toes_r: mass=0.2166 mass_center=(0.0346 0.006 -0.0175) inertia=(0.0001 0.0002 0.001 0 0 0) meshes=r_bofoot.vtp
    Body femur_l: mass=9.3014 mass_center=(0 -0.17 0) inertia=(0.1339 0.0351 0.1412 0 0 0) meshes=l_femur.vtp
      WrapCylinder GasLat_at_condyles_l: translation=(0.005 -0.41 0) quadrant=all radius=0.026 length=0.1
      WrapCylinder GasMed_at_condyles_l: translation=(0.005 -0.41 0) quadrant=all radius=0.025 length=0.1
      WrapCylinder KnExt_at_fem_l: xyz_body_rotation=(0.0623366 -0.0507601 0)
          translation=(0.00358828 -0.402732 -0.00209111) quadrant=all radius=0.025 length=0.1
      WrapCylinder KnExtVL_at_fem_l: xyz_body_rotation=(0.0623366 -0.0507601 0)
          translation=(0.00188828 -0.402732 -0.00209111) quadrant=all radius=0.025 length=0.1
      WrapCylinder AB_at_femshaft_l: xyz_body_rotation=(-1.66157 -0.186644 0)
          translation=(0.0146434 -0.112595 -0.023365) quadrant=all radius=0.0165 length=0.07
      WrapCylinder AL_at_femshaft_l: xyz_body_rotation=(-1.77711 -0.136489 0)
          translation=(0.0307327 -0.231909 -0.0151137) quadrant=all radius=0.0201 length=0.1
      WrapCylinder AMprox_at_femshaft_l: xyz_body_rotation=(-1.61126 -0.18656 0)
          translation=(0.00518299 -0.0728948 -0.025403) quadrant=all radius=0.0211 length=0.07
      WrapCylinder AMmid_at_femshaft_l: xyz_body_rotation=(-1.61139 -0.13656 0)
          translation=(0.0230125 -0.160711 -0.0205842) quadrant=all radius=0.0214 length=0.12
      WrapCylinder AMdist_at_femshaft_l: xyz_body_rotation=(-1.71188 -0.186636 0)
          translation=(0.0316065 -0.260736 -0.0093646) quadrant=all radius=0.0218 length=0.2
      WrapCylinder AMisch_at_condyles_l: xyz_body_rotation=(-1.71115 0.463363 0)
          translation=(-0.0226511 -0.376831 0.00315437) quadrant=all radius=0.04 length=0.24
      WrapCylinder PECT_at_femshaft_l: xyz_body_rotation=(-1.81295 -0.276344 0)
          translation=(0.00608573 -0.0845029 -0.0304405) quadrant=all radius=0.015 length=0.05
    Body tibia_l: mass=3.7075 mass_center=(0 -0.1867 0) inertia=(0.0504 0.0051 0.0511 0 0 0)
        meshes=(l_tibia.vtp l_fibula.vtp)
      WrapCylinder GasLat_at_shank_l: xyz_body_rotation=(-2.96723 0.279725 -1.47812)
          translation=(-0.0074 -0.074 0.0033) quadrant=-y radius=0.055 length=0.1
      WrapCylinder GasMed_at_shank_l: xyz_body_rotation=(-2.96723 -0.0279725 -1.47812)
          translation=(-0.0074 -0.074 0.0033) quadrant=-y radius=0.059 length=0.1
      WrapCylinder GR_at_condyles_l: xyz_body_rotation=(0 0.4 0) translation=(-0.003 -0.02 0) quadrant=all radius=0.036
          length=0.1
      WrapCylinder SM_at_condyles_l: xyz_body_rotation=(0 0.1 0) translation=(-0.001 -0.02 0) quadrant=all
          radius=0.0345 length=0.1
      WrapCylinder ST_at_condyles_l: xyz_body_rotation=(0 0.2 0) translation=(-0.002 -0.0205 0) quadrant=all
          radius=0.0425 length=0.1
      WrapCylinder BF_at_gastroc_l: translation=(-0.039 -0.06 0) quadrant=all radius=0.029 length=0.15
    Body patella_l: mass=0.0862 mass_center=(0.0018 0.0264 0) inertia=(2.87e-6 1.311e-5 1.311e-5 0 0 0)
        meshes=l_patella.vtp
    Body talus_l: mass=0.1 mass_center=(0 0 0) inertia=(0.001 0.001 0.001 0 0 0) meshes=l_talus.vtp
    Body calcn_l: mass=1.25 mass_center=(0.1 0.03 0) inertia=(0.0014 0.0039 0.0041 0 0 0) meshes=l_foot.vtp
    Body toes_l: mass=0.2166 mass_center=(0.0346 0.006 0.0175) inertia=(0.0001 0.0002 0.001 0 0 0) meshes=l_bofoot.vtp
    Body torso: mass=26.8266 mass_center=(-0.03 0.32 0) inertia=(1.4745 0.7555 1.4314 0 0 0)
        meshes=(hat_spine.vtp hat_jaw.vtp hat_skull.vtp hat_ribs_scap.vtp)
    Body humerus_r: mass=2.0325 mass_center=(0 -0.164502 0) inertia=(0.011946 0.004121 0.013409 0 0 0)
        meshes=humerus_rv.vtp
    Body ulna_r: mass=0.6075 mass_center=(0 -0.120525 0) inertia=(0.002962 0.000618 0.003213 0 0 0) meshes=ulna_rv.vtp
    Body radius_r: mass=0.6075 mass_center=(0 -0.120525 0) inertia=(0.002962 0.000618 0.003213 0 0 0)
        meshes=radius_rv.vtp
    Body hand_r: mass=0.4575 mass_center=(0 -0.068095 0) inertia=(0.000892 0.000547 0.00134 0 0 0)
        meshes=(pisiform_rvs.vtp lunate_rvs.vtp scaphoid_rvs.vtp triquetrum_rvs.vtp hamate_rvs.vtp capitate_rvs.vtp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)
    Body humerus_l: mass=2.0325 mass_center=(0 -0.164502 0) inertia=(0.011946 0.004121 0.013409 0 0 0)
        meshes=humerus_lv.vtp
    Body ulna_l: mass=0.6075 mass_center=(0 -0.120525 0) inertia=(0.002962 0.000618 0.003213 0 0 0) meshes=ulna_lv.vtp
    Body radius_l: mass=0.6075 mass_center=(0 -0.120525 0) inertia=(0.002962 0.000618 0.003213 0 0 0)
        meshes=radius_lv.vtp
    Body hand_l: mass=0.4575 mass_center=(0 -0.068095 0) inertia=(0.000892 0.000547 0.00134 0 0 0)
        meshes=(pisiform_lvs.vtp lunate_lvs.vtp scaphoid_lvs.vtp triquetrum_lvs.vtp hamate_lvs.vtp capitate_lvs.vtp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)
  JointSet:
    CustomJoint ground_pelvis: socket_parent_frame=ground_offset socket_child_frame=pelvis_offset
      PhysicalOffsetFrame ground_offset: socket_parent=/ground translation=(0 0 0) [meters]
      PhysicalOffsetFrame pelvis_offset: socket_parent=/bodyset/pelvis translation=(0 0 0)
      SpatialTransform:
        TransformAxis rotation1: coordinates=pelvis_tilt axis=(0 0 1) LinearFunction(coefficients=1 0)
        TransformAxis rotation2: coordinates=pelvis_list axis=(1 0 0) LinearFunction(coefficients=1 0)
        TransformAxis rotation3: coordinates=pelvis_rotation axis=(0 1 0) LinearFunction(coefficients=1 0)
        TransformAxis translation1: coordinates=pelvis_tx axis=(1 0 0) LinearFunction(coefficients=1 0)
        TransformAxis translation2: coordinates=pelvis_ty axis=(0 1 0) LinearFunction(coefficients=1 0)
        TransformAxis translation3: coordinates=pelvis_tz axis=(0 0 1) LinearFunction(coefficients=1 0)
    CustomJoint hip_r: socket_parent_frame=pelvis_offset socket_child_frame=femur_r_offset
      Coordinate hip_flexion_r: default_value=0 range=(-0.5235988 2.094395) clamped=true
      Coordinate hip_adduction_r: default_value=0 range=(-0.8726646 0.5235988) clamped=true
      Coordinate hip_rotation_r: default_value=0 range=(-0.6981317 0.6981317) clamped=true
      PhysicalOffsetFrame pelvis_offset: socket_parent=/bodyset/pelvis translation=(-0.056276 -0.07849 0.07726)
      PhysicalOffsetFrame femur_r_offset: socket_parent=/bodyset/femur_r translation=(0 0 0)
      SpatialTransform: axes_held_at_zero=(translation1 translation2 translation3)
        TransformAxis rotation1: coordinates=hip_flexion_r axis=(0 0 1) LinearFunction(coefficients=1 0)
        TransformAxis rotation2: coordinates=hip_adduction_r axis=(1 0 0) LinearFunction(coefficients=1 0)
        TransformAxis rotation3: coordinates=hip_rotation_r axis=(0 1 0) LinearFunction(coefficients=1 0)
    CustomJoint walker_knee_r: socket_parent_frame=femur_r_offset socket_child_frame=tibia_r_offset
      Coordinate knee_angle_r: default_value=0 range=(0 2.443461) clamped=true
      PhysicalOffsetFrame femur_r_offset: socket_parent=/bodyset/femur_r translation=(-0.0045 -0.4096 -0.00175)
          orientation=(-1.64157 1.44618 1.5708) [radians]
      PhysicalOffsetFrame tibia_r_offset: socket_parent=/bodyset/tibia_r
          translation=(-0.00808954 -0.0035348 -0.00148474) orientation=(-1.64157 1.44618 1.5708)
      SpatialTransform:
        TransformAxis rotation1: coordinates=knee_angle_r axis=(1 0 0) LinearFunction(coefficients=1 0)
        TransformAxis rotation2: coordinates=knee_angle_r axis=(0 0 1)
          PolynomialFunction: coefficients=(0.01083209 -0.02521833 -0.03284781 0.07910001 -1.473252e-8)
        TransformAxis rotation3: coordinates=knee_angle_r axis=(0 1 0)
          PolynomialFunction: coefficients=(0.02516576 -0.1694801 0.3694993 -4.430358e-8)
        TransformAxis translation1: coordinates=knee_angle_r axis=(1 0 0)
          PolynomialFunction: coefficients=(0.0001590448 -0.00101515 0.001817511 2.641427e-5 -7.746564e-7)
        TransformAxis translation2: coordinates=knee_angle_r axis=(0 1 0)
          PolynomialFunction: coefficients=(-0.0005796878 0.005079766 -0.01144238 0.003936909 -2.51635e-5)
        TransformAxis translation3: coordinates=knee_angle_r axis=(0 0 1)
          PolynomialFunction: coefficients=(0.001208087 -0.004453611 0.0006116494 0.00626543 -1.461913e-5)
    WeldJoint patellofemoral_r: socket_parent_frame=femur_r_offset socket_child_frame=patella_r_offset
      PhysicalOffsetFrame femur_r_offset: socket_parent=/bodyset/femur_r translation=(0.00551 -0.44876 0)
          orientation=(0 0 -0.5)
      PhysicalOffsetFrame patella_r_offset: socket_parent=/bodyset/patella_r translation=(0 0 0)
    PinJoint ankle_r: socket_parent_frame=tibia_r_offset socket_child_frame=talus_r_offset
      Coordinate ankle_angle_r: default_value=0 range=(-0.8726646 0.8726646) clamped=true
      PhysicalOffsetFrame tibia_r_offset: socket_parent=/bodyset/tibia_r translation=(-0.01 -0.4 0)
          orientation=(0.175895 -0.105208 0.0186622)
      PhysicalOffsetFrame talus_r_offset: socket_parent=/bodyset/talus_r translation=(0 0 0)
          orientation=(0.175895 -0.105208 0.0186622)
    PinJoint subtalar_r: socket_parent_frame=talus_r_offset socket_child_frame=calcn_r_offset
      Coordinate subtalar_angle_r: default_value=0 range=(-0.6108652 0.6108652) clamped=true
      PhysicalOffsetFrame talus_r_offset: socket_parent=/bodyset/talus_r translation=(-0.04877 -0.04195 0.00792)
          orientation=(-1.76819 0.906223 1.8196)
      PhysicalOffsetFrame calcn_r_offset: socket_parent=/bodyset/calcn_r translation=(0 0 0)
          orientation=(-1.76819 0.906223 1.8196)
    PinJoint mtp_r: socket_parent_frame=calcn_r_offset socket_child_frame=toes_r_offset
      Coordinate mtp_angle_r: default_value=0 range=(-0.7853982 0.5235988) clamped=true
      PhysicalOffsetFrame calcn_r_offset: socket_parent=/bodyset/calcn_r translation=(0.1788 -0.002 0.00108)
          orientation=(-3.14159 0.619901 0)
      PhysicalOffsetFrame toes_r_offset: socket_parent=/bodyset/toes_r translation=(0 0 0)
          orientation=(-3.14159 0.619901 0)
    CustomJoint hip_l: socket_parent_frame=pelvis_offset socket_child_frame=femur_l_offset
      Coordinate hip_flexion_l: default_value=0 range=(-0.5235988 2.094395) clamped=true
      Coordinate hip_adduction_l: default_value=0 range=(-0.8726646 0.5235988) clamped=true
      Coordinate hip_rotation_l: default_value=0 range=(-0.6981317 0.6981317) clamped=true
      PhysicalOffsetFrame pelvis_offset: socket_parent=/bodyset/pelvis translation=(-0.056276 -0.07849 -0.07726)
      PhysicalOffsetFrame femur_l_offset: socket_parent=/bodyset/femur_l translation=(0 0 0)
      SpatialTransform: axes_held_at_zero=(translation1 translation2 translation3)
        TransformAxis rotation1: coordinates=hip_flexion_l axis=(0 0 1) LinearFunction(coefficients=1 0)
        TransformAxis rotation2: coordinates=hip_adduction_l axis=(1 0 0) LinearFunction(coefficients=-1 0)
        TransformAxis rotation3: coordinates=hip_rotation_l axis=(0 1 0) LinearFunction(coefficients=-1 0)
    CustomJoint walker_knee_l: socket_parent_frame=femur_l_offset socket_child_frame=tibia_l_offset
      Coordinate knee_angle_l: default_value=0 range=(0 2.443461) clamped=true
      PhysicalOffsetFrame femur_l_offset: socket_parent=/bodyset/femur_l translation=(-0.0045 -0.4096 0.00175)
          orientation=(1.64157 -1.44618 1.5708)
      PhysicalOffsetFrame tibia_l_offset: socket_parent=/bodyset/tibia_l
          translation=(-0.00808954 -0.0035348 0.00148474) orientation=(1.64157 -1.44618 1.5708)
      SpatialTransform:
        TransformAxis rotation1: coordinates=knee_angle_l axis=(-1 0 0) LinearFunction(coefficients=1 0)
        TransformAxis rotation2: coordinates=knee_angle_l axis=(0 0 1)
          PolynomialFunction: coefficients=(0.01083209 -0.02521833 -0.03284781 0.07910001 -1.473252e-8)
        TransformAxis rotation3: coordinates=knee_angle_l axis=(0 1 0)
          PolynomialFunction: coefficients=(-0.02516576 0.1694801 -0.3694993 4.430358e-8)
        TransformAxis translation1: coordinates=knee_angle_l axis=(1 0 0)
          PolynomialFunction: coefficients=(0.0001590448 -0.00101515 0.001817511 2.641427e-5 -7.746564e-7)
        TransformAxis translation2: coordinates=knee_angle_l axis=(0 1 0)
          PolynomialFunction: coefficients=(-0.0005796878 0.005079766 -0.01144238 0.003936909 -2.51635e-5)
        TransformAxis translation3: coordinates=knee_angle_l axis=(0 0 1)
          PolynomialFunction: coefficients=(-0.001208087 0.004453611 -0.0006116494 -0.00626543 1.461913e-5)
    WeldJoint patellofemoral_l: socket_parent_frame=femur_l_offset socket_child_frame=patella_l_offset
      PhysicalOffsetFrame femur_l_offset: socket_parent=/bodyset/femur_l translation=(0.00551 -0.44876 0)
          orientation=(0 0 -0.5)
      PhysicalOffsetFrame patella_l_offset: socket_parent=/bodyset/patella_l translation=(0 0 0)
    PinJoint ankle_l: socket_parent_frame=tibia_l_offset socket_child_frame=talus_l_offset
      Coordinate ankle_angle_l: default_value=0 range=(-0.8726646 0.8726646) clamped=true
      PhysicalOffsetFrame tibia_l_offset: socket_parent=/bodyset/tibia_l translation=(-0.01 -0.4 0)
          orientation=(-0.175895 0.105208 0.0186622)
      PhysicalOffsetFrame talus_l_offset: socket_parent=/bodyset/talus_l translation=(0 0 0)
          orientation=(-0.175895 0.105208 0.0186622)
    PinJoint subtalar_l: socket_parent_frame=talus_l_offset socket_child_frame=calcn_l_offset
      Coordinate subtalar_angle_l: default_value=0 range=(-0.6108652 0.6108652) clamped=true
      PhysicalOffsetFrame talus_l_offset: socket_parent=/bodyset/talus_l translation=(-0.04877 -0.04195 -0.00792)
          orientation=(1.76819 -0.906223 1.8196)
      PhysicalOffsetFrame calcn_l_offset: socket_parent=/bodyset/calcn_l translation=(0 0 0)
          orientation=(1.76819 -0.906223 1.8196)
    PinJoint mtp_l: socket_parent_frame=calcn_l_offset socket_child_frame=toes_l_offset
      Coordinate mtp_angle_l: default_value=0 range=(-0.7853982 0.5235988) clamped=true
      PhysicalOffsetFrame calcn_l_offset: socket_parent=/bodyset/calcn_l translation=(0.1788 -0.002 -0.00108)
          orientation=(-3.14159 -0.619901 0)
      PhysicalOffsetFrame toes_l_offset: socket_parent=/bodyset/toes_l translation=(0 0 0)
          orientation=(-3.14159 -0.619901 0)
    CustomJoint back: socket_parent_frame=pelvis_offset socket_child_frame=torso_offset
      Coordinate lumbar_extension: default_value=0 range=(-1.570796 1.570796) clamped=true
      Coordinate lumbar_bending: default_value=0 range=(-1.570796 1.570796) clamped=true
      Coordinate lumbar_rotation: default_value=0 range=(-1.570796 1.570796) clamped=true
      PhysicalOffsetFrame pelvis_offset: socket_parent=/bodyset/pelvis translation=(-0.1007 0.0815 0)
      PhysicalOffsetFrame torso_offset: socket_parent=/bodyset/torso translation=(0 0 0)
      SpatialTransform: axes_held_at_zero=(translation1 translation2 translation3)
        TransformAxis rotation1: coordinates=lumbar_extension axis=(0 0 1) LinearFunction(coefficients=1 0)
        TransformAxis rotation2: coordinates=lumbar_bending axis=(1 0 0) LinearFunction(coefficients=1 0)
        TransformAxis rotation3: coordinates=lumbar_rotation axis=(0 1 0) LinearFunction(coefficients=1 0)
    CustomJoint acromial_r: socket_parent_frame=torso_offset socket_child_frame=humerus_r_offset
      Coordinate arm_flex_r: default_value=0 range=(-10 10) clamped=true
      Coordinate arm_add_r: default_value=0 range=(-10 10) clamped=true
      Coordinate arm_rot_r: default_value=0 range=(-10 10) clamped=true
      PhysicalOffsetFrame torso_offset: socket_parent=/bodyset/torso translation=(0.003155 0.3715 0.17)
      PhysicalOffsetFrame humerus_r_offset: socket_parent=/bodyset/humerus_r translation=(0 0 0)
      SpatialTransform: axes_held_at_zero=(translation1 translation2 translation3)
        TransformAxis rotation1: coordinates=arm_flex_r axis=(0 0 1) LinearFunction(coefficients=1 0)
        TransformAxis rotation2: coordinates=arm_add_r axis=(1 0 0) LinearFunction(coefficients=1 0)
        TransformAxis rotation3: coordinates=arm_rot_r axis=(0 1 0) LinearFunction(coefficients=1 0)
    PinJoint elbow_r: socket_parent_frame=humerus_r_offset socket_child_frame=ulna_r_offset
      Coordinate elbow_flex_r: default_value=0 range=(0 2.618) clamped=true
      PhysicalOffsetFrame humerus_r_offset: socket_parent=/bodyset/humerus_r translation=(0.013144 -0.286273 -0.009595)
          orientation=(-0.0228627 0.228018 0.0051689)
      PhysicalOffsetFrame ulna_r_offset: socket_parent=/bodyset/ulna_r translation=(0 0 0)
          orientation=(-0.0228627 0.228018 0.0051689)
    WeldJoint radioulnar_r: socket_parent_frame=ulna_r_offset socket_child_frame=radius_r_offset
      PhysicalOffsetFrame ulna_r_offset: socket_parent=/bodyset/ulna_r translation=(-0.006727 -0.013007 0.026083)
          orientation=(-1.56884 0.056428 1.53614)
      PhysicalOffsetFrame radius_r_offset: socket_parent=/bodyset/radius_r translation=(0 0 0)
          orientation=(-1.56884 0.056428 1.53614)
    WeldJoint radius_hand_r: socket_parent_frame=radius_r_offset socket_child_frame=hand_r_offset
      PhysicalOffsetFrame radius_r_offset: socket_parent=/bodyset/radius_r translation=(-0.008797 -0.235841 0.01361)
          orientation=(-1.5708 0 -1.5708)
      PhysicalOffsetFrame hand_r_offset: socket_parent=/bodyset/hand_r translation=(0 0 0)
          orientation=(-1.5708 0 -1.5708)
    CustomJoint acromial_l: socket_parent_frame=torso_offset socket_child_frame=humerus_l_offset
      Coordinate arm_flex_l: default_value=0 range=(-10 10) clamped=true
      Coordinate arm_add_l: default_value=0 range=(-10 10) clamped=true
      Coordinate arm_rot_l: default_value=0 range=(-10 10) clamped=true
      PhysicalOffsetFrame torso_offset: socket_parent=/bodyset/torso translation=(0.003155 0.3715 -0.17)
      PhysicalOffsetFrame humerus_l_offset: socket_parent=/bodyset/humerus_l translation=(0 0 0)
      SpatialTransform: axes_held_at_zero=(translation1 translation2 translation3)
        TransformAxis rotation1: coordinates=arm_flex_l axis=(0 0 1) LinearFunction(coefficients=1 0)
        TransformAxis rotation2: coordinates=arm_add_l axis=(-1 0 0) LinearFunction(coefficients=1 0)
        TransformAxis rotation3: coordinates=arm_rot_l axis=(0 -1 0) LinearFunction(coefficients=1 0)
    PinJoint elbow_l: socket_parent_frame=humerus_l_offset socket_child_frame=ulna_l_offset
      Coordinate elbow_flex_l: default_value=0 range=(0 2.618) clamped=true
      PhysicalOffsetFrame humerus_l_offset: socket_parent=/bodyset/humerus_l translation=(0.013144 -0.286273 0.009595)
          orientation=(0.0228627 -0.228018 0.0051689)
      PhysicalOffsetFrame ulna_l_offset: socket_parent=/bodyset/ulna_l translation=(0 0 0)
          orientation=(0.0228627 -0.228018 0.0051689)
    WeldJoint radioulnar_l: socket_parent_frame=ulna_l_offset socket_child_frame=radius_l_offset
      PhysicalOffsetFrame ulna_l_offset: socket_parent=/bodyset/ulna_l translation=(-0.006727 -0.013007 -0.026083)
          orientation=(1.56884 -0.056428 1.53614)
      PhysicalOffsetFrame radius_l_offset: socket_parent=/bodyset/radius_l translation=(0 0 0)
          orientation=(1.56884 -0.056428 1.53614)
    WeldJoint radius_hand_l: socket_parent_frame=radius_l_offset socket_child_frame=hand_l_offset
      PhysicalOffsetFrame radius_l_offset: socket_parent=/bodyset/radius_l translation=(-0.008797 -0.235841 -0.01361)
          orientation=(1.5708 0 1.5708)
      PhysicalOffsetFrame hand_l_offset: socket_parent=/bodyset/hand_l translation=(0 0 0)
          orientation=(1.5708 0 1.5708)
  ForceSet:
    SpringGeneralizedForce hip_flexion_r_spring_force: coordinate=hip_flexion_r stiffness=0 viscosity=0.1
    CoordinateLimitForce [values shared by the 25 below unless stated]: damping=0.01745329 transition=1 [degrees]
        compute_dissipation_energy=false
    CoordinateLimitForce hip_flexion_r_limit_force: coordinate=hip_flexion_r upper_stiffness=8.726646 [N*m/degree]
        upper_limit=120 [degrees] lower_stiffness=8.726646 [N*m/degree] lower_limit=-30 [degrees]
    SpringGeneralizedForce hip_adduction_r_spring_force: coordinate=hip_adduction_r stiffness=0 viscosity=0.1
    CoordinateLimitForce hip_adduction_r_limit_force: coordinate=hip_adduction_r upper_stiffness=8.726646
        upper_limit=30 lower_stiffness=8.726646 lower_limit=-51.42857
    SpringGeneralizedForce hip_rotation_r_spring_force: coordinate=hip_rotation_r stiffness=0 viscosity=0.1
    CoordinateLimitForce hip_rotation_r_limit_force: coordinate=hip_rotation_r upper_stiffness=8.726646 upper_limit=40
        lower_stiffness=8.726646 lower_limit=-40
    SpringGeneralizedForce knee_angle_r_spring_force: coordinate=knee_angle_r stiffness=0 viscosity=0.1
    CoordinateLimitForce knee_angle_r_limit_force: coordinate=knee_angle_r upper_stiffness=8.726646
        upper_limit=140.0778 lower_stiffness=8.726646 lower_limit=0
    SpringGeneralizedForce ankle_angle_r_spring_force: coordinate=ankle_angle_r stiffness=0 viscosity=0.1
    CoordinateLimitForce ankle_angle_r_limit_force: coordinate=ankle_angle_r upper_stiffness=8.726646
        upper_limit=26.27021 lower_stiffness=8.726646 lower_limit=-43.94265
    SpringGeneralizedForce subtalar_angle_r_spring_force: coordinate=subtalar_angle_r stiffness=0 viscosity=0.1
    CoordinateLimitForce subtalar_angle_r_limit_force: coordinate=subtalar_angle_r upper_stiffness=8.726646
        upper_limit=12.46985 lower_stiffness=8.726646 lower_limit=-19.43431
    SpringGeneralizedForce mtp_angle_r_spring_force: coordinate=mtp_angle_r stiffness=65 viscosity=0.4
    CoordinateLimitForce mtp_angle_r_limit_force: coordinate=mtp_angle_r upper_stiffness=8.726646 upper_limit=65
        lower_stiffness=8.726646 lower_limit=-45
    SpringGeneralizedForce hip_flexion_l_spring_force: coordinate=hip_flexion_l stiffness=0 viscosity=0.1
    CoordinateLimitForce hip_flexion_l_limit_force: coordinate=hip_flexion_l upper_stiffness=8.726646 upper_limit=120
        lower_stiffness=8.726646 lower_limit=-30
    SpringGeneralizedForce hip_adduction_l_spring_force: coordinate=hip_adduction_l stiffness=0 viscosity=0.1
    CoordinateLimitForce hip_adduction_l_limit_force: coordinate=hip_adduction_l upper_stiffness=8.726646
        upper_limit=30 lower_stiffness=8.726646 lower_limit=-51.42857
    SpringGeneralizedForce hip_rotation_l_spring_force: coordinate=hip_rotation_l stiffness=0 viscosity=0.1
    CoordinateLimitForce hip_rotation_l_limit_force: coordinate=hip_rotation_l upper_stiffness=8.726646 upper_limit=40
        lower_stiffness=8.726646 lower_limit=-40
    SpringGeneralizedForce knee_angle_l_spring_force: coordinate=knee_angle_l stiffness=0 viscosity=0.1
    CoordinateLimitForce knee_angle_l_limit_force: coordinate=knee_angle_l upper_stiffness=8.726646
        upper_limit=140.0778 lower_stiffness=8.726646 lower_limit=0
    SpringGeneralizedForce ankle_angle_l_spring_force: coordinate=ankle_angle_l stiffness=0 viscosity=0.1
    CoordinateLimitForce ankle_angle_l_limit_force: coordinate=ankle_angle_l upper_stiffness=8.726646
        upper_limit=26.27021 lower_stiffness=8.726646 lower_limit=-43.94265
    SpringGeneralizedForce subtalar_angle_l_spring_force: coordinate=subtalar_angle_l stiffness=0 viscosity=0.1
    CoordinateLimitForce subtalar_angle_l_limit_force: coordinate=subtalar_angle_l upper_stiffness=8.726646
        upper_limit=12.46985 lower_stiffness=8.726646 lower_limit=-19.43431
    SpringGeneralizedForce mtp_angle_l_spring_force: coordinate=mtp_angle_l stiffness=65 viscosity=0.4
    CoordinateLimitForce mtp_angle_l_limit_force: coordinate=mtp_angle_l upper_stiffness=8.726646 upper_limit=65
        lower_stiffness=8.726646 lower_limit=-45
    SpringGeneralizedForce lumbar_extension_spring_force: coordinate=lumbar_extension stiffness=0 viscosity=1
    SpringGeneralizedForce lumbar_bending_spring_force: coordinate=lumbar_bending stiffness=0 viscosity=1
    SpringGeneralizedForce lumbar_rotation_spring_force: coordinate=lumbar_rotation stiffness=0 viscosity=1
    SpringGeneralizedForce arm_flex_r_spring_force: coordinate=arm_flex_r stiffness=0 viscosity=0.1
    SpringGeneralizedForce arm_flex_l_spring_force: coordinate=arm_flex_l stiffness=0 viscosity=0.1
    SpringGeneralizedForce arm_add_r_spring_force: coordinate=arm_add_r stiffness=0 viscosity=0.1
    SpringGeneralizedForce arm_add_l_spring_force: coordinate=arm_add_l stiffness=0 viscosity=0.1
    SpringGeneralizedForce arm_rot_r_spring_force: coordinate=arm_rot_r stiffness=0 viscosity=0.1
    SpringGeneralizedForce arm_rot_l_spring_force: coordinate=arm_rot_l stiffness=0 viscosity=0.1
    SpringGeneralizedForce elbow_flex_r_spring_force: coordinate=elbow_flex_r stiffness=0 viscosity=0.01
    SpringGeneralizedForce elbow_flex_l_spring_force: coordinate=elbow_flex_l stiffness=0 viscosity=0.01
    CoordinateLimitForce lumbar_extension_limit_force: coordinate=lumbar_extension upper_stiffness=8.726646
        upper_limit=9.740283 lower_stiffness=8.726646 lower_limit=-30
    CoordinateLimitForce lumbar_bending_limit_force: coordinate=lumbar_bending upper_stiffness=8.726646
        upper_limit=15.87114 lower_stiffness=8.726646 lower_limit=-15.87114
    CoordinateLimitForce lumbar_rotation_limit_force: coordinate=lumbar_rotation upper_stiffness=8.726646
        upper_limit=12.83881 lower_stiffness=8.726646 lower_limit=-12.83881
    CoordinateLimitForce arm_flex_r_limit_force: coordinate=arm_flex_r upper_stiffness=3.49066 upper_limit=180
        lower_stiffness=3.49066 lower_limit=-75
    CoordinateLimitForce arm_flex_l_limit_force: coordinate=arm_flex_l upper_stiffness=3.49066 upper_limit=180
        lower_stiffness=3.49066 lower_limit=-75
    CoordinateLimitForce arm_add_r_limit_force: coordinate=arm_add_r upper_stiffness=3.49066 upper_limit=0
        lower_stiffness=3.49066 lower_limit=-45
    CoordinateLimitForce arm_add_l_limit_force: coordinate=arm_add_l upper_stiffness=3.49066 upper_limit=0
        lower_stiffness=3.49066 lower_limit=-45
    CoordinateLimitForce arm_rot_r_limit_force: coordinate=arm_rot_r upper_stiffness=3.49066 upper_limit=25
        lower_stiffness=3.49066 lower_limit=-25
    CoordinateLimitForce arm_rot_l_limit_force: coordinate=arm_rot_l upper_stiffness=3.49066 upper_limit=25
        lower_stiffness=3.49066 lower_limit=-25
    CoordinateLimitForce elbow_flex_r_limit_force: coordinate=elbow_flex_r upper_stiffness=3.49066 upper_limit=150
        lower_stiffness=3.49066 lower_limit=5
    CoordinateLimitForce elbow_flex_l_limit_force: coordinate=elbow_flex_l upper_stiffness=3.49066 upper_limit=150
        lower_stiffness=3.49066 lower_limit=5
    Millard2012EquilibriumMuscle [values shared by the 80 below unless stated]: fiber_damping=0.1
        default_activation=0.01 minimum_activation=0.01
      ActiveForceLengthCurve: min_norm_active_fiber_length=0.25 transition_norm_fiber_length=0.77
          max_norm_active_fiber_length=1.9 shallow_ascending_slope=0.75 minimum_value=0
      ForceVelocityCurve: concentric_slope_at_vmax=0 concentric_slope_near_vmax=0.25 isometric_slope=5
          eccentric_slope_at_vmax=0 eccentric_slope_near_vmax=0.15 max_eccentric_velocity_force_multiplier=1.4
      TendonForceLengthCurve
    Millard2012EquilibriumMuscle addbrev_r: max_isometric_force=625.8197 optimal_fiber_length=0.1031
        tendon_slack_length=0.03545029 pennation_angle_at_optimal=0.1147809 [radians]
      PathPoint P1: pelvis (-0.0191 -0.094 0.0154)
      PathPoint P2: femur_r (-0.002 -0.118 0.0249)
      PathWrap: wrap_object=AB_at_femshaft_r method=hybrid
      FiberForceLengthCurve: strain_at_zero_force=-0.1844454 strain_at_one_norm_force=0.5059595
          stiffness_at_low_force=0.2 stiffness_at_one_norm_force=2.896851 curviness=0.75
    Millard2012EquilibriumMuscle addlong_r: max_isometric_force=916.8 optimal_fiber_length=0.1082
        tendon_slack_length=0.1317994 pennation_angle_at_optimal=0.1377704
      PathPoint P1: pelvis (-0.00758 -0.0889 0.01888)
      PathPoint P2: femur_r (0.01126 -0.23937 0.01583)
      PathWrap: wrap_object=AL_at_femshaft_r method=hybrid
      FiberForceLengthCurve: strain_at_zero_force=-0.1942012 strain_at_one_norm_force=0.5013184
          stiffness_at_low_force=0.2 stiffness_at_one_norm_force=2.875548 curviness=0.75
    Millard2012EquilibriumMuscle addmagDist_r: max_isometric_force=597.2951 optimal_fiber_length=0.1772
        tendon_slack_length=0.0873807 pennation_angle_at_optimal=0.194705
      PathPoint P1: pelvis (-0.07404 -0.12767 0.03982)
      PathPoint P2: femur_r (0.01125 -0.2625 0.0193)
      PathWrap: wrap_object=AMdist_at_femshaft_r method=hybrid
      FiberForceLengthCurve: strain_at_zero_force=9.713794e-8 strain_at_one_norm_force=0.7000001
          stiffness_at_low_force=0.2 stiffness_at_one_norm_force=2.857143 curviness=0.75
    Millard2012EquilibriumMuscle addmagIsch_r: max_isometric_force=597.2951 optimal_fiber_length=0.1562
        tendon_slack_length=0.216343 pennation_angle_at_optimal=0.1680443
      PathPoint P1: pelvis (-0.08962 -0.12976 0.04171)
      PathPoint P2: femur_r (0.00481 -0.38797 -0.03273)
      PathWrap: wrap_object=AMisch_at_condyles_r method=hybrid
      FiberForceLengthCurve: strain_at_zero_force=0.005651991 strain_at_one_norm_force=0.7000408
          stiffness_at_low_force=0.2 stiffness_at_one_norm_force=2.880231 curviness=0.75
    Millard2012EquilibriumMuscle addmagMid_r: max_isometric_force=597.2951 optimal_fiber_length=0.1377
        tendon_slack_length=0.0466277 pennation_angle_at_optimal=0.2073076
      PathPoint P1: pelvis (-0.05266 -0.12075 0.02854)
      PathPoint P2: femur_r (0.00242 -0.1624 0.02922)
      PathWrap: wrap_object=AMmid_at_femshaft_r method=hybrid
      FiberForceLengthCurve: strain_at_zero_force=1.776572e-8 strain_at_one_norm_force=0.7000001
          stiffness_at_low_force=0.2 stiffness_at_one_norm_force=2.857143 curviness=0.75
    Millard2012EquilibriumMuscle addmagProx_r: max_isometric_force=597.2951 optimal_fiber_length=0.1056
        tendon_slack_length=0.0403241 pennation_angle_at_optimal=0.3114833
      PathPoint P1: pelvis (-0.03098 -0.10755 0.01365)
      PathPoint P2: femur_r (-0.01527 -0.07886 0.03202)
      PathWrap: wrap_object=AMprox_at_femshaft_r method=hybrid
      FiberForceLengthCurve: strain_at_zero_force=8.055312e-8 strain_at_one_norm_force=0.7000001
          stiffness_at_low_force=0.2 stiffness_at_one_norm_force=2.857143 curviness=0.75
    Millard2012EquilibriumMuscle bflh_r: max_isometric_force=1313.184 optimal_fiber_length=0.0976005
        tendon_slack_length=0.3325 pennation_angle_at_optimal=0.1759182
      PathPoint P1: pelvis (-0.104 -0.1191 0.0586)
      PathPoint P2: tibia_r (-0.03436 -0.03648 0.03618)
      PathPoint P3: tibia_r (-0.02704 -0.05008 0.03476)
      FiberForceLengthCurve: strain_at_zero_force=0.1368428 strain_at_one_norm_force=0.7054016
          stiffness_at_low_force=0.2 stiffness_at_one_norm_force=3.517666 curviness=0.75
    Millard2012EquilibriumMuscle bfsh_r: max_isometric_force=557.1148 optimal_fiber_length=0.1103007
        tendon_slack_length=0.1058179 pennation_angle_at_optimal=0.2642232
      PathPoint P1: femur_r (0.005 -0.2111 0.0234)
      PathPoint P2: tibia_r (-0.02866 -0.03284 0.03204)
      PathWrap: wrap_object=BF_at_gastroc_r method=hybrid
      FiberForceLengthCurve: strain_at_zero_force=0.04380442 strain_at_one_norm_force=0.6994891
          stiffness_at_low_force=0.2 stiffness_at_one_norm_force=3.050247 curviness=0.75
    Millard2012EquilibriumMuscle edl_r: max_isometric_force=603.4982 optimal_fiber_length=0.0693
        tendon_slack_length=0.3688752 pennation_angle_at_optimal=0.2182582
      PathPoint P1: tibia_r (-0.016 -0.1157 0.0205)
      PathPoint P2: tibia_r (0.0164 -0.376 0.0112)
      PathPoint P3: calcn_r (0.0919 0.036 0.0008)
      PathPoint P4: calcn_r (0.1616 0.0055 0.013)
      PathPoint P5: toes_r (0.0003 0.0047 0.0153)
      PathPoint P6: toes_r (0.0443 -0.0004 0.025)
      FiberForceLengthCurve: strain_at_zero_force=0.1015352 strain_at_one_norm_force=0.7074931
          stiffness_at_low_force=0.2 stiffness_at_one_norm_force=3.30056 curviness=0.75
    Millard2012EquilibriumMuscle ehl_r: max_isometric_force=285.8675 optimal_fiber_length=0.0748
        tendon_slack_length=0.3267953 pennation_angle_at_optimal=0.1972681
      PathPoint P1: tibia_r (-0.014 -0.155 0.0189)
      PathPoint P2: tibia_r (0.0071 -0.2909 0.0164)
      PathPoint P3: tibia_r (0.02 -0.3693 -0.0028)
      PathPoint P4: calcn_r (0.097 0.0389 -0.0211)
      PathPoint P5: calcn_r (0.1293 0.0309 -0.0257)
      PathPoint P6: calcn_r (0.1734 0.0139 -0.028)
      PathPoint P7: toes_r (0.0298 0.0041 -0.0245)
      PathPoint P8: toes_r (0.0563 0.0034 -0.0186)
      FiberForceLengthCurve: strain_at_zero_force=0.08168779 strain_at_one_norm_force=0.7147756
          stiffness_at_low_force=0.2 stiffness_at_one_norm_force=3.159119 curviness=0.75
    Millard2012EquilibriumMuscle fdl_r: max_isometric_force=423.177 optimal_fiber_length=0.0446
        tendon_slack_length=0.3787729 pennation_angle_at_optimal=0.2248391
      PathPoint P1: tibia_r (-0.0023 -0.1832 -0.0018)
      PathPoint P2: tibia_r (-0.0176 -0.3645 -0.0124)
      PathPoint P3: calcn_r (0.0436 0.0315 -0.028)
      PathPoint P4: calcn_r (0.0708 0.0176 -0.0263)
      PathPoint P5: calcn_r (0.1658 -0.0081 0.0116)
      PathPoint P6: toes_r (-0.0019 -0.0078 0.0147)
      PathPoint P7: toes_r (0.0285 -0.0071 0.0215)
      PathPoint P8: toes_r (0.0441 -0.006 0.0242)
      FiberForceLengthCurve: strain_at_zero_force=-0.006468795 strain_at_one_norm_force=0.6998542
          stiffness_at_low_force=0.2 stiffness_at_one_norm_force=2.831566 curviness=0.75
    Millard2012EquilibriumMuscle fhl_r: max_isometric_force=907.8393 optimal_fiber_length=0.0527
        tendon_slack_length=0.3543397 pennation_angle_at_optimal=0.2580255
      PathPoint P1: tibia_r (-0.031 -0.2163 0.02)
      PathPoint P2: tibia_r (-0.0242 -0.3671 -0.0076)
      PathPoint P3: calcn_r (0.0374 0.0276 -0.0241)
      PathPoint P4: calcn_r (0.1038 0.0068 -0.0256)
      PathPoint P5: calcn_r (0.1726 -0.0053 -0.0269)
      PathPoint P6: toes_r (0.0155 -0.0064 -0.0265)
      PathPoint P7: toes_r (0.0562 -0.0102 -0.0181)
      FiberForceLengthCurve: strain_at_zero_force=0.007614866 strain_at_one_norm_force=0.7001852
          stiffness_at_low_force=0.2 stiffness_at_one_norm_force=2.887793 curviness=0.75
    Millard2012EquilibriumMuscle gaslat_r: max_isometric_force=1575.059 optimal_fiber_length=0.069
        tendon_slack_length=0.374 pennation_angle_at_optimal=0.2102268
      PathPoint P1: femur_r (0.002 -0.381 0.02059)
      PathPoint P2: calcn_r (0.0044 0.031 -0.0053)
      PathWrap: wrap_object=GasLat_at_shank_r method=hybrid
      PathWrap pathwrap_0: wrap_object=GasLat_at_condyles_r method=hybrid
      FiberForceLengthCurve: strain_at_zero_force=-0.1932361 strain_at_one_norm_force=0.6636807
          stiffness_at_low_force=0.2 stiffness_at_one_norm_force=2.333949 curviness=0.75
    Millard2012EquilibriumMuscle gasmed_r: max_isometric_force=3115.515 optimal_fiber_length=0.059
        tendon_slack_length=0.387 pennation_angle_at_optimal=0.1656816
      PathPoint P1: femur_r (0.006 -0.385 -0.022)
      PathPoint P2: calcn_r (0.0044 0.031 -0.0053)
      PathWrap: wrap_object=GasMed_at_shank_r method=hybrid
      PathWrap pathwrap_0: wrap_object=GasMed_at_condyles_r method=hybrid
      FiberForceLengthCurve: strain_at_zero_force=0.1506325 strain_at_one_norm_force=0.550636
          stiffness_at_low_force=0.2 stiffness_at_one_norm_force=4.999956 curviness=0.75
    Millard2012EquilibriumMuscle glmax1_r: max_isometric_force=983.7836 optimal_fiber_length=0.147
        tendon_slack_length=0.0873 pennation_angle_at_optimal=0.3540118
      PathPoint P1: pelvis (-0.1231 0.0345 0.0563)
      PathPoint P2: pelvis (-0.1257 -0.0242 0.0779)
      PathPoint P3: femur_r (-0.0444 -0.0326 0.0302)
      PathPoint P4: femur_r (-0.0277 -0.0566 0.047)
      PathWrap: wrap_object=Gmax1_at_pelvis_r method=hybrid
      FiberForceLengthCurve: strain_at_zero_force=2.229005e-7 strain_at_one_norm_force=0.6999999
          stiffness_at_low_force=0.2 stiffness_at_one_norm_force=2.857144 curviness=0.75
    Millard2012EquilibriumMuscle glmax2_r: max_isometric_force=1406.046 optimal_fiber_length=0.157
        tendon_slack_length=0.109 pennation_angle_at_optimal=0.3673821
      PathPoint P1: pelvis (-0.1317 0.0087 0.0462)
      PathPoint P2: pelvis (-0.1344 -0.0609 0.0813)
      PathPoint P3: femur_r (-0.045 -0.0584 0.0252)
      PathPoint P4: femur_r (-0.0156 -0.1016 0.0419)
      PathWrap: wrap_object=Gmax2_at_pelvis_r method=hybrid
      FiberForceLengthCurve: strain_at_zero_force=1.628612e-7 strain_at_one_norm_force=0.7000001
          stiffness_at_low_force=0.2 stiffness_at_one_norm_force=2.857143 curviness=0.75
    Millard2012EquilibriumMuscle glmax3_r: max_isometric_force=947.7541 optimal_fiber_length=0.167
        tendon_slack_length=0.103 pennation_angle_at_optimal=0.3824161
      PathPoint P1: pelvis (-0.13 -0.0525 0.009)
      PathPoint P2: pelvis (-0.1273 -0.1263 0.0435)
      PathPoint P3: femur_r (-0.0281 -0.1125 0.0094)
      PathPoint P4: femur_r (-0.006 -0.1419 0.0411)
      PathWrap: wrap_object=Gmax3_at_pelvis_r method=hybrid
      FiberForceLengthCurve: strain_at_zero_force=0.03977768 strain_at_one_norm_force=0.7004988
          stiffness_at_low_force=0.2 stiffness_at_one_norm_force=3.026996 curviness=0.75
    Millard2012EquilibriumMuscle glmed1_r: max_isometric_force=1093.467 optimal_fiber_length=0.0765
        tendon_slack_length=0.0585 pennation_angle_at_optimal=0.3165559
      PathPoint P1: pelvis (-0.049 0.026 0.115)
      PathPoint P2_0: femur_r (-0.014 -0.018 0.059)
      FiberForceLengthCurve: strain_at_zero_force=6.185261e-8 strain_at_one_norm_force=0.7000001
          stiffness_at_low_force=0.2 stiffness_at_one_norm_force=2.857143 curviness=0.75
    Millard2012EquilibriumMuscle glmed2_r: max_isometric_force=765.0917 optimal_fiber_length=0.084
        tendon_slack_length=0.07545 pennation_angle_at_optimal=0.3165559
      PathPoint P1: pelvis (-0.085 0.055 0.082)
      PathPoint P2_0: femur_r (-0.022 -0.01 0.056)
      FiberForceLengthCurve: strain_at_zero_force=-0.1329608 strain_at_one_norm_force=0.6904088
          stiffness_at_low_force=0.2 stiffness_at_one_norm_force=2.429043 curviness=0.75
    Millard2012EquilibriumMuscle glmed3_r: max_isometric_force=871.1993 optimal_fiber_length=0.0781
        tendon_slack_length=0.0484 pennation_angle_at_optimal=0.3165559
      PathPoint P1: pelvis (-0.1 0.016 0.064)
      PathPoint P2_0: femur_r (-0.0309 -0.0047 0.0518)
      FiberForceLengthCurve: strain_at_zero_force=-0.1914236 strain_at_one_norm_force=0.6558113
          stiffness_at_low_force=0.2 stiffness_at_one_norm_force=2.360621 curviness=0.75
    Millard2012EquilibriumMuscle glmin1_r: max_isometric_force=374.0459 optimal_fiber_length=0.0813
        tendon_slack_length=0.0193 pennation_angle_at_optimal=0.1745329
      PathPoint P1: pelvis (-0.03 0 0.118)
      PathPoint P2: femur_r (0.005 -0.015 0.056)
      FiberForceLengthCurve: strain_at_zero_force=-8.172674e-8 strain_at_one_norm_force=0.7000001
          stiffness_at_low_force=0.2 stiffness_at_one_norm_force=2.857142 curviness=0.75
    Millard2012EquilibriumMuscle glmin2_r: max_isometric_force=394.8197 optimal_fiber_length=0.0687
        tendon_slack_length=0.03202 pennation_angle_at_optimal=0
      PathPoint P1: pelvis (-0.0616 0.01 0.101)
      PathPoint P2: femur_r (0.004 -0.009 0.052)
      FiberForceLengthCurve: strain_at_zero_force=0.001146607 strain_at_one_norm_force=0.6999804
          stiffness_at_low_force=0.2 stiffness_at_one_norm_force=2.861911 curviness=0.75
    Millard2012EquilibriumMuscle glmin3_r: max_isometric_force=446.7738 optimal_fiber_length=0.0353
        tendon_slack_length=0.0472 pennation_angle_at_optimal=0.01745329
      PathPoint P1: pelvis (-0.0789 -0.0155 0.0798)
      PathPoint P2: femur_r (-0.004 -0.001 0.051)
      FiberForceLengthCurve: strain_at_zero_force=-0.0351512 strain_at_one_norm_force=0.6990981
          stiffness_at_low_force=0.2 stiffness_at_one_norm_force=2.723871 curviness=0.75
    Millard2012EquilibriumMuscle grac_r: max_isometric_force=281.3115 optimal_fiber_length=0.2278008
        tendon_slack_length=0.1720144 pennation_angle_at_optimal=0.1720016
      PathPoint P1: pelvis (-0.04736 -0.12932 0.02456)
      PathPoint P2: tibia_r (-0.01842 -0.04755 -0.02961)
      PathPoint P3: tibia_r (0.00178 -0.06962 -0.01573)
      PathWrap: wrap_object=GR_at_condyles_r method=hybrid
      FiberForceLengthCurve: strain_at_zero_force=-0.1885953 strain_at_one_norm_force=0.7244614
          stiffness_at_low_force=0.2 stiffness_at_one_norm_force=2.190445 curviness=0.75
    Millard2012EquilibriumMuscle iliacus_r: max_isometric_force=1021.141 optimal_fiber_length=0.1066
        tendon_slack_length=0.09612071 pennation_angle_at_optimal=0.279914
      PathPoint P1: pelvis (-0.0605 0.0309 0.0843)
      PathPoint P2: pelvis (-0.0135 -0.0557 0.0756)
      PathPoint P3: femur_r (-0.0023 -0.0565 0.0139)
      PathPoint P4: femur_r (-0.0122 -0.0637 0.0196)
      PathWrap: wrap_object=IL_at_brim_r method=hybrid range=(2 3)
      FiberForceLengthCurve: strain_at_zero_force=-0.1607227 strain_at_one_norm_force=0.5020882
          stiffness_at_low_force=0.2 stiffness_at_one_norm_force=3.017452 curviness=0.75
    Millard2012EquilibriumMuscle perbrev_r: max_isometric_force=521.2016 optimal_fiber_length=0.0454
        tendon_slack_length=0.1475275 pennation_angle_at_optimal=0.2052361
      PathPoint P1: tibia_r (-0.0243 -0.2532 0.0251)
      PathPoint P2: tibia_r (-0.0339 -0.3893 0.0249)
      PathPoint P3: tibia_r (-0.0285 -0.4004 0.0255)
      PathPoint P4: calcn_r (0.0471 0.027 0.0233)
      PathPoint P5: calcn_r (0.0677 0.0219 0.0343)
      FiberForceLengthCurve: strain_at_zero_force=-0.02868018 strain_at_one_norm_force=0.6992207
          stiffness_at_low_force=0.2 stiffness_at_one_norm_force=2.747627 curviness=0.75
    Millard2012EquilibriumMuscle perlong_r: max_isometric_force=1115.371 optimal_fiber_length=0.0508
        tendon_slack_length=0.3322208 pennation_angle_at_optimal=0.2479525
      PathPoint P1: tibia_r (-0.02 -0.1373 0.0282)
      PathPoint P2: tibia_r (-0.0317 -0.39 0.0237)
      PathPoint P3: tibia_r (-0.0272 -0.4014 0.024)
      PathPoint P4: calcn_r (0.0438 0.023 0.0221)
      PathPoint P5: calcn_r (0.0681 0.0106 0.0284)
      PathPoint P6: calcn_r (0.0852 0.0069 0.0118)
      PathPoint P7: calcn_r (0.1203 0.0085 -0.0184)
      FiberForceLengthCurve: strain_at_zero_force=-0.08769079 strain_at_one_norm_force=0.6966414
          stiffness_at_low_force=0.2 stiffness_at_one_norm_force=2.54994 curviness=0.75
    Millard2012EquilibriumMuscle piri_r: max_isometric_force=1029.787 optimal_fiber_length=0.026
        tendon_slack_length=0.1149062 pennation_angle_at_optimal=0.1745329
      PathPoint P1: pelvis (-0.10181 -0.00653 0.01351)
      PathPoint P2: pelvis (-0.10202 -0.03066 0.06092)
      PathPoint P3: femur_r (-0.0148 -0.0036 0.0437)
      FiberForceLengthCurve: strain_at_zero_force=-0.1828826 strain_at_one_norm_force=0.7031405
          stiffness_at_low_force=0.2 stiffness_at_one_norm_force=2.257277 curviness=0.75
    Millard2012EquilibriumMuscle psoas_r: max_isometric_force=1426.79 optimal_fiber_length=0.1169
        tendon_slack_length=0.09954317 pennation_angle_at_optimal=0.2155251
      PathPoint P1: pelvis (-0.0606 0.062 0.039)
      PathPoint P2: pelvis (-0.0205 -0.0654 0.0656)
      PathPoint P3: femur_r (-0.0132 -0.0467 0.0046)
      PathPoint P4: femur_r (-0.0235 -0.0524 0.0088)
      PathWrap: wrap_object=PS_at_brim_r method=hybrid range=(2 3)
      FiberForceLengthCurve: strain_at_zero_force=-0.07629291 strain_at_one_norm_force=0.5032605
          stiffness_at_low_force=0.2 stiffness_at_one_norm_force=3.450933 curviness=0.75
    Millard2012EquilibriumMuscle recfem_r: max_isometric_force=2191.741 optimal_fiber_length=0.07589949
        tendon_slack_length=0.4504 pennation_angle_at_optimal=0.2170149
      PathPoint P1: pelvis (-0.024 -0.0388 0.0933)
      PathPoint P2: patella_r (0.01 0.049 0.0007)
      PathPoint P3: patella_r (0.0121 0.0437 -0.001)
      PathPoint P4: patella_r (0.005 0.00247 3e-5)
      PathPoint P5: tibia_r (0.0326 -0.06312 -0.00047)
      PathWrap: wrap_object=KnExt_at_fem_r method=hybrid
      FiberForceLengthCurve: strain_at_zero_force=0.1997943 strain_at_one_norm_force=0.8997465
          stiffness_at_low_force=0.2 stiffness_at_one_norm_force=2.857338 curviness=0.75
    Millard2012EquilibriumMuscle sart_r: max_isometric_force=249.4131 optimal_fiber_length=0.4030006
        tendon_slack_length=0.124 pennation_angle_at_optimal=0.02613542
      PathPoint P1: pelvis (-0.0195 -0.0156 0.1056)
      PathPoint P2: femur_r (-0.003 -0.3568 -0.0421)
      PathPoint P3: tibia_r (-0.0251 -0.0401 -0.0365)
      PathPoint P4: tibia_r (-0.0159 -0.0599 -0.0264)
      PathPoint P5: tibia_r (0.0136 -0.081 -0.0026)
      FiberForceLengthCurve: strain_at_zero_force=-0.07294162 strain_at_one_norm_force=0.7021361
          stiffness_at_low_force=0.2 stiffness_at_one_norm_force=2.580386 curviness=0.75
    Millard2012EquilibriumMuscle semimem_r: max_isometric_force=2200.987 optimal_fiber_length=0.086
        tendon_slack_length=0.335 pennation_angle_at_optimal=0.2545615
      PathPoint P1: pelvis (-0.0987 -0.114 0.0614)
      PathPoint P2: tibia_r (-0.027 -0.041 -0.0196)
      PathWrap: wrap_object=SM_at_condyles_r method=hybrid
      FiberForceLengthCurve: strain_at_zero_force=0.1537347 strain_at_one_norm_force=0.7044745
          stiffness_at_low_force=0.2 stiffness_at_one_norm_force=3.631479 curviness=0.75
    Millard2012EquilibriumMuscle semiten_r: max_isometric_force=591.2951 optimal_fiber_length=0.1930012
        tendon_slack_length=0.2472005 pennation_angle_at_optimal=0.241295
      PathPoint P1: pelvis (-0.1038 -0.1253 0.0515)
      PathPoint P2: tibia_r (-0.0312 -0.0508 -0.0229)
      PathPoint P3: tibia_r (0.0019 -0.0773 -0.0117)
      PathWrap: wrap_object=ST_at_condyles_r method=hybrid
      FiberForceLengthCurve: strain_at_zero_force=0.114169 strain_at_one_norm_force=0.7136122
          stiffness_at_low_force=0.2 stiffness_at_one_norm_force=3.336429 curviness=0.75
    Millard2012EquilibriumMuscle soleus_r: max_isometric_force=6194.843 optimal_fiber_length=0.044
        tendon_slack_length=0.28135 pennation_angle_at_optimal=0.3814289
      PathPoint P1: tibia_r (-0.0076 -0.0916 0.0098)
      PathPoint P2: calcn_r (0.0044 0.031 -0.0053)
      FiberForceLengthCurve: strain_at_zero_force=0.04016445 strain_at_one_norm_force=0.7659521
          stiffness_at_low_force=0.2 stiffness_at_one_norm_force=2.755627 curviness=0.75
    Millard2012EquilibriumMuscle tfl_r: max_isometric_force=411.2066 optimal_fiber_length=0.09315
        tendon_slack_length=0.44075 pennation_angle_at_optimal=0.05235988
      PathPoint P1: pelvis (-0.02 0.011 0.129)
      PathPoint P2: femur_r (0.0294 -0.0995 0.0597)
      PathPoint P3: femur_r (0.0107 -0.405 0.0324)
      PathPoint P4: tibia_r (0.0108 -0.041 0.0346)
      FiberForceLengthCurve: strain_at_zero_force=0.1571908 strain_at_one_norm_force=0.6394004
          stiffness_at_low_force=0.2 stiffness_at_one_norm_force=4.147574 curviness=0.75
    Millard2012EquilibriumMuscle tibant_r: max_isometric_force=1227.452 optimal_fiber_length=0.0683
        tendon_slack_length=0.240461 pennation_angle_at_optimal=0.1951828
      PathPoint P1: tibia_r (0.0154 -0.1312 0.0162)
      PathPoint P2: tibia_r (0.0251 -0.1906 0.0128)
      PathPoint P3: tibia_r (0.0233 -0.3659 -0.0132)
      PathPoint P4: calcn_r (0.1166 0.0178 -0.0305)
      FiberForceLengthCurve: strain_at_zero_force=0.1588072 strain_at_one_norm_force=0.7083715
          stiffness_at_low_force=0.2 stiffness_at_one_norm_force=3.639246 curviness=0.75
    Millard2012EquilibriumMuscle tibpost_r: max_isometric_force=1730.154 optimal_fiber_length=0.0378
        tendon_slack_length=0.2807796 pennation_angle_at_optimal=0.2264891
      PathPoint P1: tibia_r (-0.0041 -0.1304 0.0103)
      PathPoint P2: tibia_r (-0.0164 -0.3655 -0.0175)
      PathPoint P3: calcn_r (0.0417 0.0334 -0.0286)
      PathPoint P4: calcn_r (0.0772 0.0159 -0.0281)
      FiberForceLengthCurve: strain_at_zero_force=-0.07310113 strain_at_one_norm_force=0.698029
          stiffness_at_low_force=0.2 stiffness_at_one_norm_force=2.593596 curviness=0.75
    Millard2012EquilibriumMuscle vasint_r: max_isometric_force=1697.361 optimal_fiber_length=0.117
        tendon_slack_length=0.205 pennation_angle_at_optimal=0.06309973
      PathPoint P1: femur_r (0.029 -0.1924 0.031)
      PathPoint P2: femur_r (0.0335 -0.2084 0.0285)
      PathPoint P3: patella_r (0.0058 0.048 -0.0006)
      PathPoint P4: patella_r (0.005 0.00247 -0.00039)
      PathPoint P5: tibia_r (0.03257 -0.0632 0.00043)
      PathWrap: wrap_object=KnExt_at_fem_r method=hybrid
      FiberForceLengthCurve: strain_at_zero_force=0.1756531 strain_at_one_norm_force=0.7074754
          stiffness_at_low_force=0.2 stiffness_at_one_norm_force=3.760655 curviness=0.75
    Millard2012EquilibriumMuscle vaslat_r: max_isometric_force=5148.767 optimal_fiber_length=0.117
        tendon_slack_length=0.221 pennation_angle_at_optimal=0.2528673
      PathPoint P1: femur_r (0.0048 -0.1854 0.0349)
      PathPoint P2: femur_r (0.0269 -0.2591 0.0409)
      PathPoint P3: patella_r (0.0103 0.0423 0.0141)
      PathPoint P4: patella_r (0.005 0.00247 0.00733)
      PathPoint P5: tibia_r (0.03254 -0.06338 0.00511)
      PathWrap: wrap_object=KnExtVL_at_fem_r method=hybrid
      FiberForceLengthCurve: strain_at_zero_force=0.1934746 strain_at_one_norm_force=0.711135
          stiffness_at_low_force=0.2 stiffness_at_one_norm_force=3.863536 curviness=0.75
    Millard2012EquilibriumMuscle vasmed_r: max_isometric_force=2747.823 optimal_fiber_length=0.11
        tendon_slack_length=0.208 pennation_angle_at_optimal=0.4222225
      PathPoint P1: femur_r (0.014 -0.2099 0.0188)
      PathPoint P2: femur_r (0.0356 -0.2769 0.0009)
      PathPoint P3: patella_r (0.0063 0.0445 -0.017)
      PathPoint P4: patella_r (0.005 0.00247 -0.0085)
      PathPoint P5: tibia_r (0.0319 -0.06357 -0.00678)
      PathWrap: wrap_object=KnExt_at_fem_r method=hybrid
      FiberForceLengthCurve: strain_at_zero_force=0.1780858 strain_at_one_norm_force=0.706013
          stiffness_at_low_force=0.2 stiffness_at_one_norm_force=3.788401 curviness=0.75
    Millard2012EquilibriumMuscle addbrev_l: max_isometric_force=625.8197 optimal_fiber_length=0.1031
        tendon_slack_length=0.03545029 pennation_angle_at_optimal=0.1147809
      PathPoint P1: pelvis (-0.0191 -0.094 -0.0154)
      PathPoint P2: femur_l (-0.002 -0.118 -0.0249)
      PathWrap: wrap_object=AB_at_femshaft_l method=hybrid
      FiberForceLengthCurve: strain_at_zero_force=-0.1844454 strain_at_one_norm_force=0.5059595
          stiffness_at_low_force=0.2 stiffness_at_one_norm_force=2.896851 curviness=0.75
    Millard2012EquilibriumMuscle addlong_l: max_isometric_force=916.8 optimal_fiber_length=0.1082
        tendon_slack_length=0.1317994 pennation_angle_at_optimal=0.1377704
      PathPoint P1: pelvis (-0.00758 -0.0889 -0.01888)
      PathPoint P2: femur_l (0.01126 -0.23937 -0.01583)
      PathWrap: wrap_object=AL_at_femshaft_l method=hybrid
      FiberForceLengthCurve: strain_at_zero_force=-0.1942012 strain_at_one_norm_force=0.5013184
          stiffness_at_low_force=0.2 stiffness_at_one_norm_force=2.875548 curviness=0.75
    Millard2012EquilibriumMuscle addmagDist_l: max_isometric_force=597.2951 optimal_fiber_length=0.1772
        tendon_slack_length=0.0873807 pennation_angle_at_optimal=0.194705
      PathPoint P1: pelvis (-0.07404 -0.12767 -0.03982)
      PathPoint P2: femur_l (0.01125 -0.2625 -0.0193)
      PathWrap: wrap_object=AMdist_at_femshaft_l method=hybrid
      FiberForceLengthCurve: strain_at_zero_force=9.713794e-8 strain_at_one_norm_force=0.7000001
          stiffness_at_low_force=0.2 stiffness_at_one_norm_force=2.857143 curviness=0.75
    Millard2012EquilibriumMuscle addmagIsch_l: max_isometric_force=597.2951 optimal_fiber_length=0.1562
        tendon_slack_length=0.216343 pennation_angle_at_optimal=0.1680443
      PathPoint P1: pelvis (-0.08962 -0.12976 -0.04171)
      PathPoint P2: femur_l (0.00481 -0.38797 0.03273)
      PathWrap: wrap_object=AMisch_at_condyles_l method=hybrid
      FiberForceLengthCurve: strain_at_zero_force=0.005651991 strain_at_one_norm_force=0.7000408
          stiffness_at_low_force=0.2 stiffness_at_one_norm_force=2.880231 curviness=0.75
    Millard2012EquilibriumMuscle addmagMid_l: max_isometric_force=597.2951 optimal_fiber_length=0.1377
        tendon_slack_length=0.0466277 pennation_angle_at_optimal=0.2073076
      PathPoint P1: pelvis (-0.05266 -0.12075 -0.02854)
      PathPoint P2: femur_l (0.00242 -0.1624 -0.02922)
      PathWrap: wrap_object=AMmid_at_femshaft_l method=hybrid
      FiberForceLengthCurve: strain_at_zero_force=1.776572e-8 strain_at_one_norm_force=0.7000001
          stiffness_at_low_force=0.2 stiffness_at_one_norm_force=2.857143 curviness=0.75
    Millard2012EquilibriumMuscle addmagProx_l: max_isometric_force=597.2951 optimal_fiber_length=0.1056
        tendon_slack_length=0.0403241 pennation_angle_at_optimal=0.3114833
      PathPoint P1: pelvis (-0.03098 -0.10755 -0.01365)
      PathPoint P2: femur_l (-0.01527 -0.07886 -0.03202)
      PathWrap: wrap_object=AMprox_at_femshaft_l method=hybrid
      FiberForceLengthCurve: strain_at_zero_force=8.055312e-8 strain_at_one_norm_force=0.7000001
          stiffness_at_low_force=0.2 stiffness_at_one_norm_force=2.857143 curviness=0.75
    Millard2012EquilibriumMuscle bflh_l: max_isometric_force=1313.184 optimal_fiber_length=0.09760034
        tendon_slack_length=0.3325 pennation_angle_at_optimal=0.1759182
      PathPoint P1: pelvis (-0.104 -0.1191 -0.0586)
      PathPoint P2: tibia_l (-0.03436 -0.03648 -0.03618)
      PathPoint P3: tibia_l (-0.02704 -0.05008 -0.03476)
      FiberForceLengthCurve: strain_at_zero_force=0.1368428 strain_at_one_norm_force=0.7054016
          stiffness_at_low_force=0.2 stiffness_at_one_norm_force=3.517666 curviness=0.75
    Millard2012EquilibriumMuscle bfsh_l: max_isometric_force=557.1148 optimal_fiber_length=0.1103005
        tendon_slack_length=0.1058177 pennation_angle_at_optimal=0.2642232
      PathPoint P1: femur_l (0.005 -0.2111 -0.0234)
      PathPoint P2: tibia_l (-0.02866 -0.03284 -0.03204)
      PathWrap: wrap_object=BF_at_gastroc_l method=hybrid
      FiberForceLengthCurve: strain_at_zero_force=0.04380442 strain_at_one_norm_force=0.6994891
          stiffness_at_low_force=0.2 stiffness_at_one_norm_force=3.050247 curviness=0.75
    Millard2012EquilibriumMuscle edl_l: max_isometric_force=603.4982 optimal_fiber_length=0.0693
        tendon_slack_length=0.3688752 pennation_angle_at_optimal=0.2182582
      PathPoint P1: tibia_l (-0.016 -0.1157 -0.0205)
      PathPoint P2: tibia_l (0.0164 -0.376 -0.0112)
      PathPoint P3: calcn_l (0.0919 0.036 -0.0008)
      PathPoint P4: calcn_l (0.1616 0.0055 -0.013)
      PathPoint P5: toes_l (0.0003 0.0047 -0.0153)
      PathPoint P6: toes_l (0.0443 -0.0004 -0.025)
      FiberForceLengthCurve: strain_at_zero_force=0.1015352 strain_at_one_norm_force=0.7074931
          stiffness_at_low_force=0.2 stiffness_at_one_norm_force=3.30056 curviness=0.75
    Millard2012EquilibriumMuscle ehl_l: max_isometric_force=285.8675 optimal_fiber_length=0.0748
        tendon_slack_length=0.3267953 pennation_angle_at_optimal=0.1972681
      PathPoint P1: tibia_l (-0.014 -0.155 -0.0189)
      PathPoint P2: tibia_l (0.0071 -0.2909 -0.0164)
      PathPoint P3: tibia_l (0.02 -0.3693 0.0028)
      PathPoint P4: calcn_l (0.097 0.0389 0.0211)
      PathPoint P5: calcn_l (0.1293 0.0309 0.0257)
      PathPoint P6: calcn_l (0.1734 0.0139 0.028)
      PathPoint P7: toes_l (0.0298 0.0041 0.0245)
      PathPoint P8: toes_l (0.0563 0.0034 0.0186)
      FiberForceLengthCurve: strain_at_zero_force=0.08168779 strain_at_one_norm_force=0.7147756
          stiffness_at_low_force=0.2 stiffness_at_one_norm_force=3.159119 curviness=0.75
    Millard2012EquilibriumMuscle fdl_l: max_isometric_force=423.177 optimal_fiber_length=0.0446
        tendon_slack_length=0.3787729 pennation_angle_at_optimal=0.2248391
      PathPoint P1: tibia_l (-0.0023 -0.1832 0.0018)
      PathPoint P2: tibia_l (-0.0176 -0.3645 0.0124)
      PathPoint P3: calcn_l (0.0436 0.0315 0.028)
      PathPoint P4: calcn_l (0.0708 0.0176 0.0263)
      PathPoint P5: calcn_l (0.1658 -0.0081 -0.0116)
      PathPoint P6: toes_l (-0.0019 -0.0078 -0.0147)
      PathPoint P7: toes_l (0.0285 -0.0071 -0.0215)
      PathPoint P8: toes_l (0.0441 -0.006 -0.0242)
      FiberForceLengthCurve: strain_at_zero_force=-0.006468795 strain_at_one_norm_force=0.6998542
          stiffness_at_low_force=0.2 stiffness_at_one_norm_force=2.831566 curviness=0.75
    Millard2012EquilibriumMuscle fhl_l: max_isometric_force=907.8393 optimal_fiber_length=0.0527
        tendon_slack_length=0.3543397 pennation_angle_at_optimal=0.2580255
      PathPoint P1: tibia_l (-0.031 -0.2163 -0.02)
      PathPoint P2: tibia_l (-0.0242 -0.3671 0.0076)
      PathPoint P3: calcn_l (0.0374 0.0276 0.0241)
      PathPoint P4: calcn_l (0.1038 0.0068 0.0256)
      PathPoint P5: calcn_l (0.1726 -0.0053 0.0269)
      PathPoint P6: toes_l (0.0155 -0.0064 0.0265)
      PathPoint P7: toes_l (0.0562 -0.0102 0.0181)
      FiberForceLengthCurve: strain_at_zero_force=0.007614866 strain_at_one_norm_force=0.7001852
          stiffness_at_low_force=0.2 stiffness_at_one_norm_force=2.887793 curviness=0.75
    Millard2012EquilibriumMuscle gaslat_l: max_isometric_force=1575.059 optimal_fiber_length=0.069
        tendon_slack_length=0.374 pennation_angle_at_optimal=0.2102268
      PathPoint P1: femur_l (0.002 -0.381 -0.02059)
      PathPoint P2: calcn_l (0.0044 0.031 0.0053)
      PathWrap: wrap_object=GasLat_at_shank_l method=hybrid
      PathWrap pathwrap_0: wrap_object=GasLat_at_condyles_l method=hybrid
      FiberForceLengthCurve: strain_at_zero_force=-0.1932361 strain_at_one_norm_force=0.6636807
          stiffness_at_low_force=0.2 stiffness_at_one_norm_force=2.333949 curviness=0.75
    Millard2012EquilibriumMuscle gasmed_l: max_isometric_force=3115.515 optimal_fiber_length=0.059
        tendon_slack_length=0.387 pennation_angle_at_optimal=0.1656816
      PathPoint P1: femur_l (0.006 -0.385 0.022)
      PathPoint P2: calcn_l (0.0044 0.031 0.0053)
      PathWrap: wrap_object=GasMed_at_shank_l method=hybrid
      PathWrap pathwrap_0: wrap_object=GasMed_at_condyles_l method=hybrid
      FiberForceLengthCurve: strain_at_zero_force=0.1506325 strain_at_one_norm_force=0.550636
          stiffness_at_low_force=0.2 stiffness_at_one_norm_force=4.999956 curviness=0.75
    Millard2012EquilibriumMuscle glmax1_l: max_isometric_force=983.7836 optimal_fiber_length=0.147
        tendon_slack_length=0.0873 pennation_angle_at_optimal=0.3540118
      PathPoint P1: pelvis (-0.1231 0.0345 -0.0563)
      PathPoint P2: pelvis (-0.1257 -0.0242 -0.0779)
      PathPoint P3: femur_l (-0.0444 -0.0326 -0.0302)
      PathPoint P4: femur_l (-0.0277 -0.0566 -0.047)
      PathWrap: wrap_object=Gmax1_at_pelvis_l method=hybrid
      FiberForceLengthCurve: strain_at_zero_force=2.229005e-7 strain_at_one_norm_force=0.6999999
          stiffness_at_low_force=0.2 stiffness_at_one_norm_force=2.857144 curviness=0.75
    Millard2012EquilibriumMuscle glmax2_l: max_isometric_force=1406.046 optimal_fiber_length=0.157
        tendon_slack_length=0.109 pennation_angle_at_optimal=0.3673821
      PathPoint P1: pelvis (-0.1317 0.0087 -0.0462)
      PathPoint P2: pelvis (-0.1344 -0.0609 -0.0813)
      PathPoint P3: femur_l (-0.045 -0.0584 -0.0252)
      PathPoint P4: femur_l (-0.0156 -0.1016 -0.0419)
      PathWrap: wrap_object=Gmax2_at_pelvis_l method=hybrid
      FiberForceLengthCurve: strain_at_zero_force=1.628612e-7 strain_at_one_norm_force=0.7000001
          stiffness_at_low_force=0.2 stiffness_at_one_norm_force=2.857143 curviness=0.75
    Millard2012EquilibriumMuscle glmax3_l: max_isometric_force=947.7541 optimal_fiber_length=0.167
        tendon_slack_length=0.103 pennation_angle_at_optimal=0.3824161
      PathPoint P1: pelvis (-0.13 -0.0525 -0.009)
      PathPoint P2: pelvis (-0.1273 -0.1263 -0.0435)
      PathPoint P3: femur_l (-0.0281 -0.1125 -0.0094)
      PathPoint P4: femur_l (-0.006 -0.1419 -0.0411)
      PathWrap: wrap_object=Gmax3_at_pelvis_l method=hybrid
      FiberForceLengthCurve: strain_at_zero_force=0.03977768 strain_at_one_norm_force=0.7004988
          stiffness_at_low_force=0.2 stiffness_at_one_norm_force=3.026996 curviness=0.75
    Millard2012EquilibriumMuscle glmed1_l: max_isometric_force=1093.467 optimal_fiber_length=0.0765
        tendon_slack_length=0.0585 pennation_angle_at_optimal=0.3165559
      PathPoint P1: pelvis (-0.049 0.026 -0.115)
      PathPoint P2: femur_l (-0.014 -0.018 -0.059)
      FiberForceLengthCurve: strain_at_zero_force=6.185261e-8 strain_at_one_norm_force=0.7000001
          stiffness_at_low_force=0.2 stiffness_at_one_norm_force=2.857143 curviness=0.75
    Millard2012EquilibriumMuscle glmed2_l: max_isometric_force=765.0917 optimal_fiber_length=0.084
        tendon_slack_length=0.07545 pennation_angle_at_optimal=0.3165559
      PathPoint P1: pelvis (-0.085 0.055 -0.082)
      PathPoint P2: femur_l (-0.022 -0.01 -0.056)
      FiberForceLengthCurve: strain_at_zero_force=-0.1329608 strain_at_one_norm_force=0.6904088
          stiffness_at_low_force=0.2 stiffness_at_one_norm_force=2.429043 curviness=0.75
    Millard2012EquilibriumMuscle glmed3_l: max_isometric_force=871.1993 optimal_fiber_length=0.0781
        tendon_slack_length=0.0484 pennation_angle_at_optimal=0.3165559
      PathPoint P1: pelvis (-0.1 0.016 -0.064)
      PathPoint P2: femur_l (-0.0309 -0.0047 -0.0518)
      FiberForceLengthCurve: strain_at_zero_force=-0.1914236 strain_at_one_norm_force=0.6558113
          stiffness_at_low_force=0.2 stiffness_at_one_norm_force=2.360621 curviness=0.75
    Millard2012EquilibriumMuscle glmin1_l: max_isometric_force=374.0459 optimal_fiber_length=0.0813
        tendon_slack_length=0.0193 pennation_angle_at_optimal=0.1745329
      PathPoint P1: pelvis (-0.03 0 -0.118)
      PathPoint P2: femur_l (0.005 -0.015 -0.056)
      FiberForceLengthCurve: strain_at_zero_force=-8.172674e-8 strain_at_one_norm_force=0.7000001
          stiffness_at_low_force=0.2 stiffness_at_one_norm_force=2.857142 curviness=0.75
    Millard2012EquilibriumMuscle glmin2_l: max_isometric_force=394.8197 optimal_fiber_length=0.0687
        tendon_slack_length=0.03202 pennation_angle_at_optimal=0
      PathPoint P1: pelvis (-0.0616 0.01 -0.101)
      PathPoint P2: femur_l (0.004 -0.009 -0.052)
      FiberForceLengthCurve: strain_at_zero_force=0.001146607 strain_at_one_norm_force=0.6999804
          stiffness_at_low_force=0.2 stiffness_at_one_norm_force=2.861911 curviness=0.75
    Millard2012EquilibriumMuscle glmin3_l: max_isometric_force=446.7738 optimal_fiber_length=0.0353
        tendon_slack_length=0.0472 pennation_angle_at_optimal=0.01745329
      PathPoint P1: pelvis (-0.0789 -0.0155 -0.0798)
      PathPoint P2: femur_l (-0.004 -0.001 -0.051)
      FiberForceLengthCurve: strain_at_zero_force=-0.0351512 strain_at_one_norm_force=0.6990981
          stiffness_at_low_force=0.2 stiffness_at_one_norm_force=2.723871 curviness=0.75
    Millard2012EquilibriumMuscle grac_l: max_isometric_force=281.3115 optimal_fiber_length=0.2278006
        tendon_slack_length=0.1720142 pennation_angle_at_optimal=0.1720016
      PathPoint P1: pelvis (-0.04736 -0.12932 -0.02456)
      PathPoint P2: tibia_l (-0.01842 -0.04755 0.02961)
      PathPoint P3: tibia_l (0.00178 -0.06962 0.01573)
      PathWrap: wrap_object=GR_at_condyles_l method=hybrid
      FiberForceLengthCurve: strain_at_zero_force=-0.1885953 strain_at_one_norm_force=0.7244614
          stiffness_at_low_force=0.2 stiffness_at_one_norm_force=2.190445 curviness=0.75
    Millard2012EquilibriumMuscle iliacus_l: max_isometric_force=1021.141 optimal_fiber_length=0.1066
        tendon_slack_length=0.09612071 pennation_angle_at_optimal=0.279914
      PathPoint P1: pelvis (-0.0605 0.0309 -0.0843)
      PathPoint P2: pelvis (-0.0135 -0.0557 -0.0756)
      PathPoint P3: femur_l (-0.0023 -0.0565 -0.0139)
      PathPoint P4: femur_l (-0.0122 -0.0637 -0.0196)
      PathWrap: wrap_object=IL_at_brim_l method=hybrid range=(2 3)
      FiberForceLengthCurve: strain_at_zero_force=-0.1607227 strain_at_one_norm_force=0.5020882
          stiffness_at_low_force=0.2 stiffness_at_one_norm_force=3.017452 curviness=0.75
    Millard2012EquilibriumMuscle perbrev_l: max_isometric_force=521.2016 optimal_fiber_length=0.0454
        tendon_slack_length=0.1475275 pennation_angle_at_optimal=0.2052361
      PathPoint P1: tibia_l (-0.0243 -0.2532 -0.0251)
      PathPoint P2: tibia_l (-0.0339 -0.3893 -0.0249)
      PathPoint P3: tibia_l (-0.0285 -0.4004 -0.0255)
      PathPoint P4: calcn_l (0.0471 0.027 -0.0233)
      PathPoint P5: calcn_l (0.0677 0.0219 -0.0343)
      FiberForceLengthCurve: strain_at_zero_force=-0.02868018 strain_at_one_norm_force=0.6992207
          stiffness_at_low_force=0.2 stiffness_at_one_norm_force=2.747627 curviness=0.75
    Millard2012EquilibriumMuscle perlong_l: max_isometric_force=1115.371 optimal_fiber_length=0.0508
        tendon_slack_length=0.3322208 pennation_angle_at_optimal=0.2479525
      PathPoint P1: tibia_l (-0.02 -0.1373 -0.0282)
      PathPoint P2: tibia_l (-0.0317 -0.39 -0.0237)
      PathPoint P3: tibia_l (-0.0272 -0.4014 -0.024)
      PathPoint P4: calcn_l (0.0438 0.023 -0.0221)
      PathPoint P5: calcn_l (0.0681 0.0106 -0.0284)
      PathPoint P6: calcn_l (0.0852 0.0069 -0.0118)
      PathPoint P7: calcn_l (0.1203 0.0085 0.0184)
      FiberForceLengthCurve: strain_at_zero_force=-0.08769079 strain_at_one_norm_force=0.6966414
          stiffness_at_low_force=0.2 stiffness_at_one_norm_force=2.54994 curviness=0.75
    Millard2012EquilibriumMuscle piri_l: max_isometric_force=1029.787 optimal_fiber_length=0.026
        tendon_slack_length=0.1149062 pennation_angle_at_optimal=0.1745329
      PathPoint P1: pelvis (-0.10181 -0.00653 -0.01351)
      PathPoint P2: pelvis (-0.10202 -0.03066 -0.06092)
      PathPoint P3: femur_l (-0.0148 -0.0036 -0.0437)
      FiberForceLengthCurve: strain_at_zero_force=-0.1828826 strain_at_one_norm_force=0.7031405
          stiffness_at_low_force=0.2 stiffness_at_one_norm_force=2.257277 curviness=0.75
    Millard2012EquilibriumMuscle psoas_l: max_isometric_force=1426.79 optimal_fiber_length=0.1169
        tendon_slack_length=0.09954317 pennation_angle_at_optimal=0.2155251
      PathPoint P1: pelvis (-0.0606 0.062 -0.039)
      PathPoint P2: pelvis (-0.0205 -0.0654 -0.0656)
      PathPoint P3: femur_l (-0.0132 -0.0467 -0.0046)
      PathPoint P4: femur_l (-0.0235 -0.0524 -0.0088)
      PathWrap: wrap_object=PS_at_brim_l method=hybrid range=(2 3)
      FiberForceLengthCurve: strain_at_zero_force=-0.07629291 strain_at_one_norm_force=0.5032605
          stiffness_at_low_force=0.2 stiffness_at_one_norm_force=3.450933 curviness=0.75
    Millard2012EquilibriumMuscle recfem_l: max_isometric_force=2191.741 optimal_fiber_length=0.07589965
        tendon_slack_length=0.4504 pennation_angle_at_optimal=0.2170149
      PathPoint P1: pelvis (-0.024 -0.0388 -0.0933)
      PathPoint P2: patella_l (0.01 0.049 -0.0007)
      PathPoint P3: patella_l (0.0121 0.0437 0.001)
      PathPoint P4: patella_l (0.005 0.00247 -3e-5)
      PathPoint P5: tibia_l (0.0326 -0.06312 0.00047)
      PathWrap: wrap_object=KnExt_at_fem_l method=hybrid
      FiberForceLengthCurve: strain_at_zero_force=0.1997943 strain_at_one_norm_force=0.8997465
          stiffness_at_low_force=0.2 stiffness_at_one_norm_force=2.857338 curviness=0.75
    Millard2012EquilibriumMuscle sart_l: max_isometric_force=249.4131 optimal_fiber_length=0.4030004
        tendon_slack_length=0.1239999 pennation_angle_at_optimal=0.02613542
      PathPoint P1: pelvis (-0.0195 -0.0156 -0.1056)
      PathPoint P2: femur_l (-0.003 -0.3568 0.0421)
      PathPoint P3: tibia_l (-0.0251 -0.0401 0.0365)
      PathPoint P4: tibia_l (-0.0159 -0.0599 0.0264)
      PathPoint P5: tibia_l (0.0136 -0.081 0.0026)
      FiberForceLengthCurve: strain_at_zero_force=-0.07294162 strain_at_one_norm_force=0.7021361
          stiffness_at_low_force=0.2 stiffness_at_one_norm_force=2.580386 curviness=0.75
    Millard2012EquilibriumMuscle semimem_l: max_isometric_force=2200.987 optimal_fiber_length=0.086
        tendon_slack_length=0.335 pennation_angle_at_optimal=0.2545615
      PathPoint P1: pelvis (-0.0987 -0.114 -0.0614)
      PathPoint P2: tibia_l (-0.027 -0.041 0.0196)
      PathWrap: wrap_object=SM_at_condyles_l method=hybrid
      FiberForceLengthCurve: strain_at_zero_force=0.1537347 strain_at_one_norm_force=0.7044745
          stiffness_at_low_force=0.2 stiffness_at_one_norm_force=3.631479 curviness=0.75
    Millard2012EquilibriumMuscle semiten_l: max_isometric_force=591.2951 optimal_fiber_length=0.1930008
        tendon_slack_length=0.2472 pennation_angle_at_optimal=0.241295
      PathPoint P1: pelvis (-0.1038 -0.1253 -0.0515)
      PathPoint P2: tibia_l (-0.0312 -0.0508 0.0229)
      PathPoint P3: tibia_l (0.0019 -0.0773 0.0117)
      PathWrap: wrap_object=ST_at_condyles_l method=hybrid
      FiberForceLengthCurve: strain_at_zero_force=0.114169 strain_at_one_norm_force=0.7136122
          stiffness_at_low_force=0.2 stiffness_at_one_norm_force=3.336429 curviness=0.75
    Millard2012EquilibriumMuscle soleus_l: max_isometric_force=6194.843 optimal_fiber_length=0.044
        tendon_slack_length=0.28135 pennation_angle_at_optimal=0.3814289
      PathPoint P1: tibia_l (-0.0076 -0.0916 -0.0098)
      PathPoint P2: calcn_l (0.0044 0.031 0.0053)
      FiberForceLengthCurve: strain_at_zero_force=0.04016445 strain_at_one_norm_force=0.7659521
          stiffness_at_low_force=0.2 stiffness_at_one_norm_force=2.755627 curviness=0.75
    Millard2012EquilibriumMuscle tfl_l: max_isometric_force=411.2066 optimal_fiber_length=0.09315
        tendon_slack_length=0.44075 pennation_angle_at_optimal=0.05235988
      PathPoint P1: pelvis (-0.02 0.011 -0.129)
      PathPoint P2: femur_l (0.0294 -0.0995 -0.0597)
      PathPoint P3: femur_l (0.0107 -0.405 -0.0324)
      PathPoint P4: tibia_l (0.0108 -0.041 -0.0346)
      FiberForceLengthCurve: strain_at_zero_force=0.1571908 strain_at_one_norm_force=0.6394004
          stiffness_at_low_force=0.2 stiffness_at_one_norm_force=4.147574 curviness=0.75
    Millard2012EquilibriumMuscle tibant_l: max_isometric_force=1227.452 optimal_fiber_length=0.0683
        tendon_slack_length=0.240461 pennation_angle_at_optimal=0.1951828
      PathPoint P1: tibia_l (0.0154 -0.1312 -0.0162)
      PathPoint P2: tibia_l (0.0251 -0.1906 -0.0128)
      PathPoint P3: tibia_l (0.0233 -0.3659 0.0132)
      PathPoint P4: calcn_l (0.1166 0.0178 0.0305)
      FiberForceLengthCurve: strain_at_zero_force=0.1588072 strain_at_one_norm_force=0.7083715
          stiffness_at_low_force=0.2 stiffness_at_one_norm_force=3.639246 curviness=0.75
    Millard2012EquilibriumMuscle tibpost_l: max_isometric_force=1730.154 optimal_fiber_length=0.0378
        tendon_slack_length=0.2807796 pennation_angle_at_optimal=0.2264891
      PathPoint P1: tibia_l (-0.0041 -0.1304 -0.0103)
      PathPoint P2: tibia_l (-0.0164 -0.3655 0.0175)
      PathPoint P3: calcn_l (0.0417 0.0334 0.0286)
      PathPoint P4: calcn_l (0.0772 0.0159 0.0281)
      FiberForceLengthCurve: strain_at_zero_force=-0.07310113 strain_at_one_norm_force=0.698029
          stiffness_at_low_force=0.2 stiffness_at_one_norm_force=2.593596 curviness=0.75
    Millard2012EquilibriumMuscle vasint_l: max_isometric_force=1697.361 optimal_fiber_length=0.117
        tendon_slack_length=0.205 pennation_angle_at_optimal=0.06309973
      PathPoint P1: femur_l (0.029 -0.1924 -0.031)
      PathPoint P2: femur_l (0.0335 -0.2084 -0.0285)
      PathPoint P3: patella_l (0.0058 0.048 0.0006)
      PathPoint P4: patella_l (0.005 0.00247 0.00039)
      PathPoint P5: tibia_l (0.03257 -0.0632 -0.00043)
      PathWrap: wrap_object=KnExt_at_fem_l method=hybrid
      FiberForceLengthCurve: strain_at_zero_force=0.1756531 strain_at_one_norm_force=0.7074754
          stiffness_at_low_force=0.2 stiffness_at_one_norm_force=3.760655 curviness=0.75
    Millard2012EquilibriumMuscle vaslat_l: max_isometric_force=5148.767 optimal_fiber_length=0.117
        tendon_slack_length=0.221 pennation_angle_at_optimal=0.2528673
      PathPoint P1: femur_l (0.0048 -0.1854 -0.0349)
      PathPoint P2: femur_l (0.0269 -0.2591 -0.0409)
      PathPoint P3: patella_l (0.0103 0.0423 -0.0141)
      PathPoint P4: patella_l (0.005 0.00247 -0.00733)
      PathPoint P5: tibia_l (0.03254 -0.06338 -0.00511)
      PathWrap: wrap_object=KnExtVL_at_fem_l method=hybrid
      FiberForceLengthCurve: strain_at_zero_force=0.1934746 strain_at_one_norm_force=0.711135
          stiffness_at_low_force=0.2 stiffness_at_one_norm_force=3.863536 curviness=0.75
    Millard2012EquilibriumMuscle vasmed_l: max_isometric_force=2747.823 optimal_fiber_length=0.11
        tendon_slack_length=0.208 pennation_angle_at_optimal=0.4222225
      PathPoint P1: femur_l (0.014 -0.2099 -0.0188)
      PathPoint P2: femur_l (0.0356 -0.2769 -0.0009)
      PathPoint P3: patella_l (0.0063 0.0445 0.017)
      PathPoint P4: patella_l (0.005 0.00247 0.0085)
      PathPoint P5: tibia_l (0.0319 -0.06357 0.00678)
      PathWrap: wrap_object=KnExt_at_fem_l method=hybrid
      FiberForceLengthCurve: strain_at_zero_force=0.1780858 strain_at_one_norm_force=0.706013
          stiffness_at_low_force=0.2 stiffness_at_one_norm_force=3.788401 curviness=0.75
    ActivationCoordinateActuator [values shared by the 11 below unless stated]: activation_time_constant=0.035
        default_activation=0.5 optimal_force=10
    ActivationCoordinateActuator lumbar_ext: coordinate=lumbar_extension
    ActivationCoordinateActuator lumbar_bend: coordinate=lumbar_bending
    ActivationCoordinateActuator lumbar_rot: coordinate=lumbar_rotation
    ActivationCoordinateActuator shoulder_flex_r: coordinate=arm_flex_r
    ActivationCoordinateActuator shoulder_add_r: coordinate=arm_add_r
    ActivationCoordinateActuator shoulder_rot_r: coordinate=arm_rot_r
    ActivationCoordinateActuator elbow_flex_r: coordinate=elbow_flex_r
    ActivationCoordinateActuator shoulder_flex_l: coordinate=arm_flex_l
    ActivationCoordinateActuator shoulder_add_l: coordinate=arm_add_l
    ActivationCoordinateActuator shoulder_rot_l: coordinate=arm_rot_l
    ActivationCoordinateActuator elbow_flex_l: coordinate=elbow_flex_l
  ContactGeometrySet:
    ContactSphere heel_r: socket_frame=/bodyset/calcn_r location=(0.01267047 0 -0.009408063) radius=0.035
    ContactSphere lateralRearfoot_r: socket_frame=/bodyset/calcn_r location=(0.07349296 0 0.02594509) radius=0.035
    ContactSphere lateralMidfoot_r: socket_frame=/bodyset/calcn_r location=(0.132711 0 0.04557194) radius=0.035
    ContactSphere lateralToe_r: socket_frame=/bodyset/toes_r location=(0.02039621 0 0.05942451) radius=0.035
    ContactSphere medialToe_r: socket_frame=/bodyset/toes_r location=(0.06590438 0 -0.02307897) radius=0.035
    ContactSphere medialMidfoot_r: socket_frame=/bodyset/calcn_r location=(0.1762162 0 -0.03054489) radius=0.035
    ContactSphere heel_l: socket_frame=/bodyset/calcn_l location=(0.01267047 0 0.009408063) radius=0.035
    ContactSphere lateralRearfoot_l: socket_frame=/bodyset/calcn_l location=(0.07349296 0 -0.02594509) radius=0.035
    ContactSphere lateralMidfoot_l: socket_frame=/bodyset/calcn_l location=(0.132711 0 -0.04557194) radius=0.035
    ContactSphere lateralToe_l: socket_frame=/bodyset/toes_l location=(0.02039621 0 -0.05942451) radius=0.035
    ContactSphere medialToe_l: socket_frame=/bodyset/toes_l location=(0.06590438 0 0.02307897) radius=0.035
    ContactSphere medialMidfoot_l: socket_frame=/bodyset/calcn_l location=(0.1762162 0 0.03054489) radius=0.035
    ContactEllipsoid femur_r_capsule: socket_frame=/bodyset/femur_r location=(0 -0.2 0) orientation=(1.5707 0 0)
        radii=(0.06 0.17 0.06)
    ContactEllipsoid femur_l_capsule: socket_frame=/bodyset/femur_l location=(0 -0.2 0) orientation=(1.5707 0 0)
        radii=(0.06 0.17 0.06)
    ContactEllipsoid tibia_r_capsule: socket_frame=/bodyset/tibia_r location=(0 -0.18 0) orientation=(1.5707 0 0)
        radii=(0.04 0.16 0.04)
    ContactEllipsoid tibia_l_capsule: socket_frame=/bodyset/tibia_l location=(0 -0.18 0) orientation=(1.5707 0 0)
        radii=(0.04 0.16 0.04)
    ContactEllipsoid pelvis_capsule: socket_frame=/bodyset/pelvis location=(-0.08 0 0) radii=(0.1 0.03 0.1)
    ContactEllipsoid humerus_r_capsule: socket_frame=/bodyset/humerus_r location=(0 -0.15 0) orientation=(1.5707 0 0)
        radii=(0.035 0.15 0.035)
    ContactEllipsoid humerus_l_capsule: socket_frame=/bodyset/humerus_l location=(0 -0.15 0) orientation=(1.5707 0 0)
        radii=(0.035 0.15 0.035)
    ContactEllipsoid ulna_r_capsule: socket_frame=/bodyset/ulna_r location=(-0.01 -0.18 0.02) orientation=(1.5707 0 0)
        radii=(0.025 0.15 0.025)
    ContactEllipsoid ulna_l_capsule: socket_frame=/bodyset/ulna_l location=(-0.01 -0.18 -0.02) orientation=(1.5707 0 0)
        radii=(0.035 0.15 0.035)
