# OpenSim document version 40500
Model subject01:
  gravity: 0 -9.80665 0
  length_units: meters
  force_units: N
  credits:
    Delp S.L., Loan J.P., Hoy M.G., Zajac F.E., Topp E.L., Rosen J.M., Thelen D.G., Anderson F.C., Seth A.,
    Hamner S.R.
  publications:
    Notes: 3D, 23 DOF gait model created by D.G. Thelen, Univ. of Wisconsin-Madison, and Samuel
    Hamner, Ajay Seth, Frank C. Anderson, and Scott L. Delp, Stanford University. Lower extremity joint
    defintions based on Delp et al. (1990). Low back joint and anthropometry based on Anderson and Pandy (1999,
    2001). Planar knee model of Yamaguchi and Zajac (1989). Seth removed the patella to avoid kinematic
    constraints; insertions of the quadrucepts are handled with moving points in the tibia frame. Hamner added
    arms adapted from Holzbaur et al., 2005. Hamner, S.R., Seth, A, Delp, S.L.: Muscle contributions to
    propulsion and support during running. Journal of Biomechanics, 2010. Delp, S.L., Loan, J.P., Hoy, M.G.,
    Zajac, F.E., Topp E.L., Rosen, J.M.: An interactive graphics-based model of the lower extremity to study
    orthopaedic surgical procedures, IEEE Transactions on Biomedical Engineering, vol. 37, pp. 757-767, 1990.
    Yamaguchi G.T., Zajac F.E.: A planar model of the knee joint to characterize the knee extensor mechanism." J
    . Biomech. vol. 21. pp. 1-10. 1989. Anderson F.C., Pandy M.G.: A dynamic optimization solution for vertical
    jumping in three dimensions. Computer Methods in Biomechanics and Biomedical Engineering 2:201-231, 1999.
    Anderson F.C., Pandy M.G.: Dynamic optimization of human walking. Journal of Biomechanical Engineering
    123:381-390, 2001. Holzbaur, KR, WM Murray and SL Delp, 2005. A model of the upper extremity for simulating
    musculoskeletal surgery and analyzing neuromuscular control. Ann Biomed Eng 33(6): 829-840.
  Ground
  BodySet:
    Body pelvis: mass=11.3078 [kg] mass_center=(-0.0623853 0 0) inertia=(0.0756014 0.0756014 0.043286 0 0 0)
        meshes=(sacrum.vtp pelvis.vtp l_pelvis.vtp)
    Body torso: mass=25.75781 mass_center=(-0.0349193 0.309569 0) inertia=(1.44131 0.911586 1.44131 0 0 0)
        meshes=(hat_spine.vtp hat_jaw.vtp hat_skull.vtp hat_ribs_scap.vtp)
    Body humerus_r: mass=1.951524 mass_center=(0 -0.196583 0) inertia=(0.0149828 0.00285606 0.0149828 0 0 0)
        meshes=humerus_rv.vtp
    Body ulna_r: mass=0.5832969 mass_center=(0 -0.128765 0) inertia=(0.00307723 0.000339408 0.00307723 0 0 0)
        meshes=ulna_rv.vtp
    Body radius_r: mass=0.5832969 mass_center=(0 -0.128765 0) inertia=(0.00307723 0.000339408 0.00307723 0 0 0)
        meshes=radius_rv.vtp
    Body hand_r: mass=0.4392729 mass_center=(0 -0.0698108 0) inertia=(0.000900168 0.000552009 0.00135227 0 0 0)
        meshes=(pisiform_rvs.vtp lunate_rvs.vtp scaphoid_rvs.vtp triquetrum_rvs.vtp hamate_rvs.vtp capitate_rvs.vtp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)
    Body humerus_l: mass=1.951524 mass_center=(0 -0.196583 0) inertia=(0.0149828 0.00285606 0.0149828 0 0 0)
        meshes=humerus_lv.vtp
    Body ulna_l: mass=0.5832969 mass_center=(0 -0.128765 0) inertia=(0.00307723 0.000339408 0.00307723 0 0 0)
        meshes=ulna_lv.vtp
    Body radius_l: mass=0.5832969 mass_center=(0 -0.128765 0) inertia=(0.00307723 0.000339408 0.00307723 0 0 0)
        meshes=radius_lv.vtp
    Body hand_l: mass=0.4392729 mass_center=(0 -0.0698108 0) inertia=(0.000900168 0.000552009 0.00135227 0 0 0)
        meshes=(pisiform_lvs.vtp lunate_lvs.vtp scaphoid_lvs.vtp triquetrum_lvs.vtp hamate_lvs.vtp capitate_lvs.vtp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)
  JointSet:
    WeldJoint ground_pelvis: socket_parent_frame=ground_offset socket_child_frame=pelvis_offset
      PhysicalOffsetFrame ground_offset: socket_parent=/ground translation=(0 1 0) [meters]
      PhysicalOffsetFrame pelvis_offset: socket_parent=/bodyset/pelvis translation=(0 0 0)
      SpatialTransform:
        TransformAxis rotation1: coordinates=pelvis_tilt axis=(0 0 1) LinearFunction(coefficients=1 0)
        TransformAxis rotation2: coordinates=pelvis_list axis=(1 0 0) LinearFunction(coefficients=1 0)
        TransformAxis rotation3: coordinates=pelvis_rotation axis=(0 1 0) LinearFunction(coefficients=1 0)
        TransformAxis translation1: coordinates=pelvis_tx axis=(1 0 0) LinearFunction(coefficients=1 0)
        TransformAxis translation2: coordinates=pelvis_ty axis=(0 1 0) LinearFunction(coefficients=1 0)
        TransformAxis translation3: coordinates=pelvis_tz axis=(0 0 1) LinearFunction(coefficients=1 0)
    CustomJoint back: socket_parent_frame=pelvis_offset socket_child_frame=torso_offset
      Coordinate lumbar_extension: default_value=0 range=(-1.570796 1.570796) clamped=true
      Coordinate lumbar_bending: default_value=0 range=(-1.570796 1.570796) clamped=true
      Coordinate lumbar_rotation: default_value=0 range=(-1.570796 1.570796) clamped=true
      PhysicalOffsetFrame pelvis_offset: socket_parent=/bodyset/pelvis translation=(-0.0888571 0.0719151 0)
      PhysicalOffsetFrame torso_offset: socket_parent=/bodyset/torso translation=(0 0 0)
      SpatialTransform: axes_held_at_zero=(translation1 translation2 translation3)
        TransformAxis rotation1: coordinates=lumbar_extension axis=(0 0 1) LinearFunction(coefficients=1 0)
        TransformAxis rotation2: coordinates=lumbar_bending axis=(1 0 0) LinearFunction(coefficients=1 0)
        TransformAxis rotation3: coordinates=lumbar_rotation axis=(0 1 0) LinearFunction(coefficients=1 0)
    CustomJoint acromial_r: socket_parent_frame=torso_offset socket_child_frame=humerus_r_offset
      Coordinate arm_flex_r: default_value=0 range=(-2 2) clamped=true
      Coordinate arm_add_r: default_value=0 range=(-2.094395 1.570796) clamped=true
      Coordinate arm_rot_r: default_value=0 range=(-1.570796 1.570796) clamped=true
      PhysicalOffsetFrame torso_offset: socket_parent=/bodyset/torso translation=(0.00367235 0.35939 0.183537)
      PhysicalOffsetFrame humerus_r_offset: socket_parent=/bodyset/humerus_r translation=(0 0 0)
      SpatialTransform: axes_held_at_zero=(translation1 translation2 translation3)
        TransformAxis rotation1: coordinates=arm_flex_r axis=(0 0 1) LinearFunction(coefficients=1 0)
        TransformAxis rotation2: coordinates=arm_add_r axis=(1 0 0) LinearFunction(coefficients=1 0)
        TransformAxis rotation3: coordinates=arm_rot_r axis=(0 1 0) LinearFunction(coefficients=1 0)
    CustomJoint elbow_r: socket_parent_frame=humerus_r_offset socket_child_frame=ulna_r_offset
      Coordinate elbow_flex_r: default_value=0 range=(0 2.618) clamped=true
      PhysicalOffsetFrame humerus_r_offset: socket_parent=/bodyset/humerus_r
          translation=(0.011167 -0.342102 -0.00815184)
      PhysicalOffsetFrame ulna_r_offset: socket_parent=/bodyset/ulna_r translation=(0 0 0)
      SpatialTransform: axes_held_at_zero=(rotation2 rotation3 translation1 translation2 translation3)
        TransformAxis rotation1: coordinates=elbow_flex_r axis=(0.226047 0.022269 0.9738618)
            LinearFunction(coefficients=1 0)
    CustomJoint radioulnar_r: socket_parent_frame=ulna_r_offset socket_child_frame=radius_r_offset
      Coordinate pro_sup_r: default_value=0 range=(0 1.570796) clamped=true
      PhysicalOffsetFrame ulna_r_offset: socket_parent=/bodyset/ulna_r translation=(-0.00508764 -0.0138963 0.0197266)
      PhysicalOffsetFrame radius_r_offset: socket_parent=/bodyset/radius_r translation=(0 0 0)
      SpatialTransform: axes_held_at_zero=(rotation2 rotation3 translation1 translation2 translation3)
        TransformAxis rotation1: coordinates=pro_sup_r axis=(0.05639803 0.9984065 0.001952)
            LinearFunction(coefficients=1 0)
    WeldJoint radius_hand_r: socket_parent_frame=radius_r_offset socket_child_frame=hand_r_offset
      PhysicalOffsetFrame radius_r_offset: socket_parent=/bodyset/radius_r
          translation=(-0.00665319 -0.251965 0.0102933)
      PhysicalOffsetFrame hand_r_offset: socket_parent=/bodyset/hand_r translation=(0 0 0)
      SpatialTransform: axes_held_at_zero=(rotation3 translation1 translation2 translation3)
        TransformAxis rotation1: coordinates=wrist_flex_r axis=(0 0 1) LinearFunction(coefficients=1 0)
        TransformAxis rotation2: coordinates=wrist_dev_r axis=(1 0 0) LinearFunction(coefficients=1 0)
    CustomJoint acromial_l: socket_parent_frame=torso_offset socket_child_frame=humerus_l_offset
      Coordinate arm_flex_l: default_value=0 range=(-2 2) clamped=true
      Coordinate arm_add_l: default_value=0 range=(-2.094395 1.570796) clamped=true
      Coordinate arm_rot_l: default_value=0 range=(-1.570796 1.570796) clamped=true
      PhysicalOffsetFrame torso_offset: socket_parent=/bodyset/torso translation=(0.00367235 0.35939 -0.183537)
      PhysicalOffsetFrame humerus_l_offset: socket_parent=/bodyset/humerus_l translation=(0 0 0)
      SpatialTransform: axes_held_at_zero=(translation1 translation2 translation3)
        TransformAxis rotation1: coordinates=arm_flex_l axis=(0 0 1) LinearFunction(coefficients=1 0)
        TransformAxis rotation2: coordinates=arm_add_l axis=(-1 0 0) LinearFunction(coefficients=1 0)
        TransformAxis rotation3: coordinates=arm_rot_l axis=(0 -1 0) LinearFunction(coefficients=1 0)
    CustomJoint elbow_l: socket_parent_frame=humerus_l_offset socket_child_frame=ulna_l_offset
      Coordinate elbow_flex_l: default_value=0 range=(0 2.618) clamped=true
      PhysicalOffsetFrame humerus_l_offset: socket_parent=/bodyset/humerus_l
          translation=(0.011167 -0.342102 0.00815184)
      PhysicalOffsetFrame ulna_l_offset: socket_parent=/bodyset/ulna_l translation=(0 0 0)
      SpatialTransform: axes_held_at_zero=(rotation2 rotation3 translation1 translation2 translation3)
        TransformAxis rotation1: coordinates=elbow_flex_l axis=(-0.226047 -0.022269 0.9738618)
            LinearFunction(coefficients=1 0)
    CustomJoint radioulnar_l: socket_parent_frame=ulna_l_offset socket_child_frame=radius_l_offset
      Coordinate pro_sup_l: default_value=0 range=(0 1.570796) clamped=true
      PhysicalOffsetFrame ulna_l_offset: socket_parent=/bodyset/ulna_l translation=(-0.00508764 -0.0138963 -0.0197266)
      PhysicalOffsetFrame radius_l_offset: socket_parent=/bodyset/radius_l translation=(0 0 0)
      SpatialTransform: axes_held_at_zero=(rotation2 rotation3 translation1 translation2 translation3)
        TransformAxis rotation1: coordinates=pro_sup_l axis=(-0.05639803 -0.9984065 0.001952)
            LinearFunction(coefficients=1 0)
    WeldJoint radius_hand_l: socket_parent_frame=radius_l_offset socket_child_frame=hand_l_offset
      PhysicalOffsetFrame radius_l_offset: socket_parent=/bodyset/radius_l
          translation=(-0.00665319 -0.251965 -0.0102933)
      PhysicalOffsetFrame hand_l_offset: socket_parent=/bodyset/hand_l translation=(0 0 0)
      SpatialTransform: axes_held_at_zero=(rotation3 translation1 translation2 translation3)
        TransformAxis rotation1: coordinates=wrist_flex_l axis=(0 0 1) LinearFunction(coefficients=1 0)
        TransformAxis rotation2: coordinates=wrist_dev_l axis=(-1 0 0) LinearFunction(coefficients=1 0)
  ForceSet:
    Thelen2003Muscle [values shared by the 6 below unless stated]: pennation_angle_at_optimal=0 [radians]
        FmaxTendonStrain=0.033 FmaxMuscleStrain=0.6 KshapeActive=0.5 KshapePassive=4 Af=0.3 Flen=1.8
        activation_time_constant=0.01 [seconds] deactivation_time_constant=0.04 [seconds]
    Thelen2003Muscle ercspn_r: max_isometric_force=2500 optimal_fiber_length=0.1147413 tendon_slack_length=0.02868534
      PathPoint P1: pelvis (-0.123535 0.0387371 0.0380338)
      PathPoint P2: torso (-0.0640187 0.106414 0.0260191)
    Thelen2003Muscle ercspn_l: max_isometric_force=2500 optimal_fiber_length=0.1147413 tendon_slack_length=0.02868534
      PathPoint P1: pelvis (-0.123535 0.0387371 -0.0380338)
      PathPoint P2: torso (-0.0640187 0.106414 -0.0260191)
    Thelen2003Muscle intobl_r: max_isometric_force=900 optimal_fiber_length=0.09418311 tendon_slack_length=0.09418311
      PathPoint P1: pelvis (-0.0352958 0.0617676 0.100929)
      PathPoint P2: torso (0.0814784 0.154784 0.0161945)
    Thelen2003Muscle intobl_l: max_isometric_force=900 optimal_fiber_length=0.09418311 tendon_slack_length=0.09418311
      PathPoint P1: pelvis (-0.0352958 0.0617676 -0.100929)
      PathPoint P2: torso (0.0814784 0.154784 -0.0161945)
    Thelen2003Muscle extobl_r: max_isometric_force=900 optimal_fiber_length=0.1135495 tendon_slack_length=0.1324744
      PathPoint P1: pelvis (-0.0264718 -0.0561203 0.00872334)
      PathPoint P2: torso (0.0756585 0.106414 0.11876)
    Thelen2003Muscle extobl_l: max_isometric_force=900 optimal_fiber_length=0.1135495 tendon_slack_length=0.1324744
      PathPoint P1: pelvis (-0.0264718 -0.0561203 -0.00872334)
      PathPoint P2: torso (0.0756585 0.106414 -0.11876)
    CoordinateLimitForce [values shared by the 13 below unless stated]: upper_stiffness=8.726646
        lower_stiffness=8.726646 damping=0.001745329 transition=1 compute_dissipation_energy=false
    CoordinateLimitForce lumbar_extension_linear_stop: coordinate=lumbar_extension upper_limit=9.740283 lower_limit=-30
    CoordinateLimitForce lumbar_bending_linear_stop: coordinate=lumbar_bending upper_limit=15.87114
        lower_limit=-15.87114
    CoordinateLimitForce lumbar_rotation_linear_stop: coordinate=lumbar_rotation upper_limit=12.83881
        lower_limit=-12.83881
    CoordinateLimitForce arm_flex_r_linear_stop: coordinate=arm_flex_r upper_limit=160 lower_limit=-75
    CoordinateLimitForce arm_add_r_linear_stop: coordinate=arm_add_r upper_limit=15.00767 lower_limit=-24.68299
    CoordinateLimitForce arm_rot_r_linear_stop: coordinate=arm_rot_r upper_limit=43.30916 lower_limit=-62.95196
    CoordinateLimitForce elbow_flex_r_linear_stop: coordinate=elbow_flex_r upper_limit=150.0004 lower_limit=0
    CoordinateLimitForce pro_sup_r_linear_stop: coordinate=pro_sup_r upper_limit=90 lower_limit=0
    CoordinateLimitForce arm_flex_l_linear_stop: coordinate=arm_flex_l upper_limit=160 lower_limit=-75
    CoordinateLimitForce arm_add_l_linear_stop: coordinate=arm_add_l upper_limit=15.00767 lower_limit=-24.68299
    CoordinateLimitForce arm_rot_l_linear_stop: coordinate=arm_rot_l upper_limit=43.30916 lower_limit=-62.95196
    CoordinateLimitForce elbow_flex_l_linear_stop: coordinate=elbow_flex_l upper_limit=150.0004 lower_limit=0
    CoordinateLimitForce pro_sup_l_linear_stop: coordinate=pro_sup_l upper_limit=90 lower_limit=0
    SpringGeneralizedForce lumbar_extension_spring_force: coordinate=lumbar_extension stiffness=0 viscosity=1
    SpringGeneralizedForce lumbar_bending_spring_force: coordinate=lumbar_bending stiffness=0 viscosity=1
    SpringGeneralizedForce lumbar_rotation_spring_force: coordinate=lumbar_rotation stiffness=0 viscosity=1
    SpringGeneralizedForce arm_flex_r_spring_force: coordinate=arm_flex_r stiffness=0 viscosity=0.1
    SpringGeneralizedForce arm_add_r_spring_force: coordinate=arm_add_r stiffness=0 viscosity=0.1
    SpringGeneralizedForce arm_rot_r_spring_force: coordinate=arm_rot_r stiffness=0 viscosity=0.1
    SpringGeneralizedForce arm_flex_l_spring_force: coordinate=arm_flex_l stiffness=0 viscosity=0.1
    SpringGeneralizedForce arm_add_l_spring_force: coordinate=arm_add_l stiffness=0 viscosity=0.1
    SpringGeneralizedForce arm_rot_l_spring_force: coordinate=arm_rot_l stiffness=0 viscosity=0.1
    SpringGeneralizedForce elbow_flex_r_spring_force: coordinate=elbow_flex_r stiffness=0 viscosity=0.1
    SpringGeneralizedForce elbow_flex_l_spring_force: coordinate=elbow_flex_l stiffness=0 viscosity=0.1
    SpringGeneralizedForce pro_sup_r_spring_force: coordinate=pro_sup_r stiffness=0 viscosity=0.1
    SpringGeneralizedForce pro_sup_l_spring_force: coordinate=pro_sup_l stiffness=0 viscosity=0.1
  ContactGeometrySet:
    ContactEllipsoid pelvis_col_capsule: socket_frame=/bodyset/pelvis location=(-0.06 -0.02 0) radii=(0.065 0.06 0.065)
    ContactEllipsoid torso_col_1_1_capsule: socket_frame=/bodyset/torso location=(0 0.185 -0.045)
        orientation=(1.5707 0.1 0) radii=(0.09 0.135 0.09)
    ContactEllipsoid torso_col_1_3_capsule: socket_frame=/bodyset/torso location=(0 0.185 0.045)
        orientation=(1.5707 0.1 0) radii=(0.09 0.135 0.09)
    ContactSphere head_col: socket_frame=/bodyset/torso location=(0.01 0.54 0) radius=0.11
    ContactEllipsoid right_humerus_col_capsule: socket_frame=/bodyset/humerus_r location=(0 -0.15 0)
        orientation=(1.5707 0 0) radii=(0.035 0.15 0.035)
    ContactEllipsoid right_forearm_col_capsule: socket_frame=/bodyset/ulna_r location=(-0.01 -0.18 0.02)
        orientation=(1.5707 0 0) radii=(0.025 0.15 0.025)
    ContactEllipsoid left_humerus_col_capsule: socket_frame=/bodyset/humerus_l location=(0 -0.15 0)
        orientation=(1.5707 0 0) radii=(0.035 0.15 0.035)
    ContactEllipsoid left_forearm_col_capsule: socket_frame=/bodyset/ulna_l location=(-0.01 -0.18 -0.02)
        orientation=(1.5707 0 0) radii=(0.035 0.15 0.035)
